// COMSOL Multiphysics 5.0.1.276 model "Chap1Ex2_SISO_HeatEquation_2.mph"
// Chap1Ex2 SISO HeatEquation 2
// Outline of the model tree

Parameters
  L = 1
  Ar = 1
  alpha = 2
  Md = 1

Variables
  var1 "Variables 1"
    Gamma1 = real(1/C(PI1))
    Gamma2 = imag(1/C(PI1))
    Gamma3 = -C(PIt2)/C(PI2)
    w3 = Md
    w1 = Ar*sin(alpha*t)
    w2 = Ar*cos(alpha*t)
    Gamma = Gamma1*w1+Gamma2*w2+Gamma3*w3
    err = C(z)-w1
    Bin = 2
    Bd = 1

Couplings
  aveop1: Average on domains 1 | opname = C

Probes
  var1: GlobalVariable "Global Variable Probe 1" | expr = Gamma1; table = tbl4
  var2: GlobalVariable "Global Variable Probe 2" | expr = Gamma2; table = tbl4
  var3: GlobalVariable "Global Variable Probe 3" | expr = Gamma3; table = tbl4

Geometry
  geom1 "Geometry 1" (1D, length unit m)
    i1: Interval | intervals = many; p = 0,L/2,L
    fin: Finalize "Form Union"

Physics
  c: CoefficientFormPDE on all domains
    dependent variable PI = {PI1, PI2, PIt2}
    cfeq1: CoefficientFormPDE (default) | c = 1; a = diag{i*alpha, 0, 0}; f = {0, 0, 0}; da = 0
    zflx1: ZeroFluxBoundary "Zero Flux 1" (default)
    init1: init "Initial Values 1" (default)
    src1: SourceTerm "Source 1" on domains 2 | f = {Bin, Bin, 0}
    src2: SourceTerm "Source 2" on domains 1, 2 | f = {0, 0, Bd}
    dir1: DirichletBoundary "Dirichlet Boundary Condition 1" on boundaries 1 | r = {0, 0, 0}
  c2: CoefficientFormPDE on all domains
    dependent variable z
    cfeq1: CoefficientFormPDE (default) | c = 1; f = 0; ea = 0; da = 1
    zflx1: ZeroFluxBoundary "Zero Flux 1" (default)
    init1: init "Initial Values 1" (default) | z = 4*cos(pi*x); zt = 0
    src1: SourceTerm "Source 1" on domains 2 | f = Bin*Gamma
    src2: SourceTerm "Source 2" on domains 1, 2 | f = Bd*w3
    dir1: DirichletBoundary "Dirichlet Boundary Condition 1" on boundaries 1 | r = 0

Mesh
  mesh1 "Mesh 1" (physics-controlled)
    size: MeshSizeDefault | hauto = 3

Studies
  std1 "Study 1"
    stat: Stationary | solve for = {c}
  std2 "Study 2"
    time: Transient "Time Dependent"
      tlist = range(0,0.01,6)
      rtol = 0.00001
      physselection = c
      solve for = {c2}
      usesol = on
      notsolmethod = sol
      notstudy = std1

Solver configurations
  sol1 "Solver 1" (study std1)
    v1: Variables "Dependent Variables 1"
    s1: Stationary "Stationary Solver 1" | stol = 0.0000010
      dDef: Direct
      fc1: FullyCoupled
  sol2 "Solver 2" (study std2)
    v1: Variables "Dependent Variables 1"
    t1: Time "Time-Dependent Solver 1" | tlist = range(0,0.01,6); atolglobal = 0.0000010
      dDef: Direct
      fc1: FullyCoupled

Datasets
  dset1: Solution | solution = sol1
  dset2: Solution | solution = sol2
  dset3: Solution "Probe Solution 3" | solution = sol2

Derived values
  gev2: EvalGlobal "Global Variable Probe 1" | data = dset3; table = tbl4; expr = Gamma1
  gev3: EvalGlobal "Global Variable Probe 2" | data = dset3; table = tbl4; expr = Gamma2
  gev4: EvalGlobal "Global Variable Probe 3" | data = dset3; table = tbl4; expr = Gamma3
  pev1: EvalPoint "Point Evaluation 1" on boundaries 2 | data = dset2; table = tbl6; expr = Gamma

Tables
  tbl1: Table
    // Global Evaluation 1 (C(X))
    Gamma3 (1)
    -0.833333
  tbl2: Table
    // Point Evaluation 1 (z)
    Dependent variable z (1), Point: 1
    0
  tbl3: Table
    // Point Evaluation 1 (z)
    Time | Gradient of z, x component (1/m), Point: 1
    6 | -1.43115
  tbl4: Table "Probe Table 4"
    (1), Global Variable Probe 1 | (1), Global Variable Probe 2 | (1), Global Variable Probe 3
    3.79597 | 3.50365 | -0.833333
  tbl6: Table
    // Point Evaluation 1 (w1)
    Time | w1, Point: 2 | C(z) (1), Point: 2 | w3, Point: 2 | Gamma, Point: 2
    0 | 0 | 2.49153 | 1 | 2.67031
    0.01 | 0.0199987 | 1.47353 | 1 | 2.74553
    0.02 | 0.0399893 | 1.00224 | 1 | 2.81931
    0.03 | 0.059964 | 0.676553 | 1 | 2.89163
    0.04 | 0.0799147 | 0.442754 | 1 | 2.96246
    0.05 | 0.0998334 | 0.272577 | 1 | 3.03178
    0.06 | 0.119712 | 0.148338 | 1 | 3.09954
    0.07 | 0.139543 | 0.0582287 | 1 | 3.16574
    0.08 | 0.159318 | -0.00599727 | 1 | 3.23033
    0.09 | 0.17903 | -0.0503081 | 1 | 3.2933
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
Plots
  pg1: PlotGroup1D "1D Plot Group 1" | data = dset1
    lngr1: LineGraph on all domains | expr = PI1; xdata = expr; xdataexpr = x
    lngr2: LineGraph on all domains | expr = PI2; xdata = expr; xdataexpr = x
    lngr3: LineGraph on all domains | expr = PIt2; xdata = expr; xdataexpr = x
  pg2: PlotGroup1D "1D Plot Group 2" | data = dset2
    lngr1: LineGraph on all domains | expr = z; xdata = expr; xdataexpr = x
  pg3: PlotGroup1D "1D Plot Group 3" | data = dset2
    ptgr1: PointGraph on boundaries 1 | expr = err
  pg4: PlotGroup1D "1D Plot Group 4" | data = dset2
    ptgr1: PointGraph on boundaries 1 | expr = w1
    ptgr2: PointGraph on boundaries 1 | expr = C(z)
  pg5: PlotGroup1D "Probe 1D Plot Group 5"
    tblp1: Table "Probe Table Graph 1" | table = tbl4

Exports
  data1: Data
    data = dset2
    expr = z
    filename = /Users/gilliam/Desktop/collect_13/research_13/reg_monograph/EA_DG_Mono/COMSOL/Chapter1/Chap1Ex2/surf_data.txt