// COMSOL Multiphysics 5.0.1.276 model "Chap1Ex3_SISO_DampedWaveEquation.mph"
// Chap1Ex3 SISO DampedWaveEquation
// Outline of the model tree

Parameters
  L = 1
  Mr = 1
  beta = 0.5
  Ad = 0.25
  gamma = 0.5

Variables
  var1 "Variables 1"
    Gamma1 = real(1/C(PI1))
    rCPI2i = real(1/C(PI2))
    iCPI2i = imag(1/C(PI2))
    rCPIt2 = real(C(PIt2))
    iCPIt2 = imag(C(PIt2))
    Gamma2 = (-rCPI2i*rCPIt2+iCPI2i*iCPIt2)
    Gamma3 = (-rCPI2i*iCPIt2-iCPI2i*rCPIt2)
    w1 = Mr
    w2 = Ad*sin(beta*t)
    w3 = Ad*cos(beta*t)
    Gamma = Gamma1*w1+Gamma2*w2+Gamma3*w3
    err = w1-C(z)
    Bin = 2
    Bd = 4

Couplings
  aveop1: Average on domains 2, 3 | opname = C

Probes
  var1: GlobalVariable "Global Variable Probe 1" | expr = Gamma1; table = tbl1
  var2: GlobalVariable "Global Variable Probe 2" | expr = Gamma2; table = tbl1
  var3: GlobalVariable "Global Variable Probe 3" | expr = Gamma3; table = tbl1

Geometry
  geom1 "Geometry 1" (1D, length unit m)
    i1: Interval | intervals = many; p = 0,L/2, 3/4*L,L
    fin: Finalize "Form Union"

Physics
  c: CoefficientFormPDE on all domains
    dependent variable PI = {PI1, PI2, PIt2}
    cfeq1: CoefficientFormPDE (default)
      c = 1
      a = diag{0, i*2*gamma*beta-beta^2, i*2*gamma*beta-beta^2}
      f = {0, 0, 0}
      da = 0
    zflx1: ZeroFluxBoundary "Zero Flux 1" (default)
    init1: init "Initial Values 1" (default)
    src1: SourceTerm "Source 1" on domains 1 | f = {Bin, Bin, 0}
    src2: SourceTerm "Source 2" on domains 2 | f = {0, 0, Bd}
    dir1: DirichletBoundary "Dirichlet Boundary Condition 1" on boundaries 1, 4 | r = {0, 0, 0}
  c2: CoefficientFormPDE on all domains
    dependent variable z
    cfeq1: CoefficientFormPDE (default) | c = 1; f = 0; ea = 1; da = 2*gamma
    zflx1: ZeroFluxBoundary "Zero Flux 1" (default)
    init1: init "Initial Values 1" (default) | z = 16*(1-x)^2*x^2; zt = 0.5*sin(pi*x)^2
    src1: SourceTerm "Source 1" on domains 1 | f = Bin*Gamma
    src2: SourceTerm "Source 2" on domains 2 | f = Bd*w2
    dir1: DirichletBoundary "Dirichlet Boundary Condition 1" on boundaries 1, 4 | r = 0

Mesh
  mesh1 "Mesh 1" (physics-controlled)
    size: MeshSizeDefault | hauto = 3

Studies
  std1 "Study 1"
    stat: Stationary | solve for = {c}
  std2 "Study 2"
    time: Transient "Time Dependent"
      tlist = range(0,0.025,20)
      rtol = 0.00001
      physselection = c
      solve for = {c2}
      usesol = on
      notsolmethod = sol
      notstudy = std1

Solver configurations
  sol1 "Solver 1" (study std1)
    v1: Variables "Dependent Variables 1"
    s1: Stationary "Stationary Solver 1" | stol = 0.0000010
      dDef: Direct
      fc1: FullyCoupled
  sol2 "Solver 2" (study std2)
    v1: Variables "Dependent Variables 1"
    t1: Time "Time-Dependent Solver 1" | tlist = range(0,0.025,20); atolglobal = 0.0000010
      dDef: Direct
      fc1: FullyCoupled

Datasets
  dset1: Solution | solution = sol1
  dset2: Solution | solution = sol2
  dset3: Solution "Probe Solution 3" | solution = sol2

Derived values
  gev1: EvalGlobal "Global Variable Probe 1" | data = dset3; table = tbl1; expr = Gamma1
  gev2: EvalGlobal "Global Variable Probe 2" | data = dset3; table = tbl1; expr = Gamma2
  gev3: EvalGlobal "Global Variable Probe 3" | data = dset3; table = tbl1; expr = Gamma3
  pev1: EvalPoint "Point Evaluation 1" on boundaries 2 | data = dset2; table = tbl5; expr = Gamma

Tables
  tbl2: Table
    // Point Evaluation 1 (z)
    Dependent variable z (1), Point: 1
    0
  tbl3: Table
    // Point Evaluation 1 (z)
    Time | Gradient of z, x component (1/m), Point: 1
    30 | 11.7977
  tbl4: Table "Probe Table 4"
    Gamma1 (1) | Gamma2 (1) | Gamma3 (1)
    16 | -2.14808 | -0.0372847
  tbl5: Table
    // Point Evaluation 1 (C(z))
    Time | C(z) (1), Point: 2 | w1, Point: 2 | w2, Point: 2 | Gamma, Point: 2
    0 | 0.533344 | 1 | 0 | 15.9907
    0.025 | 0.539437 | 1 | 0.00312492 | 15.984
    0.05 | 0.544979 | 1 | 0.00624935 | 15.9773
    0.075 | 0.549681 | 1 | 0.0093728 | 15.9706
    0.1 | 0.553422 | 1 | 0.0124948 | 15.9639
    0.125 | 0.556182 | 1 | 0.0156148 | 15.9572
    0.15 | 0.558036 | 1 | 0.0187324 | 15.9505
    0.175 | 0.559187 | 1 | 0.0218471 | 15.9438
    0.2 | 0.559895 | 1 | 0.0249584 | 15.9371
    0.225 | 0.560501 | 1 | 0.0280657 | 15.9305
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
Plots
  pg1: PlotGroup1D "1D Plot Group 1" | data = dset1
    lngr1: LineGraph on all domains | expr = PI1; xdata = expr; xdataexpr = x
    lngr2: LineGraph on all domains | expr = PI2; xdata = expr; xdataexpr = x
    lngr3: LineGraph on all domains | expr = PIt2; xdata = expr; xdataexpr = x
  pg2: PlotGroup1D "1D Plot Group 2" | data = dset2
    lngr1: LineGraph on all domains | expr = z; xdata = expr; xdataexpr = x
  pg3: PlotGroup1D "1D Plot Group 3" | data = dset2
    ptgr1: PointGraph on boundaries 1 | expr = err
  pg4: PlotGroup1D "1D Plot Group 4" | data = dset2
    ptgr1: PointGraph on boundaries 1 | expr = w1
    ptgr2: PointGraph on boundaries 1 | expr = C(z)
  pg5: PlotGroup1D "Probe 1D Plot Group 5"
    tblp1: Table "Probe Table Graph 1" | table = tbl1

Exports
  data1: Data
    data = dset2
    expr = z
    filename = /Users/gilliam/Desktop/collect_13/research_13/reg_monograph/EA_DG_Mono/COMSOL/Chapter1/Chap1Ex3/matlab_figs/surf_data.txt