// COMSOL Multiphysics 5.0.1.276 model "Chap2Ex3_SISO_HeatEquation_triangle.mph"
// Chap2Ex3 SISO HeatEquation triangle
// Outline of the model tree

Parameters
  L = 1
  n = 1
  Mr = 0.5

Functions
  an1: Analytic | funcname = alpha; expr = (2*n-1)*pi; args = n
  an2: Analytic | funcname = Ar; expr = -4/(alpha(n))^2; args = n
  an3: Analytic | funcname = w1; expr = Ar(n)*sin(alpha(n)*t); args = {n, t}
  an4: Analytic | funcname = w2; expr = Ar(n)*cos(alpha(n)*t); args = {n, t}

Variables
  var1 "Variables 1"
    Gamma_0 = 1/C(PI0)
    Gamman1 = -imag(1/C(PIn))
    Gamman2 = real(1/C(PIn))
    w0 = Mr
    err = z-yr
    Bin = 1
  var2 "Variables 2a"
    Gamma0 = 0.7999999999995465
    Gamma1_1 = -3.578884033818498
    Gamma1_2 = -7.813779578590128
    Gamma1_3 = -3.5284284923251277
    Gamma1_4 = 14.140996171403312
    Gamma1_5 = 48.87024978552352
    Gamma1_6 = 102.73509656527025
    Gamma1_7 = 175.85080589651474
    Gamma1_8 = 266.0729078794366
    Gamma1_9 = 368.7705852239943
    Gamma1_10 = 476.68411711136275
    Gamma2_1 = -0.5237897928365126
    Gamma2_2 = -10.748473681363208
    Gamma2_3 = -29.26498761403147
    Gamma2_4 = -52.291678667480035
    Gamma2_5 = -74.37075898328712
    Gamma2_6 = -88.63189796536476
    Gamma2_7 = -87.14238416709397
    Gamma2_8 = -61.334211650437695
    Gamma2_9 = -2.4962647692501783
    Gamma2_10 = 97.68086477635816
    Gamma = Gamma0*w0+Gamma1_1*w1(1,t)+Gamma2_1*w2(1,t)+Gamma1_2*w1(2,t)+Gamma2_2*w2(2,t)+Gamma1_3*w1(3,t)+Gamma2_3*w2(3,t)+Gamma1_4*w1(4,t)+Gamma2_4*w2(4,t)+Gamma1_5*w1(5,t)+Gamma2_5*w2(5,t)+Gamma1_6*w1(6,t)+Gamma2_6*w2(6,t)+Gamma1_7*w1(7,t)+Gamma2_7*w2(7,t)+Gamma1_8*w1(8,t)+Gamma2_8*w2(8,t)+Gamma1_9*w1(9,t)+Gamma2_9*w2(9,t)+Gamma1_10*w1(10,t)+Gamma2_10*w2(10,t)
    yr = w0+w2(1,t)+w2(2,t)+w2(3,t)+w2(4,t)+w2(5,t)+w2(6,t)+w2(7,t)+w2(8,t)+w2(9,t)+w2(10,t)

Couplings
  aveop1: Average on boundaries 2 | opname = C

Geometry
  geom1 "Geometry 1" (1D, length unit m)
    i1: Interval | intervals = many; p = 0,L/4,L
    fin: Finalize "Form Union"

Physics
  c: CoefficientFormPDE on all domains
    dependent variable PI0
    cfeq1: CoefficientFormPDE (default) | c = 1; a = 0; f = 0; da = 0
    zflx1: ZeroFluxBoundary "Zero Flux 1" (default)
    init1: init "Initial Values 1" (default)
    flux1: FluxBoundary "Flux/Source 1" on boundaries 1 | q = 1
    flux2: FluxBoundary "Flux/Source 2" on boundaries 3 | g = Bin
  c3: CoefficientFormPDE on all domains
    dependent variable PIn
    cfeq1: CoefficientFormPDE (default) | c = 1; a = i*alpha(n); f = 0; da = 0
    zflx1: ZeroFluxBoundary "Zero Flux 1" (default)
    init1: init "Initial Values 1" (default)
    flux1: FluxBoundary "Flux/Source 1" on boundaries 1 | q = 1
    flux2: FluxBoundary "Flux/Source 2" on boundaries 3 | g = Bin
  c2: CoefficientFormPDE on all domains
    dependent variable z
    cfeq1: CoefficientFormPDE (default) | c = 1; f = 0; ea = 0; da = 1
    zflx1: ZeroFluxBoundary "Zero Flux 1" (default)
    init1: init "Initial Values 1" (default) | z = cos(pi*x); zt = 0
    flux1: FluxBoundary "Flux/Source 1" on boundaries 1 | g = 0; q = 1
    flux2: FluxBoundary "Flux/Source 2" on boundaries 3 | g = Bin*Gamma

Mesh
  mesh1 "Mesh 1" (physics-controlled)
    size: MeshSizeDefault | hauto = 3

Studies
  std1 "Study 1"
    stat: Stationary | solve for = {c}
  std3 "Study 2"
    param: Parametric "Parametric Sweep" | pname = n; plistarr = 1,2,3,4,5,6,7,8,9,10
    stat: Stationary | physselection = c; solve for = {c3}; usesol = on; notstudy = std1
  std4 "Study 3"
    time: Transient "Time Dependent" | tlist = range(0,0.1,8); rtol = 0.00001; physselection = c; solve for = {c2}

Solver configurations
  sol1 "Solver 1" (study std1)
    v1: Variables "Dependent Variables 1"
    s1: Stationary "Stationary Solver 1" | stol = 0.0000010
      dDef: Direct
      fc1: FullyCoupled
  sol2 "Solver 2" (study std3)
    v1: Variables "Dependent Variables 1"
    s1: Stationary "Stationary Solver 1" | stol = 0.0000010
      dDef: Direct
      p1: Parametric | sweeptype = sparse; pname = n; plistarr = 1,2,3,4,5,6,7,8,9,10
      fc1: FullyCoupled
  sol3 "Solver 3" (study std4)
    v1: Variables "Dependent Variables 1"
    t1: Time "Time-Dependent Solver 1" | tlist = range(0,0.1,8)
      dDef: Direct
      fc1: FullyCoupled

Datasets
  dset1: Solution | solution = sol1
  dset2: Solution | solution = sol2
  dset3: Solution | solution = sol3

Derived values
  gev4: EvalGlobal "Global Evaluation 4" | data = dset1; table = tbl1; expr = Gamma_0
  gev5: EvalGlobal "Global Evaluation 5" | data = dset2; table = tbl2; expr = Gamman1
  gev6: EvalGlobal "Global Evaluation 6" | data = dset2; table = tbl3; expr = Gamman2
  pev1: EvalPoint "Point Evaluation 1" on boundaries 2 | data = dset3; table = tbl4; expr = Gamma

Tables
  tbl1: Table
    // Global Evaluation 4 (Gamma0)
    filename = table1.txt
    Gamma_0
    0.8
  tbl2: Table
    // Global Evaluation 5 (Gamman1)
    filename = table2.txt
    n | Gamman1 (1)
    1 | -3.57888
    2 | -7.81378
    3 | -3.52843
    4 | 14.141
    5 | 48.8702
    6 | 102.735
    7 | 175.851
    8 | 266.073
    9 | 368.771
    10 | 476.684
  tbl4: Table
    // Point Evaluation 1 (C(z))
    Time | C(z) (1), Point: 2 | yr, Point: 2 | Gamma, Point: 2
    0 | 0.706995 | 0.0101237 | 2.88552
    0.1 | 0.198811 | 0.100406 | 1.90129
    0.2 | 0.103054 | 0.20011 | 1.73569
    0.3 | 0.151303 | 0.300044 | 1.72675
    0.4 | 0.243962 | 0.400017 | 1.77202
    0.5 | 0.349786 | 0.5 | 1.84791
    0.6 | 0.459244 | 0.599983 | 1.95211
    0.7 | 0.570088 | 0.699956 | 2.09969
    0.8 | 0.679852 | 0.79989 | 2.35479
    0.9 | 0.787973 | 0.899594 | 3.15958
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
Plots
  pg8: PlotGroup1D "1D Plot Group 8" | data = dset1
    lngr1: LineGraph on all domains | expr = PI0; xdata = expr; xdataexpr = x
  pg9: PlotGroup1D "1D Plot Group 9" | data = dset2
    lngr1: LineGraph on all domains | expr = PIn; xdata = expr; xdataexpr = x
  pg10: PlotGroup1D "1D Plot Group 10" | data = dset3
    lngr1: LineGraph on all domains | expr = z; xdata = expr; xdataexpr = x
  pg11: PlotGroup1D "1D Plot Group 11" | data = dset1
    ptgr1: PointGraph on boundaries 2 | data = dset3; expr = yr
    ptgr2: PointGraph on boundaries 2 | data = dset3; expr = C(z)
  pg12: PlotGroup1D "1D Plot Group 12" | data = dset1
    ptgr1: PointGraph on boundaries 2 | data = dset3; expr = err

Exports
  data1: Data
    data = dset3
    expr = z
    filename = /Users/gilliam/Desktop/collect_13/research_13/reg_monograph/EA_DG_Mono/COMSOL/Chapter2/Chap2Ex3/matlab_figs/surf_data.txt