// COMSOL Multiphysics 5.0.1.276 model "Chap2Ex4_SISO_DampedWaveEquation.mph"
// Chap2Ex4 SISO DampedWaveEquation
// Outline of the model tree

Parameters
  L = 1
  Mr = 1
  beta = 0.5
  Ad = 0.25
  gamma = 0.5
  k1 = 1

Variables
  var1 "Variables 1"
    Gamma1 = real(1/C(PI1))
    rCPI2i = real(1/C(PI2))
    iCPI2i = imag(1/C(PI2))
    rCPIt2 = real(C(PIt2))
    iCPIt2 = imag(C(PIt2))
    Gamma2 = (-rCPI2i*rCPIt2+iCPI2i*iCPIt2)
    Gamma3 = (-rCPI2i*iCPIt2-iCPI2i*rCPIt2)
    w1 = Mr
    w2 = Ad*sin(beta*t)
    w3 = Ad*cos(beta*t)
    Gamma = Gamma1*w1+Gamma2*w2+Gamma3*w3
    err = w1-C(z)
    Bin = -1
    Bd = -1

Couplings
  aveop1: Average on boundaries 3 | opname = C

Probes
  var1: GlobalVariable "Global Variable Probe 1" | expr = Gamma1; table = tbl4
  var2: GlobalVariable "Global Variable Probe 2" | expr = Gamma2; table = tbl4
  var3: GlobalVariable "Global Variable Probe 3" | expr = Gamma3; table = tbl4

Geometry
  geom1 "Geometry 1" (1D, length unit m)
    i1: Interval | intervals = many; p = 0,L/2, 3/4*L,L
    fin: Finalize "Form Union"

Physics
  c: CoefficientFormPDE on all domains
    dependent variable PI = {PI1, PI2, PIt2}
    cfeq1: CoefficientFormPDE (default)
      c = 1
      a = diag{0, i*2*gamma*beta-beta^2, i*2*gamma*beta-beta^2}
      f = {0, 0, 0}
      da = 0
    zflx1: ZeroFluxBoundary "Zero Flux 1" (default)
    init1: init "Initial Values 1" (default)
    flux1: FluxBoundary "Flux/Source 1" on boundaries 2 | g = {Bin, Bin, 0}
    dir2: DirichletBoundary "Dirichlet Boundary Condition 2" on boundaries 1 | r = {0, 0, 0}
    flux2: FluxBoundary "Flux/Source 2" on boundaries 4 | g = {0, 0, Bd}; q = k1
  c2: CoefficientFormPDE on all domains
    dependent variable z
    cfeq1: CoefficientFormPDE (default) | c = 1; f = 0; ea = 1; da = 2*gamma
    zflx1: ZeroFluxBoundary "Zero Flux 1" (default)
    init1: init "Initial Values 1" (default) | z = 16*(1-x)^2*x^2; zt = 0.5*sin(pi*x)^2
    flux1: FluxBoundary "Flux/Source 1" on boundaries 2 | g = Bin*Gamma
    dir2: DirichletBoundary "Dirichlet Boundary Condition 2" on boundaries 1 | r = 0
    flux2: FluxBoundary "Flux/Source 2" on boundaries 4 | g = Bd*w2; q = k1

Mesh
  mesh1 "Mesh 1" (physics-controlled)
    size: MeshSizeDefault | hauto = 3

Studies
  std1 "Study 1"
    stat: Stationary | solve for = {c}
  std2 "Study 2"
    time: Transient "Time Dependent"
      tlist = range(0,0.1,30)
      rtol = 0.000001
      physselection = c
      solve for = {c2}
      usesol = on
      notsolmethod = sol
      notstudy = std1

Solver configurations
  sol1 "Solver 1" (study std1)
    v1: Variables "Dependent Variables 1"
    s1: Stationary "Stationary Solver 1" | stol = 0.0000010
      dDef: Direct
      fc1: FullyCoupled
  sol2 "Solver 2" (study std2)
    v1: Variables "Dependent Variables 1"
    t1: Time "Time-Dependent Solver 1" | tlist = range(0,0.1,30); atolglobal = 0.0000010; maxorder = 2
      dDef: Direct
      fc1: FullyCoupled

Datasets
  dset1: Solution | solution = sol1
  dset2: Solution | solution = sol2
  dset3: Solution "Probe Solution 3" | solution = sol1

Derived values
  gev1: EvalGlobal "Global Variable Probe 1" | data = dset3; table = tbl4; expr = Gamma1
  gev2: EvalGlobal "Global Variable Probe 2" | data = dset3; table = tbl4; expr = Gamma2
  gev3: EvalGlobal "Global Variable Probe 3" | data = dset3; table = tbl4; expr = Gamma3

Tables
  tbl1: Table
    // Global Evaluation 1 (C(X))
    Gamma1 (1) | Gamma2 (1) | Gamma3 (1)
    16 | -2.14808 | -0.0372847
  tbl2: Table
    // Point Evaluation 1 (z)
    Dependent variable z (1), Point: 1
    0
  tbl3: Table
    // Point Evaluation 1 (z)
    Time | Gradient of z, x component (1/m), Point: 1
    30 | 11.7977
  tbl4: Table "Probe Table 4"
    Gamma1 (1) | Gamma2 (1) | Gamma3 (1)
    -3.2 | -1.1927 | -0.0152593

Plots
  pg1: PlotGroup1D "1D Plot Group 1" | data = dset1
    lngr1: LineGraph on all domains | expr = PI1; xdata = expr; xdataexpr = x
    lngr2: LineGraph on all domains | expr = PI2; xdata = expr; xdataexpr = x
    lngr3: LineGraph on all domains | expr = PIt2; xdata = expr; xdataexpr = x
  pg2: PlotGroup1D "1D Plot Group 2" | data = dset2
    lngr1: LineGraph on all domains | expr = z; xdata = expr; xdataexpr = x
  pg3: PlotGroup1D "1D Plot Group 3" | data = dset2
    ptgr1: PointGraph on boundaries 1 | expr = err
  pg4: PlotGroup1D "1D Plot Group 4" | data = dset2
    ptgr1: PointGraph on boundaries 1 | expr = w1
    ptgr2: PointGraph on boundaries 1 | expr = C(z)
  pg5: PlotGroup1D "Probe 1D Plot Group 5"
    tblp1: Table "Probe Table Graph 1" | table = tbl4