// COMSOL Multiphysics 5.0.1.276 model "CHAP2_DG_ex2_5_MIMO_HeatEquation.mph"
// CHAP2 DG ex2 5 MIMO HeatEquation
// Outline of the model tree

Parameters
  L = 1.2
  x1 = 0.2
  x2 = 0.4
  x3 = 0.6
  x4 = 0.8
  x5 = 1
  alpha1 = 1
  alpha2 = 2
  beta = 0.5
  Mr1 = 0.5
  Mr2 = 0.25
  Md = 1
  Ar1 = 0.25
  Ar2 = 0.5
  Ad = 0.75
  k0 = 1
  k1 = 1

Variables
  var1 "Variables 1a"
    G11 = C1(X1)
    G12 = C1(X2)
    G21 = C2(X1)
    G22 = C2(X2)
    DETG = G11*G22-G12*G21
    g11 = G22/DETG
    g12 = -G12/DETG
    g21 = -G21/DETG
    g22 = G11/DETG
  var2 "Variables 2a"
    Gamma11 = g11
    Gamma12 = g21
    Gamma21 = g12
    Gamma22 = g22
    Gamma31 = g11*(0-C1(PIt3))+g12*(0-C2(PIt3))
    Gamma32 = g21*(0-C1(PIt3))+g22*(0-C2(PIt3))
    Gamma41 = g11*(1-C1(PIt4))+g12*(0-C2(PIt4))
    Gamma42 = g21*(1-C1(PIt4))+g22*(0-C2(PIt4))
    Gamma51 = g11*(0-C1(PIt5))+g12*(0-C2(PIt5))
    Gamma52 = g21*(0-C1(PIt5))+g22*(0-C2(PIt5))
    Gamma61 = g11*(0-C1(PIt6))+g12*(1-C2(PIt6))
    Gamma62 = g21*(0-C1(PIt6))+g22*(1-C2(PIt6))
    Gamma71 = g11*(0-C1(PIt7))+g12*(0-C2(PIt7))
    Gamma72 = g21*(0-C1(PIt7))+g22*(0-C2(PIt7))
    Gamma81 = g11*(0-C1(PIt8))+g12*(0-C2(PIt8))
    Gamma82 = g21*(0-C1(PIt8))+g22*(0-C2(PIt8))
    Gamma91 = g11*(0-C1(PIt9))+g12*(0-C2(PIt9))
    Gamma92 = g21*(0-C1(PIt9))+g22*(0-C2(PIt9))
  var3 "Variables 3a"
    w1 = Mr1
    w2 = Mr2
    w3 = Md
    w4 = Ar1*cos(alpha1*t)
    w5 = Ar1*sin(alpha1*t)
    w6 = Ar2*cos(alpha2*t)
    w7 = Ar2*sin(alpha2*t)
    w8 = Ad*cos(beta*t)
    w9 = Ad*sin(beta*t)
    Gamma1 = Gamma11*w1+Gamma21*w2+Gamma31*w3+Gamma41*w4+Gamma51*w5+Gamma61*w6+Gamma71*w7+Gamma81*w8+Gamma91*w9
    Gamma2 = Gamma12*w1+Gamma22*w2+Gamma32*w3+Gamma42*w4+Gamma52*w5+Gamma62*w6+Gamma72*w7+Gamma82*w8+Gamma92*w9
    d = w3+w8
    yr1 = w1+w4
    yr2 = w2+w6
    e1 = C1(z)-yr1
    e2 = C2(z)-yr2
    Bin1 = -1
    Bin2 = -1
    Bd = -1

Couplings
  aveop1: Average on boundaries 3 | opname = C1
  aveop2: Average on boundaries 5 | opname = C2

Probes
  var1: GlobalVariable "Global Variable Probe 1" | expr = Gamma11; table = tbl13
  var2: GlobalVariable "Global Variable Probe 2" | expr = Gamma12; table = tbl13
  var3: GlobalVariable "Global Variable Probe 3" | expr = Gamma21; table = tbl13
  var4: GlobalVariable "Global Variable Probe 4" | expr = Gamma22; table = tbl13
  var5: GlobalVariable "Global Variable Probe 5" | expr = Gamma31; table = tbl13
  var6: GlobalVariable "Global Variable Probe 6" | expr = Gamma32; table = tbl13
  var7: GlobalVariable "Global Variable Probe 7" | expr = Gamma41; table = tbl13
  var8: GlobalVariable "Global Variable Probe 8" | expr = Gamma42; table = tbl13
  var9: GlobalVariable "Global Variable Probe 9" | expr = Gamma51; table = tbl13
  var10: GlobalVariable "Global Variable Probe 10" | expr = Gamma52; table = tbl13
  var11: GlobalVariable "Global Variable Probe 11" | expr = Gamma61; table = tbl13
  var12: GlobalVariable "Global Variable Probe 12" | expr = Gamma62; table = tbl13
  var13: GlobalVariable "Global Variable Probe 13" | expr = Gamma71; table = tbl13
  var14: GlobalVariable "Global Variable Probe 14" | expr = Gamma72; table = tbl13
  var15: GlobalVariable "Global Variable Probe 15" | expr = Gamma81; table = tbl13
  var16: GlobalVariable "Global Variable Probe 16" | expr = Gamma82; table = tbl13
  var17: GlobalVariable "Global Variable Probe 17" | expr = Gamma91; table = tbl13
  var18: GlobalVariable "Global Variable Probe 18" | expr = Gamma92; table = tbl13

Geometry
  geom1 "Geometry 1" (1D, length unit m)
    i1: Interval | intervals = many; p = 0,x1,x2,x3,x4,x5,L
    fin: Finalize "Form Union"

Physics
  c: CoefficientFormPDE "PDE" on all domains
    dependent variable Exo = {X1, X2}
    cfeq1: CoefficientFormPDE (default) | c = {1, 0, 0, 1}; f = {0, 0}; da = {0, 0, 0, 0}
    zflx1: ZeroFluxBoundary "Zero Flux 1" (default)
    init1: init "Initial Values 1" (default)
    flux1: FluxBoundary "Flux/Source 1" on boundaries 2 | g = {Bin1, 0}; q = {0, 0, 0, 0}
    flux2: FluxBoundary "Flux/Source 2" on boundaries 4 | g = {0, Bin2}; q = {0, 0, 0, 0}
    flux3: FluxBoundary "Flux/Source 3" on boundaries 1 | g = {0, 0}; q = {k0, 0, 0, k0}
    flux4: FluxBoundary "Flux/Source 4" on boundaries 7 | q = {k1, 0, 0, k1}
  c2: CoefficientFormPDE "PDE 2" on all domains
    dependent variable PI1
    cfeq1: CoefficientFormPDE (default) | c = 1; f = 0; da = 0
    zflx1: ZeroFluxBoundary "Zero Flux 1" (default)
    init1: init "Initial Values 1" (default)
    flux1: FluxBoundary "Flux/Source 1" on boundaries 2 | g = Bin1*Gamma11; q = 0
    flux2: FluxBoundary "Flux/Source 2" on boundaries 4 | g = Bin2*Gamma12; q = 0
    flux3: FluxBoundary "Flux/Source 3" on boundaries 1 | q = k0
    flux4: FluxBoundary "Flux/Source 4" on boundaries 7 | q = k1
  c3: CoefficientFormPDE "PDE 3" on all domains
    dependent variable PI2
    cfeq1: CoefficientFormPDE (default) | c = 1; f = 0; da = 0
    zflx1: ZeroFluxBoundary "Zero Flux 1" (default)
    init1: init "Initial Values 1" (default)
    flux1: FluxBoundary "Flux/Source 1" on boundaries 2 | g = Bin1*Gamma21; q = 0
    flux2: FluxBoundary "Flux/Source 2" on boundaries 4 | g = Bin2*Gamma22; q = 0
    flux3: FluxBoundary "Flux/Source 3" on boundaries 1 | q = k0
    flux4: FluxBoundary "Flux/Source 4" on boundaries 7 | q = k1
  c4: CoefficientFormPDE "PDE 4" on all domains
    dependent variable PI3 = {PI3, PIt3}
    cfeq1: CoefficientFormPDE (default) | c = {1, 0, 0, 1}; f = {0, 0}; da = {0, 0, 0, 0}
    zflx1: ZeroFluxBoundary "Zero Flux 1" (default)
    init1: init "Initial Values 1" (default)
    flux1: FluxBoundary "Flux/Source 1" on boundaries 2 | g = {Bin1*Gamma31, 0}; q = {0, 0, 0, 0}
    flux2: FluxBoundary "Flux/Source 2" on boundaries 4 | g = {Bin2*Gamma32, 0}; q = {0, 0, 0, 0}
    flux3: FluxBoundary "Flux/Source 3" on boundaries 6 | g = {Bd, Bd}; q = {0, 0, 0, 0}
    flux4: FluxBoundary "Flux/Source 4" on boundaries 1 | q = {k0, 0, 0, k0}
    flux5: FluxBoundary "Flux/Source 5" on boundaries 7 | q = {k1, 0, 0, k1}
  c5: CoefficientFormPDE "PDE 5" on all domains
    dependent variable PI45 = {PI4, PI5, PIt4, PIt5}
    cfeq1: CoefficientFormPDE (default)
      c = {1, 0, 0, 0, 0, 1, 0, 0, 0, 0, 1, 0, 0, 0, 0, 1}
      a = {0, -alpha1, 0, -alpha1, alpha1, 0, alpha1, 0, 0, 0, 0, 0, 0, 0, 0, 0}
      f = {0, 0, 0, 0}
      da = {0, 0, 0, 0, 0, 0, 0, 0, 0, 0, 0, 0, 0, 0, 0, 0}
    zflx1: ZeroFluxBoundary "Zero Flux 1" (default)
    init1: init "Initial Values 1" (default)
    flux1: FluxBoundary "Flux/Source 1" on boundaries 2
      g = {Bin1*Gamma41, Bin1*Gamma51, 0, 0}
      q = {0, 0, 0, 0, 0, 0, 0, 0, 0, 0, 0, 0, 0, 0, 0, 0}
    flux2: FluxBoundary "Flux/Source 2" on boundaries 4
      g = {Bin2*Gamma42, Bin2*Gamma52, 0, 0}
      q = {0, 0, 0, 0, 0, 0, 0, 0, 0, 0, 0, 0, 0, 0, 0, 0}
    flux3: FluxBoundary "Flux/Source 3" on boundaries 1 | q = {k0, 0, 0, 0, 0, k0, 0, 0, 0, 0, k0, 0, 0, 0, 0, k0}
    flux4: FluxBoundary "Flux/Source 4" on boundaries 7 | q = {k1, 0, 0, 0, 0, k1, 0, 0, 0, 0, k1, 0, 0, 0, 0, k1}
  c6: CoefficientFormPDE "PDE 6" on all domains
    dependent variable PI67 = {PI6, PI7, PIt6, PIt7}
    cfeq1: CoefficientFormPDE (default)
      c = {1, 0, 0, 0, 0, 1, 0, 0, 0, 0, 1, 0, 0, 0, 0, 1}
      a = {0, -alpha2, 0, -alpha2, alpha2, 0, alpha2, 0, 0, 0, 0, 0, 0, 0, 0, 0}
      f = {0, 0, 0, 0}
      da = {0, 0, 0, 0, 0, 0, 0, 0, 0, 0, 0, 0, 0, 0, 0, 0}
    zflx1: ZeroFluxBoundary "Zero Flux 1" (default)
    init1: init "Initial Values 1" (default)
    flux1: FluxBoundary "Flux/Source 1" on boundaries 2
      g = {Bin1*Gamma61, Bin1*Gamma71, 0, 0}
      q = {0, 0, 0, 0, 0, 0, 0, 0, 0, 0, 0, 0, 0, 0, 0, 0}
    flux2: FluxBoundary "Flux/Source 2" on boundaries 4
      g = {Bin2*Gamma62, Bin2*Gamma72, 0, 0}
      q = {0, 0, 0, 0, 0, 0, 0, 0, 0, 0, 0, 0, 0, 0, 0, 0}
    flux3: FluxBoundary "Flux/Source 3" on boundaries 1 | q = {k0, 0, 0, 0, 0, k0, 0, 0, 0, 0, k0, 0, 0, 0, 0, k0}
    flux4: FluxBoundary "Flux/Source 4" on boundaries 7 | q = {k1, 0, 0, 0, 0, k1, 0, 0, 0, 0, k1, 0, 0, 0, 0, k1}
  c7: CoefficientFormPDE "PDE 7" on all domains
    dependent variable PI89 = {PI8, PI9, PIt8, PIt9}
    cfeq1: CoefficientFormPDE (default)
      c = {1, 0, 0, 0, 0, 1, 0, 0, 0, 0, 1, 0, 0, 0, 0, 1}
      a = {0, -beta, 0, -beta, beta, 0, beta, 0, 0, 0, 0, 0, 0, 0, 0, 0}
      f = {0, 0, 0, 0}
      da = {0, 0, 0, 0, 0, 0, 0, 0, 0, 0, 0, 0, 0, 0, 0, 0}
    zflx1: ZeroFluxBoundary "Zero Flux 1" (default)
    init1: init "Initial Values 1" (default)
    flux1: FluxBoundary "Flux/Source 1" on boundaries 2
      g = {Bin1*Gamma81, Bin1*Gamma91, 0, 0}
      q = {0, 0, 0, 0, 0, 0, 0, 0, 0, 0, 0, 0, 0, 0, 0, 0}
    flux2: FluxBoundary "Flux/Source 2" on boundaries 4
      g = {Bin2*Gamma82, Bin2*Gamma92, 0, 0}
      q = {0, 0, 0, 0, 0, 0, 0, 0, 0, 0, 0, 0, 0, 0, 0, 0}
    flux3: FluxBoundary "Flux/Source 3" on boundaries 6
      g = {Bd, 0, Bd, 0}
      q = {0, 0, 0, 0, 0, 0, 0, 0, 0, 0, 0, 0, 0, 0, 0, 0}
    flux4: FluxBoundary "Flux/Source 4" on boundaries 1 | q = {k0, 0, 0, 0, 0, k0, 0, 0, 0, 0, k0, 0, 0, 0, 0, k0}
    flux5: FluxBoundary "Flux/Source 5" on boundaries 7 | q = {k1, 0, 0, 0, 0, k1, 0, 0, 0, 0, k1, 0, 0, 0, 0, k1}
  c8: CoefficientFormPDE "PDE 8" on all domains
    dependent variable z
    cfeq1: CoefficientFormPDE (default) | c = 1; f = 0; da = 1
    zflx1: ZeroFluxBoundary "Zero Flux 1" (default)
    init1: init "Initial Values 1" (default) | z = cos(pi*x/L)
    flux1: FluxBoundary "Flux/Source 1" on boundaries 2 | g = Bin1*Gamma1; q = 0
    flux2: FluxBoundary "Flux/Source 2" on boundaries 4 | g = Bin2*Gamma2; q = 0
    flux3: FluxBoundary "Flux/Source 3" on boundaries 6 | g = Bd*d; q = 0
    flux4: FluxBoundary "Flux/Source 4" on boundaries 1 | q = k0
    flux5: FluxBoundary "Flux/Source 5" on boundaries 7 | q = k1

Mesh
  mesh1 "Mesh 1" (physics-controlled)
    size: MeshSizeDefault | hauto = 2

Studies
  std1 "Study 1"
    stat: Stationary | physselection = c; solve for = {c}
  std2 "Study 2"
    stat: Stationary
      physselection = c
      solve for = {c2, c3, c4, c5, c6, c7}
      usesol = on
      notsolmethod = sol
      notstudy = std1
  std8 "Study 3"
    time: Transient "Time Dependent"
      physselection = c
      solve for = {c8}
      usesol = on
      notsolmethod = sol
      notstudy = std2
      tlist = range(0,0.01,10)
      rtol = 0.0001
      initmethod = init

Solver configurations
  sol1 "Solver 1" (study std1)
    v1: Variables "Dependent Variables 1"
    s1: Stationary "Stationary Solver 1"
      dDef: Direct
      fc1: FullyCoupled
  sol2 "Solver 2" (study std2)
    // same settings as sol1
  sol3 "Solver 3" (study std8)
    v1: Variables "Dependent Variables 1"
    t1: Time "Time-Dependent Solver 1" | tlist = range(0,0.01,10); atolglobal = 0.000010
      dDef: Direct
      fc1: FullyCoupled

Datasets
  dset1: Solution | solution = sol1
  dset2: Solution | solution = sol2
  dset3: Solution | solution = sol3
  dset4: Solution "Probe Solution 4" | solution = sol3

Derived values
  gev1: EvalGlobal "Global Evaluation 1" | data = dset3; table = tbl7; expr = e1
  gev2: EvalGlobal "Global Evaluation 2" | data = dset3; table = tbl8; expr = C2(PI9)
  pev1: EvalPoint "Point Evaluation 1" | data = dset3; table = tbl9; expr = yr2
  pev2: EvalPoint "Point Evaluation 2" | data = dset3; table = tbl11; expr = yr2
  gev3: EvalGlobal "Global Variable Probe 1" | data = dset4; table = tbl13; expr = Gamma11
  gev4: EvalGlobal "Global Variable Probe 2" | data = dset4; table = tbl13; expr = Gamma12
  gev5: EvalGlobal "Global Variable Probe 3" | data = dset4; table = tbl13; expr = Gamma21
  gev6: EvalGlobal "Global Variable Probe 4" | data = dset4; table = tbl13; expr = Gamma22
  gev7: EvalGlobal "Global Variable Probe 5" | data = dset4; table = tbl13; expr = Gamma31
  gev8: EvalGlobal "Global Variable Probe 6" | data = dset4; table = tbl13; expr = Gamma32
  gev9: EvalGlobal "Global Variable Probe 7" | data = dset4; table = tbl13; expr = Gamma41
  gev10: EvalGlobal "Global Variable Probe 8" | data = dset4; table = tbl13; expr = Gamma42
  gev11: EvalGlobal "Global Variable Probe 9" | data = dset4; table = tbl13; expr = Gamma51
  gev12: EvalGlobal "Global Variable Probe 10" | data = dset4; table = tbl13; expr = Gamma52
  gev13: EvalGlobal "Global Variable Probe 11" | data = dset4; table = tbl13; expr = Gamma61
  gev14: EvalGlobal "Global Variable Probe 12" | data = dset4; table = tbl13; expr = Gamma62
  gev15: EvalGlobal "Global Variable Probe 13" | data = dset4; table = tbl13; expr = Gamma71
  gev16: EvalGlobal "Global Variable Probe 14" | data = dset4; table = tbl13; expr = Gamma72
  gev17: EvalGlobal "Global Variable Probe 15" | data = dset4; table = tbl13; expr = Gamma81
  gev18: EvalGlobal "Global Variable Probe 16" | data = dset4; table = tbl13; expr = Gamma82
  gev19: EvalGlobal "Global Variable Probe 17" | data = dset4; table = tbl13; expr = Gamma91
  gev20: EvalGlobal "Global Variable Probe 18" | data = dset4; table = tbl13; expr = Gamma92
  pev3: EvalPoint "Point Evaluation 3" on boundaries 3 | data = dset3; table = tbl14; expr = yr2

Tables
  tbl1: Table
    // Global Evaluation 1 (g11)
    DETG (1)
    3.33333e-05
  tbl2: Table
    // Global Evaluation 2 (C1(PI1))
    C2(PI1) (1) | C1(PI1) (1)
    -2 | -1
  tbl3: Table
    // Global Evaluation 2 (C1(PI1))
    C1(PI1) | C2(PI1) (1)
    2 | 1
  tbl6: Table
    // Global Evaluation 2 (C1(PI1))
    C2(PI7) (1) | C1(PI8) (1) | C2(PI8) (1) | C1(PI9) (1) | C2(PI9) (1)
    1.9269e-15 | -8.41443e-17 | -9.48338e-17 | -1.25649e-16 | -9.04292e-17
  tbl7: Table
    // Global Evaluation 1 (Gamma1)
    Time | e1
    0 | -0.300747
    0.1 | -0.399527
    0.2 | -0.41663
    0.3 | -0.389338
    0.4 | -0.349065
    0.5 | -0.307776
    0.6 | -0.269477
    0.7 | -0.235242
    0.8 | -0.2051
    0.9 | -0.178724
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  tbl8: Table
    // Global Evaluation 2 (C1(PI8))
    Time | C2(PI9) (1)
    0 | -8.46717e-15
    0.1 | -8.46717e-15
    0.2 | -8.46717e-15
    0.3 | -8.46717e-15
    0.4 | -8.46717e-15
    0.5 | -8.46717e-15
    0.6 | -8.46717e-15
    0.7 | -8.46717e-15
    0.8 | -8.46717e-15
    0.9 | -8.46717e-15
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  tbl9: Table
    // Point Evaluation 1 (C1(z))
    Time | yr2
    0 | 0
    0.1 | 0
    0.2 | 0
    0.3 | 0
    0.4 | 0
    0.5 | 0
    0.6 | 0
    0.7 | 0
    0.8 | 0
    0.9 | 0
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  tbl11: Table
    // Point Evaluation 2 (C1(z))
    Time | yr2
    0 | 0
    0.1 | 0
    0.2 | 0
    0.3 | 0
    0.4 | 0
    0.5 | 0
    0.6 | 0
    0.7 | 0
    0.8 | 0
    0.9 | 0
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  tbl14: Table
    // Point Evaluation 3 (C1(z))
    Time | C1(z) (1), Point: 3 | yr1, Point: 3 | C2(z) (1), Point: 3 | yr2, Point: 3
    0 | 0.470769 | 0.75 | -0.394976 | 0.75
    0.01 | 0.461249 | 0.749988 | -0.337293 | 0.7499
    0.02 | 0.450868 | 0.74995 | -0.281162 | 0.7496
    0.03 | 0.43874 | 0.749888 | -0.229551 | 0.7491
    0.04 | 0.425712 | 0.7498 | -0.183003 | 0.748401
    0.05 | 0.412604 | 0.749688 | -0.14128 | 0.747502
    0.06 | 0.399989 | 0.74955 | -0.103882 | 0.746404
    0.07 | 0.388193 | 0.749388 | -0.070319 | 0.745108
    0.08 | 0.377419 | 0.7492 | -0.040101 | 0.743614
    0.09 | 0.367752 | 0.748988 | -0.0128226 | 0.741922
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
Plots
  pg1: PlotGroup1D "1D Plot Group 1" | data = dset1
    lngr1: LineGraph on all domains | expr = X1; xdata = expr; xdataexpr = x
    lngr2: LineGraph on all domains | expr = X2; xdata = expr; xdataexpr = x
  pg2: PlotGroup1D "1D Plot Group 2" | data = dset2
    lngr1: LineGraph on all domains | data = dset2; expr = PI9; xdata = expr; xdataexpr = x
  pg3: PlotGroup1D "1D Plot Group 3" | data = dset3
    lngr1: LineGraph on all domains | expr = z; xdata = expr; xdataexpr = x
  pg4: PlotGroup1D "1D Plot Group 4" | data = dset1
    ptgr1: PointGraph on boundaries 1 | data = dset3; expr = e1
    ptgr2: PointGraph on boundaries 1 | data = dset3; expr = e2
  pg5: PlotGroup1D "1D Plot Group 5" | data = dset3
    ptgr1: PointGraph on boundaries 3 | data = dset3; expr = C1(z)
    ptgr2: PointGraph on boundaries 3 | data = dset3; expr = yr1
  pg6: PlotGroup1D "1D Plot Group 6" | data = dset1
    ptgr1: PointGraph on boundaries 5 | data = dset3; expr = C2(z)
    ptgr2: PointGraph on boundaries 5 | data = dset3; expr = yr2
  pg7: PlotGroup1D "Probe 1D Plot Group 7"
    tblp1: Table "Probe Table Graph 1" | table = tbl13

Exports
  data1: Data | data = dset3; expr = z; filename = sol_z; location = regulargrid; regulargridx1 = 30
  data2: Data | data = dset3; expr = {C1(z), yr1}; filename = y1_yr1_data; location = regulargrid; regulargridx1 = 30
  data3: Data
    data = dset3
    expr = z
    filename = /Users/gilliam/Desktop/collect_13/research_13/reg_monograph/EA_DG_Mono/COMSOL/Chapter2/chap2Ex5/matlab_figs/surf_data.txt
  data4: Data
    data = dset3
    expr = z
    filename = /Users/gilliam/Desktop/collect_13/research_13/reg_monograph/EA_DG_Mono/COMSOL/Chapter2/chap2Ex5/matlab_figs/surf_data.txt