// COMSOL Multiphysics 5.0.1.276 model "Chap3_Ex1_CoupledWaveEq.mph"
// Chap3 Ex1 CoupledWaveEq
// Outline of the model tree

Parameters
  Mr = 1  // Signal Amplitude
  alpha = 1  // Signal Period: 2 pi/alpha
  beta = 1  // Damping
  M = 0.1  // Collocated Mass

Variables
  var1 "Variables 1"
    a = x^2+1  // Spring Stiffness
    G = C(Xx)
    Gamma1 = (1-C(PIt1x))/G
    Gamma2 = (0-C(PIt2x))/G
    w1 = Mr*sin(alpha*t)
    w2 = Mr*cos(alpha*t)
    u = Gamma1*w1+Gamma2*w2
    yr = w1
    e = C(qx)-yr

Couplings
  intop1: Integration on boundaries 1 | opname = C

Probes
  var1: GlobalVariable "Probe Gamma1" | expr = Gamma1; table = tbl4
  var2: GlobalVariable "Probe Gamma2" | expr = Gamma2; table = tbl4

Geometry
  geom1 "Geometry 1" (1D, length unit m)
    i1: Interval | p2 = pi; p = {0, pi}
    fin: Finalize "Form Union"

Physics
  c: CoefficientFormPDE "Unit Input" on all domains
    dependent variable X
    cfeq1: CoefficientFormPDE (default) | c = a; a = -alpha^2; f = 0; da = 0
    zflx1: ZeroFluxBoundary "Zero Flux 1" (default)
    init1: init "Initial Values 1" (default)
    dir1: DirichletBoundary "Dirichlet Homogeneous BC" on boundaries 2 | r = 0
    flux1: FluxBoundary "Bin*1" on boundaries 1 | g = 1; q = -M*alpha^2
  c2: CoefficientFormPDE "Regulator Equations" on all domains
    dependent variable PI12 = {PI1, PI2, PIt1, PIt2}
    cfeq1: CoefficientFormPDE (default)
      c = {a, 0, 0, 0, 0, a, 0, 0, 0, 0, a, 0, 0, 0, 0, a}
      a = {-alpha^2, beta*alpha, 0, beta*alpha, -beta*alpha, -alpha^2, -beta*alpha, 0, 0, 0, -alpha^2, 0, 0, 0, 0, -alpha^2}
      f = {0, 0, 0, 0}
      da = {0, 0, 0, 0, 0, 0, 0, 0, 0, 0, 0, 0, 0, 0, 0, 0}
    zflx1: ZeroFluxBoundary "Zero Flux 1" (default)
    init1: init "Initial Values 1" (default)
    dir1: DirichletBoundary "Dirichlet Homogeneous BC" on boundaries 2 | r = {0, 0, 0, 0}
    flux1: FluxBoundary "Bin*(beta*S*PI(0)+Gamma)" on boundaries 1
      g = {alpha*beta*PI2+Gamma1, -alpha*beta*PI1+Gamma2, alpha*beta*PI2, -alpha*beta*PI1}
      q = {-M*alpha^2, 0, 0, 0, 0, -M*alpha^2, 0, 0, 0, 0, -M*alpha^2, 0, 0, 0, 0, -M*alpha^2}
  c3: CoefficientFormPDE "Closed Loop System" on all domains
    dependent variable q
    cfeq1: CoefficientFormPDE (default) | c = a; f = 0; ea = 1; da = beta
    zflx1: ZeroFluxBoundary "Zero Flux 1" (default)
    init1: init "Initial Values 1" (default) | q = 0
    dir1: DirichletBoundary "Dirichlet Homogeneous BC" on boundaries 2 | r = 0
    flux1: FluxBoundary "-a*qx=-M*qtt-beta*qt+u" on boundaries 1 | g = -M*qtt-beta*qt+u

Mesh
  mesh1 "Mesh 1" (physics-controlled)
    size: MeshSizeDefault | hauto = 3

Studies
  std1 "Study 1"
    stat: Stationary | physselection = c; solve for = {c}
  std2 "Study 2"
    stat: Stationary | physselection = c; solve for = {c2}; usesol = on; notsolmethod = sol; notstudy = std1
  std3 "Study 3"
    time: Transient "Time Dependent"
      physselection = c
      solve for = {c3}
      usesol = on
      notsolmethod = sol
      notstudy = std2
      tlist = range(0,0.01,6*pi)
      rtol = 0.000001

Solver configurations
  sol1 "Solver 1" (study std1)
    v1: Variables "Dependent Variables 1"
    s1: Stationary "Stationary Solver 1" | stol = 0.0000010
      dDef: Direct
      fc1: FullyCoupled
  sol2 "Solver 2" (study std2)
    // same settings as sol1
  sol3 "Solver 3" (study std3)
    v1: Variables "Dependent Variables 1"
    t1: Time "Time-Dependent Solver 1"
      tlist = range(0,0.01,6*pi)
      atolglobal = 0.0000010
      timemethod = bdf
      tstepsbdf = intermediate
      maxorder = 5
      dDef: Direct
      fc1: FullyCoupled

Datasets
  dset1: Solution | solution = sol1
  dset2: Solution | solution = sol2
  dset3: Solution | solution = sol3
  dset4: Solution "Probe Solution 4" | solution = sol3

Derived values
  gev2: EvalGlobal "Probe Gamma1" | data = dset4; table = tbl4; expr = Gamma1
  gev3: EvalGlobal "Probe Gamma2" | data = dset4; table = tbl4; expr = Gamma2
  gev1: EvalGlobal "Global Evaluation 1" | data = dset2; table = tbl1; expr = Gamma1
  pev1: EvalPoint "Point Evaluation 1" on boundaries 1 | data = dset2; table = tbl2; expr = Gamma2
  pev2: EvalPoint "Point Evaluation 2" on boundaries 1 | data = dset3; table = tbl3; expr = Gamma

Tables
  tbl1: Table
    // Global Evaluation 1 (Gamma1)
    Gamma1 (1) | Gamma1 (1)
    -2.48148 | -2.00716
  tbl2: Table
    // Point Evaluation 1 (C(zx))
    Gamma1 (1), Point: 1 | Gamma2 (1), Point: 1 | Gamma2 (1), Point: 1
    -2.00716 | -0.625745 | -0.625745

Plots
  pg1: PlotGroup1D "1D Plot Group 1" | data = dset1
    lngr1: LineGraph on all domains | expr = Xx; xdata = expr; xdataexpr = x
  pg2: PlotGroup1D "1D Plot Group 2" | data = dset2
    lngr1: LineGraph on all domains | expr = PI1x; xdata = expr; xdataexpr = x
    lngr2: LineGraph on all domains | expr = PI2x; xdata = expr; xdataexpr = x
  pg3: PlotGroup1D "1D Plot Group 3" | data = dset3
    lngr1: LineGraph on domains 1 | data = dset3; expr = q; xdata = expr; xdataexpr = x
  pg4: PlotGroup1D "1D Plot Group 4" | data = dset3
    ptgr1: PointGraph on boundaries 1 | data = dset3; expr = e
  pg5: PlotGroup1D "1D Plot Group 5" | data = dset1
    ptgr1: PointGraph on boundaries 1 | data = dset3; expr = qx
    ptgr2: PointGraph on boundaries 1 | data = dset3; expr = w1
  pg7: PlotGroup1D "Probe 1D Plot Group 7"
    tblp1: Table "Probe Table Graph 1" | table = tbl4

Exports
  data1: Data
    data = dset3
    expr = {z, }
    descr = {Dependent variable z, }
    filename = /Users/gilliam/Desktop/collect_13/research_13/outreg_unbdd_6_04/example/wave_eq/wave_data.txt
    location = grid
    gridx1 = range(0,1,100)
  data2: Data
    data = dset3
    expr = {z, , }
    descr = {Dependent variable z, , }
    filename = wave_data
    location = regulargrid
    gridx1 = range(0,1,100)
    regulargridx1 = 50
    sort = off
  data3: Data
    data = dset3
    expr = zx
    filename = /Users/gilliam/Desktop/collect_13/research_13/outreg_unbdd_6_04/example/wave_eq/wave_data_zx.txt
    location = regulargrid
    regulargridx1 = 50
  data4: Data
    data = dset3
    expr = z
    filename = /Users/gilliam/Desktop/collect_13/research_13/reg_monograph/EA_DG_Mono/COMSOL/Chapter3/Chap3Ex1_Coupled_Wave_Eq/matlab_figs/surf_data.txt