// COMSOL Multiphysics 5.0.1.276 model "Ex3_2_Rayleigh_beam.mph"
// Ex3 2 Rayleigh beam
// Outline of the model tree

Parameters
  a = 3  // Angular Inertial constant (E A)/(rho A)
  b = 1  // Damping Constant C/(rho A)
  c = 4  // Stiffness constant (E I)/(rho A)
  alpha = 2  // Frequency of the signal to be tracked
  alpha2 = alpha^2  // Frequency square
  Mr = 3  // Amplitude of the signal to be tracked
  L = pi  // beam lenght

Variables
  var1 "Variables 1a"
    G = C(Xx)
    Gamma1 = (0-C(PIt1x))/G
    Gamma2 = (-1/alpha-C(PIt2x))/G
    w1 = Mr*sin(alpha*t)
    w2 = Mr*cos(alpha*t)
    u = Gamma1*w1+Gamma2*w2
    Cq = C(qxt)
    yr = w1
    e = Cq-yr

Couplings
  intop1: Integration on boundaries 1 | opname = C

Geometry
  geom1 "Geometry 1" (1D, length unit m)
    i1: Interval | p2 = L; p = {0, L}
    fin: Finalize "Form Union"

Physics
  c: CoefficientFormPDE "Unit Input" on all domains
    dependent variable X = {X, Xa}
    cfeq1: CoefficientFormPDE (default) | c = {1, 0, 0, c}; a = {0, -alpha2, -1, -alpha2*a}; f = {0, 0}; da = {0, 0, 0, 0}
    zflx1: ZeroFluxBoundary "Zero Flux 1" (default)
    init1: init "Initial Values 1" (default)
    dir1: DirichletBoundary "Homogeneous Dirichlet BC" on boundaries 2 | r = {0, 0}
    dir2: DirichletBoundary "Input Bin*1" on boundaries 1 | r = {0, 1}
  c2: CoefficientFormPDE "Regulator Eqs" on all domains
    dependent variable PI = {PI1, PIa1, PI2, PIa2, PIt1, DPIt1, PIt2, DPIt2}
    cfeq1: CoefficientFormPDE (default)
      c = {1, 0, 0, 0, 0, 0, 0, 0, 0, c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}
      a = {0, -alpha2, 0, 0, 0, 0, 0, 0, -1, -alpha2*a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}
      f = {0, 0, 0, 0, 0, 0, 0, 0}
      da = {0, 0, 0, 0, 0, 0, 0, 0, 0, 0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}
    zflx1: ZeroFluxBoundary "Zero Flux 1" (default)
    init1: init "Initial Values 1" (default)
    dir1: DirichletBoundary "Homogeneous Dirichlet BC" on boundaries 2 | r = {0, 0, 0, 0, 0, 0, 0, 0}
    dir2: DirichletBoundary "Input Bin*Gamma" on boundaries 1 | r = {0, Gamma1, 0, Gamma2, 0, 0, 0, 0}
  c3: CoefficientFormPDE "Closed Loop System" on all domains
    dependent variable q = {q, qa}
    cfeq1: CoefficientFormPDE (default)
      c = {1, 0, 0, c}
      a = {0, 0, -1, 0}
      f = {0, 0}
      ea = {0, 1, 0, a}
      da = {0, 0, 0, b}
    zflx1: ZeroFluxBoundary "Zero Flux 1" (default)
    init1: init "Initial Values 1" (default)
    dir1: DirichletBoundary "Homogeneous Dirichlet BC" on boundaries 2 | r = {0, 0}
    dir2: DirichletBoundary "Input Bin*u" on boundaries 1
      r = {0, u}
      useDirichletCondition = {1, 1}
      weakConstraints = 0

Mesh
  mesh1 "Mesh 1" (physics-controlled)
    size: MeshSizeDefault | hauto = 2

Studies
  std1 "Study 1"
    stat: Stationary | solve for = {c}
  std2 "Study 2"
    stat: Stationary | physselection = c; solve for = {c2}; usesol = on; notsolmethod = sol; notstudy = std1
  std3 "Study 3"
    time: Transient "Time Dependent"
      tlist = range(0,0.01,50)
      rtol = 0.00001
      physselection = c
      solve for = {c3}
      usesol = on
      notsolmethod = sol
      notstudy = std2

Solver configurations
  sol1 "Solver 1" (study std1)
    v1: Variables "Dependent Variables 1"
    s1: Stationary "Stationary Solver 1" | stol = 0.000010
      dDef: Direct
      fc1: FullyCoupled
  sol2 "Solver 2" (study std2)
    // same settings as sol1
  sol3 "Solver 3" (study std3)
    v1: Variables "Dependent Variables 1"
    t1: Time "Time-Dependent Solver 1" | tlist = range(0,0.01,50); atolglobal = 0.0000010
      dDef: Direct
      fc1: FullyCoupled

Datasets
  dset1: Solution | solution = sol1
  dset2: Solution | solution = sol2
  dset3: Solution | solution = sol3

Derived values
  gev1: EvalGlobal "Global Evaluation 1" | data = dset2; table = tbl1; expr = Gamma2
  gev2: EvalGlobal "Global Evaluation 2" | data = dset2; table = tbl3; expr = C(PI2x)
  pev1: EvalPoint "Point Evaluation 1" on boundaries 1 | data = dset3; table = tbl4; expr = u
  pev2: EvalPoint "Point Evaluation 2" on boundaries 1 | data = dset3; table = tbl5; expr = u

Tables
  tbl1: Table
    // Global Evaluation 1 (G)
    Gamma1 (1) | Gamma2 (1)
    0.330593 | -0.516832
  tbl2: Table
    // Global Evaluation 2 (C(PI1x))
    C(PI2x) (1/m) | C(PI1x) (1/m) | G (1/m) | G (1/m) | C(PI1x) (1/m) | C(PI2x) (1/m)
    -0.5 | -0.385418 | 0.385418 | 0.385418 | -2.53825e-14 | -0.5
  tbl5: Table
    // Point Evaluation 2 (Cz)
    Time | Cz, Point: 1 | w1, Point: 1 | Gamma, Point: 1
    0 | -0.0122363 | 0 | 1.5505
    0.01 | -1.148 | 0.059996 | 1.53035
    0.02 | -1.87902 | 0.119968 | 1.5096
    0.03 | -2.11377 | 0.179892 | 1.48824
    0.04 | -2.04473 | 0.239744 | 1.46628
    0.05 | -1.90793 | 0.2995 | 1.44374
    0.06 | -1.79203 | 0.359137 | 1.42062
    0.07 | -1.66141 | 0.418629 | 1.39693
    0.08 | -1.49192 | 0.477955 | 1.37268
    0.09 | -1.32833 | 0.537089 | 1.34789
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
Plots
  pg1: PlotGroup1D "1D Plot Group 1" | data = dset1
    lngr1: LineGraph on all domains | expr = X; xdata = expr; xdataexpr = x
    lngr2: LineGraph on all domains | expr = Xx; xdata = expr; xdataexpr = x
  pg2: PlotGroup1D "1D Plot Group 2" | data = dset2
    lngr1: LineGraph on all domains | expr = PI1; xdata = expr; xdataexpr = x
    lngr2: LineGraph on all domains | expr = PIt1; xdata = expr; xdataexpr = x
    lngr3: LineGraph on all domains | expr = PI2; xdata = expr; xdataexpr = x
    lngr4: LineGraph on all domains | expr = PIt2; xdata = expr; xdataexpr = x
  pg3: PlotGroup1D "1D Plot Group 3" | data = dset2
    lngr1: LineGraph on all domains | expr = DPI1; xdata = expr; xdataexpr = x
    lngr2: LineGraph on all domains | expr = DPIt1; xdata = expr; xdataexpr = x
    lngr3: LineGraph on all domains | expr = DPI2; xdata = expr; xdataexpr = x
    lngr4: LineGraph on all domains | expr = DPIt2; xdata = expr; xdataexpr = x
  pg4: PlotGroup1D "1D Plot Group 4" | data = dset3
    lngr1: LineGraph on all domains | expr = q; xdata = expr; xdataexpr = x
  pg5: PlotGroup1D "1D Plot Group 5" | data = dset3
    glob1: Global | expr = {yr, Cq}
  pg6: PlotGroup1D "1D Plot Group 6" | data = dset3
    glob1: Global | expr = e

Exports
  data1: Data | data = dset3; expr = z; filename = rayleigh_z_harm_data
  data2: Data
    data = dset3
    expr = z
    filename = /Users/gilliam/Desktop/collect_13/research_13/reg_monograph/EA_DG_Mono/COMSOL/Chapter3/Chap3Ex2_Damped_Rayleigh_beam/surf_data.txt