// COMSOL Multiphysics 5.0.1.276 model "Ex3_3_clamped_plate.mph"
// Ex3 3 clamped plate
// Outline of the model tree

Parameters
  R = 2  // plate radius
  EI = 1  // stiffness coefficient
  rho = 1  // density
  delta = 1  // damping coefficient
  Md = 1  // laod constant
  beta = pi  // frequency
  theta = 5  // mesh par1
  n = 360/theta  // mesh par2
  hr = 2*pi*R/n  // mesh par3
  n_dis = floor((R/3)/hr)+1  // mesh par4

Variables
  var1 "Variables 1a"
    r = sqrt(x^2+y^2)
    G11 = C1(X1)
    G12 = C1(X2)
    G21 = C2(X1)
    G22 = C2(X2)
    DET = G11*G22-G12*G21
    g11 = G22/DET
    g12 = -G12/DET
    g21 = -G21/DET
    g22 = G11/DET
    Gamma11 = g11*(0-C1(PIt1))+g12*(0-C2(PIt1))
    Gamma21 = g21*(0-C1(PIt1))+g22*(0-C2(PIt1))
    Gamma12 = g11*(0-C1(PIt2))+g12*(0-C2(PIt2))
    Gamma22 = g21*(0-C1(PIt2))+g22*(0-C2(PIt2))
    Bd1 = sin(4*pi*r/R)
    Bd2 = cos(4*pi*r/R)
    w1 = Md*sin(beta*t)
    w2 = Md*cos(beta*t)
    d = Bd1*w1+Bd2*w2
    u1 = Gamma11*w1+Gamma12*w2
    u2 = Gamma21*w1+Gamma22*w2
  var2 "Variables 2a" on domains 1-4, 6-8, 11-18, 20
    Bin = 0
  var3 "Variables 3a" on domains 5, 19
    sr = 3/R*(r-R/3)
    Bin = -1+2*sr
  var4 "Variables 4a" on domains 9, 10
    sr = 3/R*(r-2*R/3)
    Bin = -1+2*sr

Couplings
  aveop1: Average on points 13 | opname = C1
  aveop2: Average on boundaries 24, 26, 33 | opname = C2

Probes
  var1: GlobalVariable "Global Variable Probe 1" | expr = Gamma11; table = tbl1
  var2: GlobalVariable "Global Variable Probe 2" | expr = Gamma12; table = tbl1
  var3: GlobalVariable "Global Variable Probe 3" | expr = Gamma21; table = tbl1
  var4: GlobalVariable "Global Variable Probe 4" | expr = Gamma22; table = tbl1

Geometry
  geom1 "Geometry 1" (2D, length unit m)
    c1: Circle | rot = 0; r = R
    pt1: Point
    c2: Circle | r = 1/3*R
    c3: Circle | r = 2/3*R
    pol1: Polygon | type = open; x = -R R; y = {0, 0}
    rot1: Rotate | input = pol1; rot = 5
    pol2: Polygon | type = open; x = -R R; y = {0, 0}
    rot2: Rotate | input = pol2; rot = -5
    pol3: Polygon | type = open; x = {0, 0}; y = -R R
    rot4: Rotate | input = pol3; rot = 5
    pol4: Polygon | type = open; x = {0, 0}; y = -R R
    rot3: Rotate | input = pol4; rot = -5
    uni1: Union | input = c1, c2, c3, rot1, rot2, rot3, rot4
    spl1: Split | input = uni1
    uni2: Union | input = spl1(15), spl1(9); intbnd = off; edge = all
    uni3: Union | input = spl1(17), spl1(18); intbnd = off; edge = all
    uni4: Union | input = spl1(14), spl1(16); intbnd = off; edge = all
    uni5: Union | input = spl1(7), spl1(8); intbnd = off; edge = all
    fin: Finalize "Form Union"
    igv1: IgnoreVertices | input = fin(1) entities 1, 4, 7, 16-18, 20-22, 31, 34, 37

Physics
  c2: CoefficientFormPDE "Unit Input1" on all domains
    dependent variable X1 = {X1, Xa1}
    cfeq1: CoefficientFormPDE (default)
      c = {{1, 0, 0, 1}, {0, 0, 0, 0}, {0, 0, 0, 0}, {EI, 0, 0, EI}}
      a = {0, -rho*beta^2, -1, 0}
      f = {0, 0}
      da = {0, 0, 0, 0}
    zflx1: ZeroFluxBoundary "Zero Flux 1" (default)
    init1: init "Initial Values 1" (default)
    dir1: DirichletBoundary "Dirichlet Boundary Condition 1" on boundaries 21-23, 30, 31, 40, 41, 44 | r = {0, 0}
    src1: SourceTerm "Bin1" on domains 5, 19 | f = {0, Bin}
  phys1: CoefficientFormPDE "Unit Input2" on all domains
    dependent variable X2 = {X2, Xa2}
    cfeq1: CoefficientFormPDE (default)
      c = {{1, 0, 0, 1}, {0, 0, 0, 0}, {0, 0, 0, 0}, {EI, 0, 0, EI}}
      a = {0, -rho*beta^2, -1, 0}
      f = {0, 0}
      da = {0, 0, 0, 0}
    zflx1: ZeroFluxBoundary "Zero Flux 1" (default)
    init1: init "Initial Values 1" (default)
    dir1: DirichletBoundary "Dirichlet Boundary Condition 1" on boundaries 21-23, 30, 31, 40, 41, 44 | r = {0, 0}
    src1: SourceTerm "Bin2" on domains 9, 10 | f = {0, Bin}
  phys2: CoefficientFormPDE "Regulator Eqs" on all domains
    dependent variable PI = {PI1, PIa1, PIt1, PIta1, PI2, PIa2, PIt2, PIta2}
    cfeq1: CoefficientFormPDE (default)
      c = 
        {1, 0, 0, 1}
        {0, 0, 0, 0}
        {0, 0, 0, 0}
        {0, 0, 0, 0}
        {0, 0, 0, 0}
        {0, 0, 0, 0}
        {0, 0, 0, 0}
        {0, 0, 0, 0}
        {0, 0, 0, 0}
        {EI, 0, 0, EI}
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      a = {0, -rho*beta^2, 0, 0, 0, 0, 0, 0, -1, 0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}
      f = {0, Bd1, 0, Bd1, 0, Bd2, 0, Bd2}
      da = {0, 0, 0, 0, 0, 0, 0, 0, 0, 0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}
    zflx1: ZeroFluxBoundary "Zero Flux 1" (default)
    init1: init "Initial Values 1" (default)
    dir1: DirichletBoundary "Dirichlet Boundary Condition 1" on boundaries 21-23, 30, 31, 40, 41, 44
      r = {0, 0, 0, 0, 0, 0, 0, 0}
    src1: SourceTerm "Bin1" on domains 5, 19 | f = {0, Bin*Gamma11, 0, 0, 0, Bin*Gamma12, 0, 0}
    src2: SourceTerm "Bin2" on domains 9, 10 | f = {0, Bin*Gamma21, 0, 0, 0, Bin*Gamma22, 0, 0}
  c: CoefficientFormPDE "Close Loop System" on all domains
    dependent variable q = {q, qa}
    cfeq1: CoefficientFormPDE (default)
      c = {{1, 0, 0, 1}, {0, 0, 0, 0}, {0, 0, 0, 0}, {EI, 0, 0, EI}}
      a = {0, 0, -1, 0}
      f = {0, d}
      ea = {0, rho, 0, 0}
      da = {0, 0, 0, delta}
      ga = {{0, 0}, {0, 0}}
    zflx1: ZeroFluxBoundary "Zero Flux 1" (default)
    init1: init "Initial Values 1" (default)
    dir1: DirichletBoundary "Dirichlet Boundary Condition 1" on boundaries 21-23, 30, 31, 40, 41, 44
      r = {0, 0}
      useDirichletCondition = {1, 1}
    src1: SourceTerm "Bin1" on domains 5, 19 | f = {0, Bin*u1}
    src2: SourceTerm "Bin2" on domains 9, 10 | f = {0, Bin*u2}

Mesh
  mesh1 "Mesh 1"
    size: MeshSizeDefault | hmax = hr; hauto = 5; custom = on
    dis7: Distribution on boundaries 1, 2, 6, 7, 15, 16, 19, 20
      type = predefined
      elemcount = n_dis
      elemratio = 1
      method = arithmetic
      symmetric = off
      reverse = off
    dis2: Distribution on boundaries 3, 4, 8, 9, 13, 14, 17, 18
      type = predefined
      elemcount = 1.5*n_dis
      elemratio = 1
      method = arithmetic
      symmetric = off
      reverse = off
    dis3: Distribution on boundaries 5, 10-12 | type = number; numelem = 3*n_dis
    map1: Map "Mapped 1" on domains 1-6, 9-12, 15-20
    fq1: FreeQuad on remaining entities

Studies
  std1 "Study 1"
    stat: Stationary | physselection = c; solve for = {c2, phys1}
  std3 "Study 2"
    stat: Stationary | solve for = {phys2}; usesol = on; notsolmethod = sol; notstudy = std1
  std4 "Study 3"
    time: Transient "Time Dependent"
      tlist = range(0,0.025,15)
      rtol = 0.00001
      solve for = {c}
      usesol = on
      notsolmethod = sol
      notstudy = std3

Solver configurations
  sol1 "Solver 1" (study std1)
    v1: Variables "Dependent Variables 1"
    s1: Stationary "Stationary Solver 1" | stol = 0.000000010
      dDef: Direct
      fc1: FullyCoupled
  sol2 "Solver 2" (study std3)
    // same settings as sol1
  sol3 "Solver 3" (study std4)
    v1: Variables "Dependent Variables 1"
    t1: Time "Time-Dependent Solver 1" | tlist = range(0,0.025,15); atolglobal = 0.0000010
      dDef: Direct
      fc1: FullyCoupled

Datasets
  dset1: Solution | solution = sol1
  dset2: Solution | solution = sol2
  dset3: Solution "Probe Solution 3" | solution = sol3
  dset4: Solution | solution = sol3

Derived values
  gev1: EvalGlobal "Global Variable Probe 1" | data = dset3; table = tbl1; expr = Gamma11
  gev2: EvalGlobal "Global Variable Probe 2" | data = dset3; table = tbl1; expr = Gamma12
  gev3: EvalGlobal "Global Variable Probe 3" | data = dset3; table = tbl1; expr = Gamma21
  gev4: EvalGlobal "Global Variable Probe 4" | data = dset3; table = tbl1; expr = Gamma22
  gev5: EvalGlobal "Global Evaluation 5" | data = dset4; table = tbl4; expr = u2

Tables
  tbl1: Table "Probe Table 1"
    , Global Variable Probe 1 | , Global Variable Probe 2 | , Global Variable Probe 3 | , Global Variable Probe 4
    1.44513 | -7.26252 | -0.805207 | -13.9097
  tbl2: Table
    // Global Evaluation 5 (g11)
    g22
    -73.8864
  tbl3: Table
    // Point Evaluation 1 (C1(w))
    Time | C1(w), Point: 4 | C2(w), Point: 4 | f, Point: 4 | Gamma1, Point: 4 | Gamma2, Point: 4
    0 | 2.99686e-10 | 6.19119e-13 | -0.5 | -7.26296 | -13.9095
    0.025 | 0.000122689 | -5.16429e-05 | -0.430511 | -7.12732 | -13.9299
    0.05 | -3.25718e-05 | -0.000116276 | -0.358368 | -6.94773 | -13.8644
    0.075 | -0.000598008 | -0.000143023 | -0.284015 | -6.72531 | -13.7133
    0.1 | -0.00125075 | -0.000167309 | -0.207912 | -6.46143 | -13.4778
    0.125 | -0.00174714 | -0.000205678 | -0.130526 | -6.15771 | -13.1591
    0.15 | -0.0020102 | -0.000246442 | -0.052336 | -5.81602 | -12.7593
    0.175 | -0.00205787 | -0.000274313 | 0.0261769 | -5.43848 | -12.2809
    0.2 | -0.00193146 | -0.000286072 | 0.104528 | -5.02741 | -11.7267
    0.225 | -0.00168703 | -0.000286177 | 0.182236 | -4.58534 | -11.1002
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  tbl4: Table
    // Global Evaluation 5 (C1(q))
    Time (s) | C1(q) | C2(q) | u1 | u2
    0 | 6.74038e-10 | 1.54808e-11 | -7.26252 | -13.9097
    0.025 | 0.000126035 | -5.13117e-05 | -7.12675 | -13.93
    0.05 | -2.4185e-05 | -0.000116076 | -6.94704 | -13.8644
    0.075 | -0.000589459 | -0.000142334 | -6.7245 | -13.7133
    0.1 | -0.00124468 | -0.000166229 | -6.4605 | -13.4777
    0.125 | -0.00174332 | -0.000205041 | -6.15667 | -13.159
    0.15 | -0.00201039 | -0.000245956 | -5.81488 | -12.7592
    0.175 | -0.00206036 | -0.000274268 | -5.43724 | -12.2807
    0.2 | -0.00193603 | -0.000286371 | -5.02608 | -11.7264
    0.225 | -0.00169231 | -0.000286325 | -4.58393 | -11.0999
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
Plots
  pg1: PlotGroup2D "2D Plot Group 1" | data = dset1
    surf1: Surface | expr = X1
  pg2: PlotGroup2D "2D Plot Group 2" | data = dset1
    surf1: Surface | expr = X2
  pg3: PlotGroup2D "2D Plot Group 3" | data = dset2
    surf1: Surface | expr = PI1
  pg5: PlotGroup2D "2D Plot Group 5" | data = dset4
    surf2: Surface | expr = q
      hght1: Height "Height Expression 1" | expr = q
  pg6: PlotGroup1D "1D Plot Group 6" | data = dset4
    glob1: Global | expr = {C1(q), C2(q)}
  pg7: PlotGroup1D "Probe Plot Group 7"
    tblp1: Table "Probe Table Graph 1" | table = tbl1

Exports
  anim1: Animation
    giffilename = /Users/gilliam/Desktop/collect_13/research_13/reg_monograph/EA_DG_Mono/COMSOL/Chapter3/Chap3Ex3_Vibrations_2D_plate/animate.gif
    size = manual
    width = 800
    height = 600
    options = off
    axes = on
  img1: Image2D "2D Image 1"
    size = manual
    unit = px
    width = 800
    height = 600
    pngfilename = /Users/gilliam/Desktop/collect_13/research_13/reg_monograph/EA_DG_Mono/COMSOL/Chapter3/Chap3Ex3_Vibrations_2D_plate/surf_t10.png
    options = off
    axes = on
  plot1: Plot
  img2: Image2D "2D Image 2" | size = manual; unit = px; width = 800; height = 600; options = off; axes = on