// COMSOL Multiphysics 5.0.1.276 model "IncommensuratePeriodicSignals.mph"
// IncommensuratePeriodicSignals
// Outline of the model tree

Parameters
  c = 0.1
  n = 1
  n_in = 3
  n_out = n_in
  n_d = 1
  l = 1  // Function Index
  lmax = n_out+n_d
  k = 0  // coefficient index
  kmax = 20

Functions
  an23: Analytic "P(l)" | funcname = P; expr = pi*((l==1)+(l==4))+sqrt(2)*(l==2)+sqrt(3)*(l==3); args = l
  an5: Analytic "alpha_lk=pi/P(l)*k" | funcname = alpha; expr = pi/P(l)*k; args = {l, k}
  an1: Analytic "Cos(alpha_lk*t)" | funcname = FourierCos; expr = cos( alpha(l,k) * t ); args = {l, k, t}
  an2: Analytic "Sin(alpha_lk*t)" | funcname = FourierSin; expr = sin( alpha(l,k) * t ); args = {l, k, t}
  an6: Analytic "Cos Output Q_lk1" | funcname = Q1; expr = (in_i==l); args = {in_i, l}
  an7: Analytic "Sin Output Q_lk2" | funcname = Q2; expr = 0; args = {in_i, l}
  an8: Analytic "Cos Disturbance P_lk1" | funcname = P1; expr = (l==n_out+1); args = l
  an9: Analytic "Sin Disturbance P_lk2" | funcname = P2; expr = 0; args = l
  an10: Analytic "delta_input" | funcname = delta; expr = (ni==n); args = {n, ni}
  an11: Analytic "yr1" | funcname = yr1; expr = 1+cos(t)+sin(2*t)+cos(5*t)+sin(10*t); args = t
  pw1: Piecewise "yr2" | funcname = yr2; arg = x; extrap = periodic; pieces = {{0, sqrt(2), x/sqrt(2)}, {sqrt(2), 2*sqrt(2), (2-x/sqrt(2))}}
  pw2: Piecewise "yr3" | funcname = yr3; arg = x; extrap = periodic; pieces = {{0, sqrt(3), (x/sqrt(3))}, {sqrt(3), 2*sqrt(3), (2-x/sqrt(3))}}
  an20: Analytic "d1" | funcname = d1; expr = 2+sin(t)+cos(2*t)+sin(5*t)+cos(10*t); args = t

Variables
  var8 "Gamma"
    Gamma11 = 0+(-2.59551446923744E+00)*(Q1(1,l)-C1(PIt1))+(1.61132805650271E+00)*(Q1(2,l)-C2(PIt1))+(1.13278596347482E+00)*(Q1(3,l)-C3(PIt1))
    Gamma12 = 0+(-2.59551446923744E+00)*(Q2(1,l)-C1(PIt2))+(1.61132805650271E+00)*(Q2(2,l)-C2(PIt2))+(1.13278596347482E+00)*(Q2(3,l)-C3(PIt2))
    Gamma21 = 0+(-8.45090233310403E+02)*(Q1(1,l)-C1(PIt1))+(1.70618227648515E+02)*(Q1(2,l)-C2(PIt1))+(8.58287466141936E+02)*(Q1(3,l)-C3(PIt1))
    Gamma22 = 0+(-8.45090233310403E+02)*(Q2(1,l)-C1(PIt2))+(1.70618227648515E+02)*(Q2(2,l)-C2(PIt2))+(8.58287466141936E+02)*(Q2(3,l)-C3(PIt2))
    Gamma31 = 0+(2.01080507896101E+02)*(Q1(1,l)-C1(PIt1))+(-4.07833107239756E+01)*(Q1(2,l)-C2(PIt1))+(-2.00927620030446E+02)*(Q1(3,l)-C3(PIt1))
    Gamma32 = 0+(2.01080507896101E+02)*(Q2(1,l)-C1(PIt2))+(-4.07833107239756E+01)*(Q2(2,l)-C2(PIt2))+(-2.00927620030446E+02)*(Q2(3,l)-C3(PIt2))
  var9 "u(t)"
    u1 = 0+(-2.59551446923744e+00)*FourierCos(1,0,t)+(-1.98179718450793e+00)*FourierCos(1,1,t)+(2.32152459432247e+00)*FourierSin(1,1,t)+(-4.32328433081556e+00)*FourierCos(1,2,t)+(-1.82085017634358e-01)*FourierSin(1,2,t)+(1.05007375496959e+01)*FourierCos(1,5,t)+(5.47178449056662e+00)*FourierSin(1,5,t)+(2.26559626709095e+01)*FourierCos(1,10,t)+(2.56453002889368e+01)*FourierSin(1,10,t)+(8.05664028251355e-01)*FourierCos(2,0,t)+(2.92496792481706e-01)*FourierCos(2,1,t)+(1.26051337432406e+00)*FourierSin(2,1,t)+(6.31021985783925e-01)*FourierCos(2,3,t)+(-1.86085296581970e-01)*FourierSin(2,3,t)+(2.35696375915398e-01)*FourierCos(2,5,t)+(-6.59699776969679e-01)*FourierSin(2,5,t)+(-3.10845504400551e-01)*FourierCos(2,7,t)+(-7.74202923944069e-01)*FourierSin(2,7,t)+(-8.65892067071395e-01)*FourierCos(2,9,t)+(-5.60612786534354e-01)*FourierSin(2,9,t)+(-1.29310297909516e+00)*FourierCos(2,11,t)+(-4.04369952791776e-02)*FourierSin(2,11,t)+(-1.45993555443933e+00)*FourierCos(2,13,t)+(7.25599413154245e-01)*FourierSin(2,13,t)+(-1.25305818313511e+00)*FourierCos(2,15,t)+(1.62896557681932e+00)*FourierSin(2,15,t)+(-5.96002329552422e-01)*FourierCos(2,17,t)+(2.51637898364076e+00)*FourierSin(2,17,t)+(5.34233934648090e-01)*FourierCos(2,19,t)+(3.20015762928143e+00)*FourierSin(2,19,t)+(5.66392981737410e-01)*FourierCos(3,0,t)+(-2.98175759397726e-01)*FourierCos(3,1,t)+(5.58338802310101e-01)*FourierSin(3,1,t)+(8.79889285314007e-02)*FourierCos(3,3,t)+(1.95883267896880e-01)*FourierSin(3,3,t)+(9.92897017960147e-02)*FourierCos(3,5,t)+(1.00817700060222e-01)*FourierSin(3,5,t)+(9.94068232496211e-02)*FourierCos(3,7,t)+(4.85205194740910e-02)*FourierSin(3,7,t)+(9.56263324937565e-02)*FourierCos(3,9,t)+(1.42918800448928e-02)*FourierSin(3,9,t)+(8.87319080750952e-02)*FourierCos(3,11,t)+(-1.06984048109847e-02)*FourierSin(3,11,t)+(7.95494436209931e-02)*FourierCos(3,13,t)+(-2.91928005967719e-02)*FourierSin(3,13,t)+(6.98544141151200e-02)*FourierCos(3,15,t)+(-4.18977987445431e-02)*FourierSin(3,15,t)+(6.28191607103400e-02)*FourierCos(3,17,t)+(-4.99211381579125e-02)*FourierSin(3,17,t)+(6.23307502301081e-02)*FourierCos(3,19,t)+(-5.70143364906539e-02)*FourierSin(3,19,t)+(-2.97199101480283e-01)*FourierCos(4,0,t)+(-2.77791464124732e-02)*FourierCos(4,1,t)+(-1.59892247712227e-01)*FourierSin(4,1,t)+(-1.91514010327423e-01)*FourierCos(4,2,t)+(4.39777391451778e-02)*FourierSin(4,2,t)+(5.00684975592518e-02)*FourierCos(4,5,t)+(-2.93130142826418e-01)*FourierSin(4,5,t)+(-1.68746416972405e-01)*FourierCos(4,10,t)+(-2.03700681810645e-01)*FourierSin(4,10,t)
    u2 = 0+(-845.09023331)*FourierCos(1,0,t)+(-564.98408068)*FourierCos(1,1,t)+(790.119635025)*FourierSin(1,1,t)+(-1357.20890359)*FourierCos(1,2,t)+(249.797804559)*FourierSin(1,2,t)+(1.62326065401e-12)*FourierCos(1,3,t)+(1.15763515265e-12)*FourierSin(1,3,t)+(1.37946208894e-12)*FourierCos(1,4,t)+(4784.3323281)*FourierCos(1,5,t)+(-47.823415102)*FourierSin(1,5,t)+(1.56962912106e-12)*FourierCos(1,6,t)+(8.76701347282e-12)*FourierCos(1,7,t)+(4.20394897371e-12)*FourierSin(1,7,t)+(7.09665152225e-12)*FourierCos(1,8,t)+(-1.10762378531e-11)*FourierSin(1,8,t)+(3.82370752051e-12)*FourierCos(1,9,t)+(-4.86756003819e-12)*FourierSin(1,9,t)+(16740.9991727)*FourierCos(1,10,t)+(4680.32318607)*FourierSin(1,10,t)+(3.45347807495e-12)*FourierCos(1,11,t)+(-1.30720371167e-11)*FourierSin(1,11,t)+(3.43306460783e-12)*FourierCos(1,12,t)+(1.94970371075e-12)*FourierSin(1,12,t)+(5.92358306194e-12)*FourierCos(1,13,t)+(-2.22331125395e-11)*FourierSin(1,13,t)+(9.77747013619e-12)*FourierCos(1,14,t)+(-2.10562099375e-11)*FourierSin(1,14,t)+(-1.61049781741e-11)*FourierCos(1,15,t)+(-4.87000045589e-11)*FourierSin(1,15,t)+(-2.12702353246e-11)*FourierCos(1,16,t)+(-8.91502432165e-12)*FourierSin(1,16,t)+(-7.06398558148e-12)*FourierCos(1,17,t)+(-7.4391612664e-11)*FourierSin(1,17,t)+(-6.63169790511e-11)*FourierCos(1,18,t)+(-4.54364670065e-11)*FourierSin(1,18,t)+(-1.03588051345e-10)*FourierCos(1,19,t)+(-5.899228512e-11)*FourierSin(1,19,t)+(-1.23421506659e-10)*FourierCos(1,20,t)+(-4.04479484306e-11)*FourierSin(1,20,t)+(85.3091138243)*FourierCos(2,0,t)+(-60.429845357)*FourierCos(2,1,t)+(67.5022468997)*FourierSin(2,1,t)+(-1.26487812796)*FourierCos(2,3,t)+(19.2449879091)*FourierSin(2,3,t)+(4.52262612775)*FourierCos(2,5,t)+(7.97450019275)*FourierSin(2,5,t)+(5.77362095126)*FourierCos(2,7,t)+(2.96203592072)*FourierSin(2,7,t)+(5.60243950661)*FourierCos(2,9,t)+(-0.149025099818)*FourierSin(2,9,t)+(4.79705213716)*FourierCos(2,11,t)+(-2.33746673261)*FourierSin(2,11,t)+(3.63686949746)*FourierCos(2,13,t)+(-3.92566442687)*FourierSin(2,13,t)+(2.25651408478)*FourierCos(2,15,t)+(-5.05398744092)*FourierSin(2,15,t)+(0.731235436347)*FourierCos(2,17,t)+(-5.80150843232)*FourierSin(2,17,t)+(-0.90372835419)*FourierCos(2,19,t)+(-6.22110336627)*FourierSin(2,19,t)+(429.143733071)*FourierCos(3,0,t)+(26.1142979083)*FourierCos(3,1,t)+(535.046864044)*FourierSin(3,1,t)+(252.374514975)*FourierCos(3,3,t)+(-28.2464765185)*FourierSin(3,3,t)+(113.218787525)*FourierCos(3,5,t)+(-198.48110352)*FourierSin(3,5,t)+(2.84501064595e-12)*FourierCos(3,6,t)+(-76.1605441796)*FourierCos(3,7,t)+(-234.693119481)*FourierSin(3,7,t)+(-4.14973748107e-12)*FourierCos(3,8,t)+(1.90096610769e-12)*FourierSin(3,8,t)+(-255.837538313)*FourierCos(3,9,t)+(-150.808138077)*FourierSin(3,9,t)+(1.40672982085e-12)*FourierCos(3,10,t)+(-373.613715413)*FourierCos(3,11,t)+(37.5640770348)*FourierSin(3,11,t)+(-2.69489885074e-11)*FourierCos(3,12,t)+(-2.12535446901e-11)*FourierSin(3,12,t)+(-382.155321201)*FourierCos(3,13,t)+(297.718519131)*FourierSin(3,13,t)+(-7.14317098377e-11)*Fourie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
    u3 = 0+(201.080507896)*FourierCos(1,0,t)+(119.795072441)*FourierCos(1,1,t)+(-203.732897287)*FourierSin(1,1,t)+(332.748329164)*FourierCos(1,2,t)+(-114.408459051)*FourierSin(1,2,t)+(-1336.93869744)*FourierCos(1,5,t)+(311.139362244)*FourierSin(1,5,t)+(-2.87190470531e-12)*FourierCos(1,7,t)+(-1.28631923431e-12)*FourierCos(1,8,t)+(3.84708639124e-12)*FourierSin(1,8,t)+(1.7836383239e-12)*FourierSin(1,9,t)+(-5563.83049672)*FourierCos(1,10,t)+(-65.1618128756)*FourierSin(1,10,t)+(4.4010679908e-12)*FourierSin(1,11,t)+(-1.26685070343e-12)*FourierCos(1,12,t)+(7.72314622613e-12)*FourierSin(1,13,t)+(-1.21169909458e-12)*FourierCos(1,14,t)+(7.81175402454e-12)*FourierSin(1,14,t)+(1.00539579633e-11)*FourierCos(1,15,t)+(1.45720135794e-11)*FourierSin(1,15,t)+(8.01540963605e-12)*FourierCos(1,16,t)+(9.94664815191e-12)*FourierCos(1,17,t)+(2.45071546747e-11)*FourierSin(1,17,t)+(2.7441892067e-11)*FourierCos(1,18,t)+(8.70408782769e-12)*FourierSin(1,18,t)+(4.21162924875e-11)*FourierCos(1,19,t)+(9.49631006819e-12)*FourierSin(1,19,t)+(4.75396877474e-11)*FourierCos(1,20,t)+(-20.391655362)*FourierCos(2,0,t)+(12.6513275526)*FourierCos(2,1,t)+(-19.5832395629)*FourierSin(2,1,t)+(-0.98248229038)*FourierCos(2,3,t)+(-5.69387307689)*FourierSin(2,3,t)+(-2.10955269874)*FourierCos(2,5,t)+(-2.11882852966)*FourierSin(2,5,t)+(-2.21616407078)*FourierCos(2,7,t)+(-0.420729194064)*FourierSin(2,7,t)+(-1.94439069108)*FourierCos(2,9,t)+(0.654330426513)*FourierSin(2,9,t)+(-1.48009832511)*FourierCos(2,11,t)+(1.40254479502)*FourierSin(2,11,t)+(-0.89911717284)*FourierCos(2,13,t)+(1.92073122593)*FourierSin(2,13,t)+(-0.24375027736)*FourierCos(2,15,t)+(2.25046678434)*FourierSin(2,15,t)+(0.459855570491)*FourierCos(2,17,t)+(2.41506143378)*FourierSin(2,17,t)+(1.19903079496)*FourierCos(2,19,t)+(2.42887383806)*FourierSin(2,19,t)+(-100.463810015)*FourierCos(3,0,t)+(-25.9760190866)*FourierCos(3,1,t)+(-130.448102808)*FourierSin(3,1,t)+(-69.0611633894)*FourierCos(3,3,t)+(24.9589482191)*FourierSin(3,3,t)+(-18.0735234749)*FourierCos(3,5,t)+(69.6766602902)*FourierSin(3,5,t)+(46.4572988723)*FourierCos(3,7,t)+(68.534697699)*FourierSin(3,7,t)+(1.18509118558e-12)*FourierCos(3,8,t)+(-1.03371361295e-12)*FourierSin(3,8,t)+(101.756847064)*FourierCos(3,9,t)+(24.9425643375)*FourierSin(3,9,t)+(127.165134745)*FourierCos(3,11,t)+(-53.6330774415)*FourierSin(3,11,t)+(1.19914252505e-11)*FourierCos(3,12,t)+(4.60083814706e-12)*FourierSin(3,12,t)+(104.902215977)*FourierCos(3,13,t)+(-151.572261397)*FourierSin(3,13,t)+(2.3058224599e-11)*FourierCos(3,14,t)+(-1.86747619235e-11)*FourierSin(3,14,t)+(23.5289815939)*FourierCos(3,15,t)+(-245.555260883)*FourierSin(3,15,t)+(1.80412463033e-11)*FourierCos(3,16,t)+(-1.31015996824e-11)*FourierSin(3,16,t)+(-119.039915183)*FourierCos(3,17,t)+(-306.822830369)*FourierSin(3,17,t)+(1.16662470892e-10)*FourierCos(3,18,t)+(4.7878312945e-11)*FourierSin(3,18,t)+(-313.6230814)*FourierCos(3,19,t)+(-304.387662219)*FourierSin(3,19,t)+(-8.87794185079e-11)*FourierCos(3,20,t)+(1.22148341639e-10)*FourierSin(3,20,t)+(83.2608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

Couplings
  aveop1: Average on boundaries 5 | opname = C1
  aveop2: Average on boundaries 4 | opname = C2
  aveop3: Average on boundaries 6 | opname = C3

Probes
  var3: GlobalVariable "C1(Xj)" | probename = var1; expr = C1(X); table = tbl1
  var4: GlobalVariable "C2(Xj)" | probename = var2; expr = C2(X); table = tbl1
  var5: GlobalVariable "C3(Xj)" | probename = var3; expr = C3(X); table = tbl1
  var1: GlobalVariable "Gamma_lk11" | probename = var4; expr = Gamma11; table = tbl1
  var2: GlobalVariable "Gamma_lk12" | probename = var5; expr = Gamma12; table = tbl1
  var6: GlobalVariable "Gamma_lk21" | expr = Gamma21; table = tbl1
  var7: GlobalVariable "Gamma_lk22" | expr = Gamma22; table = tbl1
  var8: GlobalVariable "Gamma_lk31" | expr = Gamma31; table = tbl1
  var9: GlobalVariable "Gamma_lk32" | expr = Gamma32; table = tbl1

Geometry
  geom2 "Geometry 2" (2D, length unit m)
    r1: Rectangle | pos = {-1, 0}; size = {2, 1}
    pol1: Polygon | type = open; x = {-0.25, 0.25}; y = {0.25, 0.75}
    pol2: Polygon | type = open; x = {0.5, 0.5}; y = {0.25, 0.75}
    pol3: Polygon | type = open; x = {-0.5, -0.5}; y = {0.25, 0.75}
    fin: Finalize "Form Union"

Physics
  c: CoefficientFormPDE "Unit Input" on all domains
    dependent variable X
    cfeq1: CoefficientFormPDE (default) | c = {c, 0, 0, c}; f = 0; da = 0
    zflx1: ZeroFluxBoundary "Zero Flux 1" (default)
    init1: init "Initial Values 1" (default)
    flux2: FluxBoundary "Bin1*delta(n,1)" on boundaries 1 | g = delta(n,1)
    flux3: FluxBoundary "Bin2*delta(n,2)" on boundaries 2 | g = delta(n,2); q = 5
    flux4: FluxBoundary "Bin3*delta(n,3)" on boundaries 3 | g = delta(n,3); q = 1
    dir1: DirichletBoundary "Bd*0" on boundaries 7 | r = 0
  c2: CoefficientFormPDE "Regulator Eqs" on all domains
    dependent variable PI = {PI1, PIt1, PI2, PIt2}
    cfeq1: CoefficientFormPDE (default)
      c = {{c, 0, 0, c}, {0, 0, 0, 0}, {0, 0, 0, 0}, {0, 0, 0, 0}, {0, 0, 0, 0}, {c, 0, 0, c}, {0, 0, 0, 0}, {0, 0, 0, 0}, {0, 0, 0, 0}, {0, 0, 0, 0}, {c, 0, 0, c}, {0, 0, 0, 0}, {0, 0, 0, 0}, {0, 0, 0, 0}, {0, 0, 0, 0}, {c, 0, 0, c}}
      a = {0, 0, -alpha(l,k), -alpha(l,k), 0, 0, 0, 0, alpha(l,k), alpha(l,k), 0, 0, 0, 0, 0, 0}
      f = {0, 0, 0, 0}
      da = {0, 0, 0, 0, 0, 0, 0, 0, 0, 0, 0, 0, 0, 0, 0, 0}
    zflx1: ZeroFluxBoundary "Zero Flux 1" (default)
    init1: init "Initial Values 1" (default)
    flux2: FluxBoundary "Bin1*Gamma1" on boundaries 1 | g = {Gamma11, 0, Gamma12, 0}
    flux3: FluxBoundary "Bin2*Gamma2" on boundaries 2
      g = {Gamma21, 0, Gamma22, 0}
      q = {5, 0, 0, 0, 0, 5, 0, 0, 0, 0, 5, 0, 0, 0, 0, 5}
    flux4: FluxBoundary "Bin3*Gamma3" on boundaries 3
      g = {Gamma31, 0, Gamma32, 0}
      q = {1, 0, 0, 0, 0, 1, 0, 0, 0, 0, 1, 0, 0, 0, 0, 1}
    dir1: DirichletBoundary "Bd*P" on boundaries 7 | r = {P1(l), P1(l), P2(l), P2(l)}
  phys1: CoefficientFormPDE "Closed Loop System" on all domains
    dependent variable z
    cfeq1: CoefficientFormPDE (default) | c = {c, 0, 0, c}; f = 0; da = 1
    zflx1: ZeroFluxBoundary "Zero Flux 1" (default)
    init1: init "Initial Values 1" (default) | z = 1
    flux2: FluxBoundary "Bin1*u1" on boundaries 1 | g = u1
    flux3: FluxBoundary "Bin2*u2" on boundaries 2 | g = u2; q = 5
    flux1: FluxBoundary "Bin3*u3" on boundaries 3 | g = u3; q = 1
    dir1: DirichletBoundary "Bd*d1(t)" on boundaries 7 | r = d1(t)

Mesh
  mesh2 "Mesh 2" (physics-controlled)
    size: MeshSizeDefault | hauto = 2

Studies
  std1 "Study 1"
    param: Parametric "Parametric Sweep" | pname = n; plistarr = range(1,1,n_in)
    stat: Stationary | solve for = {c}
  std2 "Study 2"
    param: Parametric "Parametric Sweep"
      sweeptype = filled
      pname = {l, k}
      plistarr = {range(1,1,lmax), range(0,1,kmax)}
    stat: Stationary | solve for = {c2}
  std3 "Study 3"
    time: Transient "Time Dependent" | tlist = range(0,0.0125,14); rtol = 0.00001; solve for = {phys1}

Solver configurations
  sol3 "Solver 3" (study std3)
    v1: Variables "Dependent Variables 1"
    t1: Time "Time-Dependent Solver 1" | tlist = range(0,0.0125,14); rtol = 0.00001; atolglobal = 0.000010
      dDef: Direct
      fc1: FullyCoupled
  sol4 "Solver 4" (study std1)
    v1: Variables "Dependent Variables 1"
    s1: Stationary "Stationary Solver 1" | stol = 0.000010
      dDef: Direct
      p1: Parametric | pname = n; plistarr = range(1,1,n_in); pcontinuationmode = no
      fc1: FullyCoupled
  sol5 "Solver 5" (study std2)
    v1: Variables "Dependent Variables 1"
    s1: Stationary "Stationary Solver 1"
      dDef: Direct
      p1: Parametric
        sweeptype = filled
        pname = {l, k}
        plistarr = {range(1,1,lmax), range(0,1,kmax)}
        pcontinuationmode = no
      fc1: FullyCoupled | linsolver = dDef

Datasets
  dset1: Solution | solution = sol4
  dset2: Solution "Probe Solution 2" | solution = sol3
  dset4: Solution | solution = sol3
  dset5: Solution | solution = sol5

Derived values
  gev1: EvalGlobal "C1(Xj)" | data = dset2; table = tbl1; expr = C1(X)
  gev2: EvalGlobal "C2(Xj)" | data = dset2; table = tbl1; expr = C2(X)
  gev3: EvalGlobal "C3(Xj)" | data = dset2; table = tbl1; expr = C3(X)
  gev4: EvalGlobal "Gamma_lk11" | data = dset2; table = tbl1; expr = Gamma11
  gev5: EvalGlobal "Gamma_lk12" | data = dset2; table = tbl1; expr = Gamma12
  gev6: EvalGlobal "Gamma_lk21" | data = dset2; table = tbl1; expr = Gamma21
  gev7: EvalGlobal "Gamma_lk22" | data = dset2; table = tbl1; expr = Gamma22
  gev8: EvalGlobal "Gamma_lk31" | data = dset2; table = tbl1; expr = Gamma31
  gev9: EvalGlobal "Gamma_lk32" | data = dset2; table = tbl1; expr = Gamma32
  gev10: EvalGlobal "Global Evaluation 10" | data = dset4; table = tbl4; expr = yr1

Tables
  tbl1: Table "Probe Table 1"
    l | k | , Gamma_lk11 | , Gamma_lk12 | , Gamma_lk21 | , Gamma_lk22 | , Gamma_lk31 | , Gamma_lk32
    1 | -2.59551 | 0 | -845.09 | 0 | 201.081 | 0
    1 | -1.9818 | 2.32152 | -564.984 | 790.12 | 119.795 | -203.733
    1 | -0.182085 | 4.32328 | 249.798 | 1357.21 | -114.408 | -332.748
    1 | 2.67075 | 5.70542 | 1520.27 | 1502.67 | -472.545 | -320.514
    1 | 6.3389 | 6.18456 | 3103.74 | 1071.63 | -904.632 | -116.495
    1 | 10.5007 | 5.47178 | 4784.33 | -47.8234 | -1336.94 | 311.139
    1 | 14.8062 | 3.29108 | 6290.67 | -1935.5 | -1675.95 | 977.929
    1 | 18.8933 | -0.560682 | 7329.81 | -4626.62 | -1819.25 | 1880.89
    1 | 22.3641 | -6.18371 | 7604.11 | -8085.71 | -1663.64 | 2991.21
    1 | 24.7746 | -13.5794 | 6816.57 | -12192.8 | -1109.44 | 4249.36
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  tbl4: Table
    // Global Evaluation 10 (u(t))
    Time (s) | C1(z) | C2(z) | C3(z)
    0 | 1 | 1 | 1
    0.0125 | 1.00002 | 1.00002 | 1.00003
    0.025 | 1.01144 | 1.01144 | 1.01159
    0.0375 | 1.15551 | 1.1555 | 1.15584
    0.05 | 1.6205 | 1.62046 | 1.62083
    0.0625 | 2.46297 | 2.46295 | 2.46324
    0.075 | 3.62193 | 3.62215 | 3.62219
    0.0875 | 4.99629 | 4.99749 | 4.99671
    0.1 | 6.48933 | 6.49313 | 6.49015
    0.1125 | 8.02338 | 8.03274 | 8.02496
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
Plots
  pg8: PlotGroup1D "Probe 1D Plot Group 8"
    tblp1: Table "Probe Table Graph 1" | table = tbl2; plotcolumninput = manual
    tblp2: Table "Probe Table Graph 2" | table = tbl3; plotcolumninput = manual
    tblp3: Table "Probe Table Graph 3" | table = tbl1
  pg9: PlotGroup1D "Probe 1D Plot Group 9"
    tblp1: Table "Probe Table Graph 1" | table = tbl1
  pg13: PlotGroup1D "1D Plot Group 13" | data = dset4
    glob1: Global | expr = {yr1(t), C1(z), yr2(t), C2(z), yr3(t), C3(z)}
  pg14: PlotGroup1D "1D Plot Group 14" | data = dset4
    glob1: Global | expr = {yr1(t)-C1(z), yr2(t)-C2(z), yr3(t)-C3(z)}

Exports
  img1: Image1D "1D Image 1"
    size = manual
    unit = px
    width = 800
    height = 600
    pngfilename = fig1
    options = on
    axes = on