// COMSOL Multiphysics 5.0.1.276 model "GenSignalFourierDec_shift_time.mph"
// GenSignalFourierDec shift time
// Outline of the model tree
// Components: mod1 "Fourier Series Coefficient Evaluation", mod2 "Plant"

Parameters
  t0 = -1
  t1 = 1
  p = (t1-t0)/2  // half period
  p2 = 2*p  // period
  l = 1  // Function Index
  lmax = 4
  k = 0  // coefficient index
  kmax = 20
  m = 1  // cos or sin index
  c = 1.
  n = 1

Functions
  an5: Analytic "alpha(k)=pi*k/p" | funcname = alpha; expr = pi/p*k; args = k
  an1: Analytic "Cos(alpha(k)*(t-t0))" | funcname = FourierCos; expr = cos(alpha(k)*(t-t0)); args = {k, t}
  an2: Analytic "Sin(alpha(k)*(t-t0))" | funcname = FourierSin; expr = sin(alpha(k)*(t-t0)); args = {k, t}
  an3: Analytic "Functions to decompose f(l,t)" | funcname = f; expr = (l==1)*(sin(pi/p*t)+cos(pi/p*t)+cos(pi/p*4*t))+(l==2)*pw1(t)-(l==3)*pw2(t)+(l==4)*cos(pi/p*7*t); args = {l, t}
  pw1: Piecewise | arg = x; extrap = periodic; pieces = {{t0, t0+p, (x-t0)/p}, {t0+p, t0+2*p, 2-(x-t0)/p}}
  pw2: Piecewise | arg = x; extrap = periodic; pieces = {{t0, t0+p/2, (x-t0)/(p/2)}, {t0+p/2, t0+p, 2-(x-t0)/(p/2)}}
  an6: Analytic "Cos Output" | funcname = Qc; expr = (in_i==l)*(m==1); args = {in_i, l, m}
  an7: Analytic "Sin Output" | funcname = Qs; expr = (in_i==l)*(m==2); args = {in_i, l, m}
  an8: Analytic "Cos Disturbance" | funcname = Pc; expr = (l==4)*(m==1); args = {l, m}
  an9: Analytic "Sin Disturbance" | funcname = Ps; expr = (l==4)*(m==2); args = {l, m}
  an10: Analytic "delta_input" | funcname = delta; expr = (ni==n); args = {n, ni}

Variables
  var1 "Variables 1a" [mod1]
    ak = (0.5+0.5*(k>0))*int(f(l,x)*FourierCos(k,x))/p
    bk = int(f(l,x)*FourierSin(k,x))/p
    Ar = ak*(m==1)+bk*(m==2)
  var2 "FourierCoefficients Ar"
    Ar = mod1.C(Ar)
  var4 "Variables 1" [mod2] (disabled)
    G = C1(X)
    gammac = (Qc(l,m,n,1)-C1(PIt1))/G
    gammas = (Qs(l,m,n,1)-C1(PIt2))/G
  var5 "Variables 2a" [mod1] (disabled)
    f20 = f19+a20*FourierCos(10,x)+b20*FourierSin(20,x)
    f19 = f18+a19*FourierCos(19,x)+b19*FourierSin(19,x)
    f18 = f17+a18*FourierCos(18,x)+b18*FourierSin(18,x)
    f17 = f16+a17*FourierCos(17,x)+b17*FourierSin(17,x)
    f16 = f15+a16*FourierCos(16,x)+b16*FourierSin(16,x)
    f15 = f14+a15*FourierCos(15,x)+b15*FourierSin(15,x)
    f14 = f13+a14*FourierCos(14,x)+b14*FourierSin(14,x)
    f13 = f12+a13*FourierCos(13,x)+b13*FourierSin(13,x)
    f12 = f11+a12*FourierCos(12,x)+b12*FourierSin(12,x)
    f11 = f10+a11*FourierCos(11,x)+b11*FourierSin(11,x)
    f10 = f9+a10*FourierCos(10,x)+b10*FourierSin(10,x)
    f9 = f8+a9*FourierCos(9,x)+b9*FourierSin(9,x)
    f8 = f7+a8*FourierCos(8,x)+b8*FourierSin(8,x)
    f7 = f6+a7*FourierCos(7,x)+b7*FourierSin(7,x)
    f6 = f5+a6*FourierCos(6,x)+b6*FourierSin(6,x)
    f5 = f4+a5*FourierCos(5,x)+b5*FourierSin(5,x)
    f4 = f3+a4*FourierCos(4,x)+b4*FourierSin(4,x)
    f3 = f2+a3*FourierCos(3,x)+b3*FourierSin(3,x)
    f2 = f1+a2*FourierCos(2,x)+b2*FourierSin(2,x)
    f1 = f0+a1*FourierCos(1,x)+b1*FourierSin(1,x)
    f0 = a0*FourierCos(0,x)+b0*FourierSin(0,x)
  var6 "Variables 3a" [mod1] (disabled)
    a0 = 0.5*int(f(l,x)*FourierCos(0,x))/p
    b0 = int(f(l,x)*FourierSin(0,x))/p
    a1 = int(f(l,x)*FourierCos(1,x))/p
    b1 = int(f(l,x)*FourierSin(1,x))/p
    a2 = int(f(l,x)*FourierCos(2,x))/p
    b2 = int(f(l,x)*FourierSin(2,x))/p
    a3 = int(f(l,x)*FourierCos(3,x))/p
    b3 = int(f(l,x)*FourierSin(3,x))/p
    a4 = int(f(l,x)*FourierCos(4,x))/p
    b4 = int(f(l,x)*FourierSin(4,x))/p
    a5 = int(f(l,x)*FourierCos(5,x))/p
    b5 = int(f(l,x)*FourierSin(5,x))/p
    a6 = int(f(l,x)*FourierCos(6,x))/p
    b6 = int(f(l,x)*FourierSin(6,x))/p
    a7 = int(f(l,x)*FourierCos(7,x))/p
    b7 = int(f(l,x)*FourierSin(7,x))/p
    a8 = int(f(l,x)*FourierCos(8,x))/p
    b8 = int(f(l,x)*FourierSin(8,x))/p
    a9 = int(f(l,x)*FourierCos(9,x))/p
    b9 = int(f(l,x)*FourierSin(9,x))/p
    a10 = int(f(l,x)*FourierCos(10,x))/p
    b10 = int(f(l,x)*FourierSin(10,x))/p
    a11 = int(f(l,x)*FourierCos(11,x))/p
    b11 = int(f(l,x)*FourierSin(11,x))/p
    a12 = int(f(l,x)*FourierCos(12,x))/p
    b12 = int(f(l,x)*FourierSin(12,x))/p
    a13 = int(f(l,x)*FourierCos(13,x))/p
    b13 = int(f(l,x)*FourierSin(13,x))/p
    a14 = int(f(l,x)*FourierCos(14,x))/p
    b14 = int(f(l,x)*FourierSin(14,x))/p
    a15 = int(f(l,x)*FourierCos(15,x))/p
    b15 = int(f(l,x)*FourierSin(15,x))/p
    a16 = int(f(l,x)*FourierCos(16,x))/p
    b16 = int(f(l,x)*FourierSin(16,x))/p
    a17 = int(f(l,x)*FourierCos(17,x))/p
    b17 = int(f(l,x)*FourierSin(17,x))/p
    a18 = int(f(l,x)*FourierCos(18,x))/p
    b18 = int(f(l,x)*FourierSin(18,x))/p
    a19 = int(f(l,x)*FourierCos(19,x))/p
    b19 = int(f(l,x)*FourierSin(19,x))/p
    a20 = int(f(l,x)*FourierCos(20,x))/p
    b20 = int(f(l,x)*FourierSin(20,x))/p
  var8 "Variables 8" [mod2]
    gammac1 = 0+(-2.12225603430783E+01)*(Qc(1,l,m)-C1(PIt1))+(1.08490674860336E+01)*(Qc(2,l,m)-C2(PIt1))+(1.28187412465730E+01)*(Qc(3,l,m)-C3(PIt1))
    gammas1 = 0+(-2.12225603430783E+01)*(Qs(1,l,m)-C1(PIt2))+(1.08490674860336E+01)*(Qs(2,l,m)-C2(PIt2))+(1.28187412465730E+01)*(Qs(3,l,m)-C3(PIt2))
    gammac2 = 0+(-6.82852027162154E+02)*(Qc(1,l,m)-C1(PIt1))+(1.78230557934565E+02)*(Qc(2,l,m)-C2(PIt1))+(7.00068437381171E+02)*(Qc(3,l,m)-C3(PIt1))
    gammas2 = 0+(-6.82852027162154E+02)*(Qs(1,l,m)-C1(PIt2))+(1.78230557934565E+02)*(Qs(2,l,m)-C2(PIt2))+(7.00068437381171E+02)*(Qs(3,l,m)-C3(PIt2))
    gammac3 = 0+(3.14317057640532E+02)*(Qc(1,l,m)-C1(PIt1))+(-8.31466297715868E+01)*(Qc(2,l,m)-C2(PIt1))+(-3.14527079459246E+02)*(Qc(3,l,m)-C3(PIt1))
    gammas3 = 0+(3.14317057640532E+02)*(Qs(1,l,m)-C1(PIt2))+(-8.31466297715868E+01)*(Qs(2,l,m)-C2(PIt2))+(-3.14527079459246E+02)*(Qs(3,l,m)-C3(PIt2))
  var7 "Variables 2" [mod2]
    yr1 = f(1,t)
    yr2 = f(2,t)
    yr3 = f(3,t)
    d = f(4,t)
    e1 = yr1-C1(z)
    e2 = yr2-C2(z)
    e3 = yr3-C3(z)
    Gamma1 = 0+(-9.84836880269699e-01)*FourierCos(0,t)+(2.36668936814558e+01)*FourierCos(1,t)+(4.78730476219788e+00)*FourierCos(2,t)+(-3.12199331728079e-01)*FourierCos(3,t)+(-1.01960651006490e+01)*FourierCos(4,t)+(-1.90187762751172e-03)*FourierCos(5,t)+(1.60158911274629e-01)*FourierCos(6,t)+(3.39242081498771e+00)*FourierCos(7,t)+(1.11684792273678e-01)*FourierCos(9,t)+(-2.21599382986135e-01)*FourierCos(10,t)+(1.24156175825918e-01)*FourierCos(11,t)+(1.28185043401861e-01)*FourierCos(13,t)+(-3.21384775227724e-01)*FourierCos(14,t)+(1.27688144871866e-01)*FourierCos(15,t)+(1.24440598591710e-01)*FourierCos(17,t)+(-3.33345850270724e-01)*FourierCos(18,t)+(1.19274923575571e-01)*FourierCos(19,t)+(1.49148562823287e+01)*FourierSin(1,t)+(-2.78926538955952e+00)*FourierSin(2,t)+(5.62338561545371e-01)*FourierSin(3,t)+(2.83058296622464e+01)*FourierSin(4,t)+(3.16778510399684e-01)*FourierSin(5,t)+(-9.15618393544930e-01)*FourierSin(6,t)+(-1.13421295657111e+00)*FourierSin(7,t)+(1.35871262490363e-01)*FourierSin(9,t)+(-5.47561848344011e-01)*FourierSin(10,t)+(8.77714588683018e-02)*FourierSin(11,t)+(5.06245992810102e-02)*FourierSin(13,t)+(-4.09685740824323e-01)*FourierSin(14,t)+(2.02271284784617e-02)*FourierSin(15,t)+(-5.51426223607200e-03)*FourierSin(17,t)+(-3.38718806593250e-01)*FourierSin(18,t)+(-2.77302727799293e-02)*FourierSin(19,t)
    Gamma2 = 0+(-2.60918939723303e+02)*FourierCos(0,t)+(8.69719364638670e+02)*FourierCos(1,t)+(1.94394971083813e+02)*FourierCos(2,t)+(-6.75998899654306e+00)*FourierCos(3,t)+(1.45111682467543e+02)*FourierCos(4,t)+(-1.62244106609067e+00)*FourierCos(5,t)+(-5.28643114561147e+01)*FourierCos(6,t)+(1.02776785248501e+02)*FourierCos(7,t)+(3.61791482492866e-01)*FourierCos(9,t)+(-6.41003524775477e+01)*FourierCos(10,t)+(6.30347280208191e-01)*FourierCos(11,t)+(7.52605846711531e-01)*FourierCos(13,t)+(-5.80120021733721e+01)*FourierCos(14,t)+(7.90920361376327e-01)*FourierCos(15,t)+(7.82151838818575e-01)*FourierCos(17,t)+(-4.53148660627646e+01)*FourierCos(18,t)+(7.53554353043220e-01)*FourierCos(19,t)+(3.37593135236954e+02)*FourierSin(1,t)+(-2.53990091660815e+02)*FourierSin(2,t)+(6.37065582661353e+00)*FourierSin(3,t)+(1.01263439656479e+03)*FourierSin(4,t)+(3.83373981356797e+00)*FourierSin(5,t)+(-5.09633707685592e+01)*FourierSin(6,t)+(-3.35321309745844e+02)*FourierSin(7,t)+(2.17767974866056e+00)*FourierSin(9,t)+(8.51566138850990e+00)*FourierSin(10,t)+(1.82314570253791e+00)*FourierSin(11,t)+(1.58609487642724e+00)*FourierSin(13,t)+(4.41574007594449e+01)*FourierSin(14,t)+(1.40727931328249e+00)*FourierSin(15,t)+(1.25178442292087e+00)*FourierSin(17,t)+(6.65995550817569e+01)*FourierSin(18,t)+(1.10374894369984e+00)*FourierSin(19,t)
    Gamma3 = 0+(1.15690224843830e+02)*FourierCos(0,t)+(-4.16821328383182e+02)*FourierCos(1,t)+(-7.25486653846163e+01)*FourierCos(2,t)+(2.78495534913829e+00)*FourierCos(3,t)+(-1.94848647336575e+02)*FourierCos(4,t)+(3.84756816620221e-01)*FourierCos(5,t)+(3.67021902033684e+01)*FourierCos(6,t)+(-5.61620845581760e+00)*FourierCos(7,t)+(-5.51309306204343e-01)*FourierCos(9,t)+(3.83837001389187e+01)*FourierCos(10,t)+(-6.80100968059141e-01)*FourierCos(11,t)+(-7.35627235682883e-01)*FourierCos(13,t)+(3.14278754051413e+01)*FourierCos(14,t)+(-7.44445163981638e-01)*FourierCos(15,t)+(-7.23765291608696e-01)*FourierCos(17,t)+(2.09924358609376e+01)*FourierCos(18,t)+(-6.89141314455642e-01)*FourierCos(19,t)+(-1.24417359459781e+02)*FourierSin(1,t)+(1.32026756264229e+02)*FourierSin(2,t)+(-3.81117674993349e+00)*FourierSin(3,t)+(-5.09666097199607e+02)*FourierSin(4,t)+(-2.28009028907001e+00)*FourierSin(5,t)+(2.01344869087331e+01)*FourierSin(6,t)+(2.08237255814990e+02)*FourierSin(7,t)+(-1.27561567591110e+00)*FourierSin(9,t)+(-1.57179197624535e+01)*FourierSin(10,t)+(-1.06319509864119e+00)*FourierSin(11,t)+(-9.25837235517292e-01)*FourierSin(13,t)+(-3.85304728136221e+01)*FourierSin(14,t)+(-8.26631662115626e-01)*FourierSin(15,t)+(-7.41655088553933e-01)*FourierSin(17,t)+(-5.30587731646654e+01)*FourierSin(18,t)+(-6.58440307288104e-01)*FourierSin(19,t)

Couplings
  intop1: Integration on domains 1 | opname = int; intorder = 10
  aveop1: Average on boundaries 5 | opname = C1
  intop2: Integration on boundaries 2 | opname = C
  aveop2: Average on boundaries 4 | opname = C2
  aveop3: Average on boundaries 6 | opname = C3

Probes
  var3: GlobalVariable "C1(Xj)" [mod2] | probename = var1; expr = C1(X); table = tbl1
  var4: GlobalVariable "C2(Xj)" [mod2] | probename = var2; expr = C2(X); table = tbl1
  var5: GlobalVariable "C3(Xj)" [mod2] | probename = var3; expr = C3(X); table = tbl1
  var1: GlobalVariable "gammac1*Ar" [mod2] | probename = var4; expr = gammac1*Ar; table = tbl1
  var2: GlobalVariable "gammas1*Ar" [mod2] | probename = var5; expr = gammas1*Ar; table = tbl1
  var6: GlobalVariable "gammac2*Ar" [mod2] | expr = gammac2*Ar; table = tbl1
  var7: GlobalVariable "gammas2*Ar" [mod2] | expr = gammas2*Ar; table = tbl1
  var8: GlobalVariable "gammac3*Ar" [mod2] | expr = gammac3*Ar; table = tbl1
  var9: GlobalVariable "gammas3*Ar" [mod2] | expr = gammas3*Ar; table = tbl1

Geometry
  geom1 "Geometry 1" [mod1] (1D, length unit m)
    i1: Interval | intervals = many; p = t0, t0+p2,t0+2*p2
    fin: Finalize "Form Union"
  geom2 "Geometry 2" [mod2] (2D, length unit m)
    r1: Rectangle | pos = {-1, 0}; size = {2, 1}
    pol1: Polygon | type = open; x = {-0.25, 0.25}; y = {0.25, 0.75}
    pol2: Polygon | type = open; x = {0.5, 0.5}; y = {0.25, 0.75}
    pol3: Polygon | type = open; x = {-0.5, -0.5}; y = {0.25, 0.75}
    fin: Finalize "Form Union"

Physics
  c: CoefficientFormPDE "Unit Input" [geom2] on all domains
    dependent variable X
    cfeq1: CoefficientFormPDE (default) | c = {c, 0, 0, c}; f = 0; da = 0
    zflx1: ZeroFluxBoundary "Zero Flux 1" (default)
    init1: init "Initial Values 1" (default)
    flux2: FluxBoundary "Bin1*delta(n,1)" on boundaries 1 | g = delta(n,1)
    flux3: FluxBoundary "Bin2*delta(n,2)" on boundaries 2 | g = delta(n,2); q = 5
    flux4: FluxBoundary "Bin3*delta(n,3)" on boundaries 3 | g = delta(n,3); q = 1
    dir1: DirichletBoundary "Bd*0" on boundaries 7 | r = 0
  c2: CoefficientFormPDE "Regulator Eqs" [geom2] on all domains
    dependent variable PI = {PI1, PIt1, PI2, PIt2}
    cfeq1: CoefficientFormPDE (default)
      c = {{c, 0, 0, c}, {0, 0, 0, 0}, {0, 0, 0, 0}, {0, 0, 0, 0}, {0, 0, 0, 0}, {c, 0, 0, c}, {0, 0, 0, 0}, {0, 0, 0, 0}, {0, 0, 0, 0}, {0, 0, 0, 0}, {c, 0, 0, c}, {0, 0, 0, 0}, {0, 0, 0, 0}, {0, 0, 0, 0}, {0, 0, 0, 0}, {c, 0, 0, c}}
      a = {0, 0, -alpha(k), -alpha(k), 0, 0, 0, 0, alpha(k), alpha(k), 0, 0, 0, 0, 0, 0}
      f = {0, 0, 0, 0}
      da = {0, 0, 0, 0, 0, 0, 0, 0, 0, 0, 0, 0, 0, 0, 0, 0}
    zflx1: ZeroFluxBoundary "Zero Flux 1" (default)
    init1: init "Initial Values 1" (default)
    flux2: FluxBoundary "Bin1*gamma1" on boundaries 1 | g = {gammac1, 0, gammas1, 0}
    flux3: FluxBoundary "Bin2*gamma2" on boundaries 2
      g = {gammac2, 0, gammas2, 0}
      q = {5, 0, 0, 0, 0, 5, 0, 0, 0, 0, 5, 0, 0, 0, 0, 5}
    flux4: FluxBoundary "Bin3*gamma3" on boundaries 3
      g = {gammac3, 0, gammas3, 0}
      q = {1, 0, 0, 0, 0, 1, 0, 0, 0, 0, 1, 0, 0, 0, 0, 1}
    dir1: DirichletBoundary "Bd*P" on boundaries 7 | r = {Pc(l,m), Pc(l,m), Ps(l,m), Ps(l,m)}
  phys1: CoefficientFormPDE "Closed Loop System" [geom2] on all domains
    dependent variable z
    cfeq1: CoefficientFormPDE (default) | c = {c, 0, 0, c}; f = 0; da = 1
    zflx1: ZeroFluxBoundary "Zero Flux 1" (default)
    init1: init "Initial Values 1" (default)
    flux2: FluxBoundary "Bin1*Gamma1" on boundaries 1 | g = Gamma1
    flux3: FluxBoundary "Bin2*Gamma2" on boundaries 2 | g = Gamma2; q = 5
    flux1: FluxBoundary "Bin3*Gamma3" on boundaries 3 | g = Gamma3; q = 1
    dir1: DirichletBoundary "Bd*d" on boundaries 7 | r = d

Mesh
  mesh1 "Mesh 1" [geom1]
    size: MeshSizeDefault | hmax = 0.02; hmin = 4.0E-5; hauto = 1; custom = on
    auto_f1: Edge on remaining entities
  mesh2 "Mesh 2" [geom2] (physics-controlled)
    size: MeshSizeDefault | hauto = 2

Studies
  std1 "Study 1"
    param: Parametric "Parametric Sweep" | pname = n; plistarr = 1,2,3
    stat: Stationary | solve for = {c}
  std2 "Study 2"
    param: Parametric "Parametric Sweep"
      sweeptype = filled
      pname = {k, m, l}
      plistarr = {range(0,1,kmax), "1,2", range(1,1,lmax)}
    stat: Stationary | solve for = {c2}; usesol = on; notsolmethod = sol; notstudy = std1
  std3 "Study 3"
    time: Transient "Time Dependent"
      tlist = range(0,p/40,4*p2)
      rtol = 0.00001
      solve for = {phys1}
      usesol = on
      notsolmethod = sol
      notstudy = std2

Solver configurations
  sol1 "Solver 1" (study std1)
    v1: Variables "Dependent Variables 1"
    s1: Stationary "Stationary Solver 1" | stol = 0.000010
      dDef: Direct
      fc1: FullyCoupled
      p1: Parametric | sweeptype = sparse; pname = n; plistarr = 1,2,3
  sol2 "Solver 2" (study std2)
    v1: Variables "Dependent Variables 1" | notsolmethod = sol
    s1: Stationary "Stationary Solver 1" | stol = 0.00010
      dDef: Direct
      fc1: FullyCoupled
      p1: Parametric | sweeptype = filled; pname = {k, m, l}; plistarr = {range(0,1,kmax), "1,2", range(1,1,lmax)}
  sol3 "Solver 3" (study std3)
    v1: Variables "Dependent Variables 1" | notsolmethod = sol
    t1: Time "Time-Dependent Solver 1" | tlist = range(0,p/40,4*p2); rtol = 0.00001; atolglobal = 0.00010
      dDef: Direct
      fc1: FullyCoupled

Datasets
  dset1: Solution | solution = sol1
  dset2: Solution "Probe Solution 2" | solution = sol3
  dset3: Solution | solution = sol2
  dset4: Solution | solution = sol3

Derived values
  gev1: EvalGlobal "gammac1*Ar" | data = dset2; table = tbl1; expr = gammac1*Ar
  gev2: EvalGlobal "gammas1*Ar" | data = dset2; table = tbl1; expr = gammas1*Ar
  gev3: EvalGlobal "C1(Xj)" | data = dset2; table = tbl1; expr = C1(X)
  gev4: EvalGlobal "C2(Xj)" | data = dset2; table = tbl1; expr = C2(X)
  gev5: EvalGlobal "C3(Xj)" | data = dset2; table = tbl1; expr = C3(X)
  gev6: EvalGlobal "gammac2*Ar" | data = dset2; table = tbl1; expr = gammac2*Ar
  gev7: EvalGlobal "gammas2*Ar" | data = dset2; table = tbl1; expr = gammas2*Ar
  gev8: EvalGlobal "gammac3*Ar" | data = dset2; table = tbl1; expr = gammac3*Ar
  gev9: EvalGlobal "gammas3*Ar" | data = dset2; table = tbl1; expr = gammas3*Ar
  pev1: EvalPoint "Point Evaluation 1" on points 5 | data = dset4; table = tbl4; expr = C1(T)
  gev10: EvalGlobal "Global Evaluation 10" | data = dset4; table = tbl5; expr = d

Tables
  tbl1: Table "Probe Table 1"
    k | m | l | gammac1*Ar, gammac1*Ar | gammas1*Ar, gammas1*Ar | gammac2*Ar, gammac2*Ar | gammas2*Ar, gammas2*Ar | gammac3*Ar, gammac3*Ar | gammas3*Ar, gammas3*Ar
    0 | 1.13092e-15 | 0 | 3.63882e-14 | 0 | -1.67495e-14 | 0
    0 | 5.42453 | 0 | 89.1153 | 0 | -41.5733 | 0
    0 | -6.40937 | 0 | -350.034 | 0 | 157.264 | 0
    0 | -1.50585e-16 | 0 | -1.17282e-14 | 0 | 5.19491e-15 | 0
    0 | 0 | 0 | 0 | 0 | 0 | 0
    0 | 0 | 0 | 0 | 0 | 0 | 0
    0 | 0 | 0 | 0 | 0 | 0 | 0
    0 | 0 | 0 | 0 | 0 | 0 | 0
    1 | 20.5313 | -7.35498 | 629.593 | -311.096 | -281.26 | 168.302
    1 | -4.2194 | 1.73851 | -70.9692 | 19.096 | 32.741 | -11.459
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  tbl5: Table
    // Global Evaluation 10 (C1(z))
    Time | C1(z) | yr1 | C2(z) | yr2 | C3(z) | yr3 | e1 | e2 | e3 | d
    -1 | -2.06917e-10 | -2.22045e-16 | 5.7533e-11 | 0 | -4.65813e-10 | 0 | 2.06917e-10 | -5.7533e-11 | 4.65813e-10 | -1
    -0.975 | 0.986816 | -0.12432 | 1.02909 | 0.025 | 0.953313 | -0.05 | -1.11114 | -1.00409 | -1.00331 | -0.85264
    -0.95 | 2.57843 | -0.335106 | 2.91585 | 0.05 | 2.3707 | -0.1 | -2.91354 | -2.86585 | -2.4707 | -0.45399
    -0.925 | 3.50225 | -0.61803 | 4.29098 | 0.075 | 3.12537 | -0.15 | -4.12028 | -4.21598 | -3.27537 | 0.0784591
    -0.9 | 3.78801 | -0.951057 | 5.07989 | 0.1 | 3.36907 | -0.2 | -4.73906 | -4.97989 | -3.56907 | 0.587785
    -0.875 | 3.6361 | -1.30656 | 5.43553 | 0.125 | 3.30873 | -0.25 | -4.94266 | -5.31053 | -3.55873 | 0.92388
    -0.85 | 3.23113 | -1.65401 | 5.50714 | 0.15 | 3.08419 | -0.3 | -4.88515 | -5.35714 | -3.38419 | 0.987688
    -0.825 | 2.71384 | -1.96292 | 5.40111 | 0.175 | 2.78729 | -0.35 | -4.67676 | -5.22611 | -3.13729 | 0.760406
    -0.8 | 2.18446 | -2.20582 | 5.19022 | 0.2 | 2.47114 | -0.4 | -4.39028 | -4.99022 | -2.87114 | 0.309017
    -0.775 | 1.70993 | -2.36091 | 4.92509 | 0.225 | 2.15669 | -0.45 | -4.07084 | -4.70009 | -2.60669 | -0.233445
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
Plots
  pg1: PlotGroup2D "2D Plot Group 1" | data = dset1
    surf1: Surface | expr = X
  pg3: PlotGroup2D "2D Plot Group 3" | data = dset3
    surf1: Surface | expr = PI1
  pg4: PlotGroup2D "2D Plot Group 4" | data = dset4
    surf1: Surface | expr = z
  pg6: PlotGroup1D "1D Plot Group 6" | data = dset4
    glob1: Global | expr = {C1(z), yr1, C2(z), yr2, C3(z), yr3}
  pg7: PlotGroup1D "1D Plot Group 7" | data = dset4
    glob1: Global | expr = {e1, e2, e3}
  pg8: PlotGroup1D "Probe 1D Plot Group 8"
    tblp1: Table "Probe Table Graph 1" | table = tbl2
    tblp2: Table "Probe Table Graph 2" | table = tbl3
    tblp3: Table "Probe Table Graph 3" | table = tbl1
  pg9: PlotGroup1D "Probe 1D Plot Group 9"
    tblp1: Table "Probe Table Graph 1" | table = tbl1
  pg10: PlotGroup2D "2D Plot Group 10" | data = dset4
    surf2: Surface | expr = z
      hght1: Height "Height Expression 1" | expr = z
  pg11: PlotGroup2D "2D Plot Group 11" | data = dset4
    arws1: ArrowSurface | expr = {Xx, Xy}; xnumber = 25
    surf1: Surface | data = dset4; expr = X

Exports
  anim1: Animation
    movietype = flash
    giffilename = movie.gif
    size = manual
    width = 640
    height = 480
    options = off
    axes = on
  anim2: Animation
    giffilename = /Users/dsgilliam/Desktop/collect_13/research_13/reg_monograph/EA_DG_Mono/COMSOL/Chapter3/Chap3Ex8_FourierSeries/GenSignalFourierDec_MIMO/movie.gif
    size = manual
    width = 640
    height = 480
    options = off
    axes = on
  anim3: Animation | size = manual; width = 640; height = 480; options = off; axes = on