// COMSOL Multiphysics 5.0.1.276 model "Ex3_8_heat_2d_BC_zdi.mph"
// Ex3 8 heat 2d BC zdi
// Outline of the model tree

Parameters
  L = 2
  H = 1
  c = 0.1
  Mr1 = 1
  Mr2 = 2
  Ar1 = 1
  Ar2 = 2
  K1 = 2
  K2 = 5
  Kd = 1

Functions
  an1: Analytic | funcname = bump; expr = flc2hs(-y+H/8,H/16)*flc2hs(y+H/8,H/16); args = {y, H}

Variables
  var1 "Variables 1"
    yr1 = Ar1+Mr1*cos(1/4* (x-t) )
    yr2 = Ar2+Mr2*sin( .75*(x+t) )
    d = bump(y,H)*sin(t)
    e1 = C1((yr1-z)^2)
    e2 = C2((yr2-z)^2)

Couplings
  intop1: Integration on boundaries 2 | opname = C1
  intop2: Integration on boundaries 3 | opname = C2

Geometry
  geom1 "Geometry 1" (2D, length unit m)
    r1: Rectangle | pos = {0, -H/2}; size = {L, H}
    fin: Finalize "Form Union"

Physics
  c: CoefficientFormPDE on all domains
    dependent variable X
    cfeq1: CoefficientFormPDE (default) | c = {c, 0, 0, c}; f = 0; da = 1
    zflx1: ZeroFluxBoundary "Zero Flux 1" (default)
    init1: init "Initial Values 1" (default)
    cons1: Constraint on boundaries 2 | R = X-yr1; constraintType = unidirectionalConstraint; weakConstraints = 1
    cons2: Constraint on boundaries 3 | R = X-yr2; constraintType = unidirectionalConstraint; weakConstraints = 1
    flux1: FluxBoundary "Flux/Source 1" on boundaries 4 | g = d; q = Kd
  c2: CoefficientFormPDE on all domains
    dependent variable z
    cfeq1: CoefficientFormPDE (default) | c = {c, 0, 0, c}; f = 0; da = 1
    zflx1: ZeroFluxBoundary "Zero Flux 1" (default)
    init1: init "Initial Values 1" (default) | z = x*y
    flux1: FluxBoundary "Flux/Source 1" on boundaries 2 | g = X_lm*flc2hs(t-0.1,0.1)
    flux2: FluxBoundary "Flux/Source 2" on boundaries 3 | g = X_lm*flc2hs(t-0.1,0.1)
    flux3: FluxBoundary "Flux/Source 3" on boundaries 4 | g = d*flc2hs(t-0.1,0.1); q = Kd

Mesh
  mesh1 "Mesh 1" (physics-controlled)
    size: MeshSizeDefault | hauto = 5

Studies
  std1 "Study 1"
    time: Transient "Time Dependent" | tlist = range(-20,0.1,100); rtol = 0.00001; physselection = c

Solver configurations
  sol1 "Solver 1" (study std1)
    v1: Variables "Dependent Variables 1"
    t1: Time "Time-Dependent Solver 1" | tlist = range(-20,0.1,100)
      dDef: Direct
      fc1: FullyCoupled | linsolver = dDef

Datasets
  dset1: Solution | solution = sol1

Plots
  pg1: PlotGroup2D "2D Plot Group 1" | data = dset1
    surf1: Surface (disabled) | expr = z
    surf2: Surface | expr = z
      hght1: Height "Height Expression 1" | expr = X
  pg2: PlotGroup1D "1D Plot Group 2" | data = dset1
    glob1: Global | expr = {e1, e2, e1+e2, }

Exports
  anim1: Animation | giffilename = movie; size = manual; width = 640; height = 480; options = off; axes = on
  data1: Data
    data = dset1
    expr = {z, }
    filename = /Users/gilliam/Desktop/collect_13/research_13/reg_monograph/EA_DG_Mono/COMSOL/Chapter3/Chap3Ex8_2D_Interior_Control/z_di/z_top_data.txt
    location = grid
    gridx2 = range(0,0.1,2)
    gridy2 = -0.5
  data2: Data
    data = dset1
    expr = X
    filename = /Users/gilliam/Desktop/collect_13/research_13/reg_monograph/EA_DG_Mono/COMSOL/Chapter3/Chap3Ex8_2D_Interior_Control/z_di/X_data.txt
  data3: Data
    data = dset1
    expr = z
    filename = /Users/gilliam/Desktop/collect_13/research_13/reg_monograph/EA_DG_Mono/COMSOL/Chapter3/Chap3Ex8_2D_Interior_Control/z_di/z_bot_data.txt
    location = grid
    gridx2 = range(0,0.1,2)
    gridy2 = -0.5