// COMSOL Multiphysics 5.0.1.276 model "Ex3_9_interior_control.mph"
// Ex3 9 interior control
// Outline of the model tree

Parameters
  L = 1
  Mr = 1
  Ar = 0.5*0+1
  a = 10
  c = 1
  alpha = pi

Variables
  var1 "Variables 1" on boundaries 4-7
    yr = Mr+Ar*(4*s*(1-s))^2*cos(alpha*t)+ 0*sin(3*pi*s)*cos(alpha*t)
  var2 "Variables 2"
    e = sqrt( C((z-yr)^2) )

Couplings
  intop1: Integration on boundaries 4-7 | opname = C

Geometry
  geom1 "Geometry 1" (2D, length unit m)
    r1: Rectangle | base = center; size = {L, L}
    r2: Rectangle | base = center; size = {L/3, L/3}
    fin: Finalize "Form Union"

Physics
  c: CoefficientFormPDE "To find Bin(x,t)" on all domains
    dependent variable X
    cfeq1: CoefficientFormPDE (default) | c = {c, 0, 0, c}; f = 0; da = a
    zflx1: ZeroFluxBoundary "Zero Flux 1" (default)
    init1: init "Initial Values 1" (default)
    dir1: DirichletBoundary "Dirichlet Boundary Condition 1" (disabled) on boundaries 1-3, 8 | r = 0
    cons1: Constraint on boundaries 4-7 | R = X-yr; constraintType = unidirectionalConstraint; weakConstraints = 1
    flux1: FluxBoundary "Flux/Source 1" on boundaries 1-3, 8 | g = 1; q = 1
  c2: CoefficientFormPDE "Close loop system" on all domains
    dependent variable z
    cfeq1: CoefficientFormPDE (default) | c = {c, 0, 0, c}; f = 0; da = a
    zflx1: ZeroFluxBoundary "Zero Flux 1" (default)
    init1: init "Initial Values 1" (default) | z = 100*(.5^2-x^2)*(.5^2-y^2)*0
    dir1: DirichletBoundary "Dirichlet Boundary Condition 1" (disabled) on boundaries 1-3, 8 | r = 0
    flux1: FluxBoundary "Input Bin(x,t)" on boundaries 4-7 | g = X_lm*flc2hs(t-0.1,0.1)
    flux2: FluxBoundary "Flux/Source 2" on boundaries 1-3, 8 | g = 1; q = 1

Mesh
  mesh1 "Mesh 1"
    size: MeshSizeDefault | hauto = 2
    ftri1: FreeTri "Free Triangular 1" on remaining entities

Studies
  std1 "Study 1"
    time: Transient "Time Dependent" | tlist = range(-4,0.1,20); rtol = 0.0001

Solver configurations
  sol1 "Solver 1" (study std1)
    v1: Variables "Dependent Variables 1"
    t1: Time "Time-Dependent Solver 1" | tlist = range(-4,0.1,20)
      dDef: Direct
      fc1: FullyCoupled

Datasets
  dset1: Solution | solution = sol1

Derived values
  pev1: EvalPoint "Point Evaluation 1" on points 4 | data = dset1; table = tbl1; expr = e

Tables
  tbl1: Table
    // Point Evaluation 1 (C(z))
    Time (s) | C(z), Point: 4 | e, Point: 4
    -4 | -2.91526e-22 | 1.81586
    -3.9 | 0.00141282 | 1.78099
    -3.8 | 0.0142736 | 1.67304
    -3.7 | 0.0380928 | 1.50308
    -3.6 | 0.0685012 | 1.29219
    -3.5 | 0.102606 | 1.06586
    -3.4 | 0.138584 | 0.852655
    -3.3 | 0.175283 | 0.681184
    -3.2 | 0.211981 | 0.570925
    -3.1 | 0.248228 | 0.517319
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
Plots
  pg1: PlotGroup2D "2D Plot Group 1" | data = dset1
    surf1: Surface | expr = X
  pg2: PlotGroup2D "2D Plot Group 2" | data = dset1
    surf1: Surface | expr = z
  pg3: PlotGroup1D "1D Plot Group 3" | data = dset1
    glob1: Global | data = dset1; expr = e
  pg4: PlotGroup2D "2D Plot Group 4" | data = dset1; animating = off
    surf2: Surface | expr = z
      hght1: Height "Height Expression 1" | expr = z
  pg5: PlotGroup1D "1D Plot Group 5" | data = dset1
    ptgr1: PointGraph on points 3 | expr = e
  pg6: PlotGroup2D "2D Plot Group 6" | data = dset1
    surf1: Surface | data = dset1; expr = z
      hght1: Height "Height Expression 1" | expr = X
  pg7: PlotGroup2D "2D Plot Group 7" | data = dset1
    syss1: CoordSysSurface "Coordinate System Surface 1"

Exports
  anim1: Animation
    giffilename = /Users/gilliam/Desktop/collect_13/research_13/reg_monograph/EA_DG_Mono/COMSOL/Chapter3/Chap3Ex7_8_2D_Interior_Control/Interior_zdi/movie.gif
    gifopen = on
    framesel = all
    size = manual
    width = 640
    height = 480
    options = on
    axes = on
  anim2: Animation
    giffilename = /Users/dsgilliam/Desktop/collect_13/research_13/reg_monograph/EA_DG_Mono/COMSOL/Chapter3/Chap3Ex7_2D_Interior_Control/movie1.gif
    size = manual
    width = 640
    height = 480
    options = off
    axes = on
  play1: Player
  anim3: Animation
    giffilename = movie.gif
    framesel = all
    size = manual
    width = 640
    height = 480
    options = off
    axes = on
  play2: Player | autoplay = off
  img1: Image2D "2D Image 1"
    size = manual
    unit = px
    width = 2400
    height = 2400
    jpegfilename = figt20
    options = on
    axes = on
  anim4: Animation | size = manual; width = 640; height = 480; options = off; axes = on
  data1: Data
    data = dset1
    expr = z
    filename = /Users/gilliam/Desktop/collect_13/research_13/reg_monograph/EA_DG_Mono/COMSOL/Chapter3/Chap3Ex7_8_2D_Interior_Control/Interior_zdi/matlab_figs/z_data_2.txt
    location = grid
    gridx2 = range(-0.166666666667,0.166666666667,0.166666666667)
    gridy2 = -.5+1/3
    sdim = fromdataset
    level = point