// COMSOL Multiphysics 5.0.1.276 model "IncommensuratePeriodicSignals.mph"
// IncommensuratePeriodicSignals
// Outline of the model tree

Parameters
  l = 1  // Function Index
  lmax = 4
  k = 0  // coefficient index
  kmax = 20
  c = 0.1
  n = 1
  nmax = 3

Functions
  an23: Analytic "p(l)" | funcname = p; expr = pi*((l==1)+(l==4))+sqrt(2)*(l==2)+sqrt(3)*(l==3); args = l
  an5: Analytic "alpha(k,l)=pi/p(l)*k" | funcname = alpha; expr = pi/p(l)*k; args = {k, l}
  an1: Analytic "Cos(alpha(k)*t)" | funcname = FourierCos; expr = cos( alpha(k,l) * t ); args = {k, l, t}
  an2: Analytic "Sin(alpha(k)*t)" | funcname = FourierSin; expr = sin( alpha(k,l) * t ); args = {k, l, t}
  an6: Analytic "Cos Output" | funcname = Qc; expr = (in_i==l); args = {in_i, l}
  an7: Analytic "Sin Output" | funcname = Qs; expr = 0; args = {in_i, l}
  an8: Analytic "Cos Disturbance" | funcname = Pc; expr = (l==nmax+1); args = l
  an9: Analytic "Sin Disturbance" | funcname = Ps; expr = 0; args = l
  an10: Analytic "delta_input" | funcname = delta; expr = (ni==n); args = {n, ni}
  an11: Analytic "yr1" | funcname = yr1; expr = 1+cos(t)+sin(2*t)+cos(5*t)+sin(10*t); args = t
  pw1: Piecewise "yr2" | funcname = yr2; arg = x; extrap = periodic; pieces = {{0, sqrt(2), x/sqrt(2)}, {sqrt(2), 2*sqrt(2), (2-x/sqrt(2))}}
  pw2: Piecewise "yr3" | funcname = yr3; arg = x; extrap = periodic; pieces = {{0, sqrt(3), (x/sqrt(3))}, {sqrt(3), 2*sqrt(3), (2-x/sqrt(3))}}
  an20: Analytic "d1" | funcname = d1; expr = 2+sin(t)+cos(2*t)+sin(5*t)+cos(10*t); args = t

Variables
  var8 "Variables 1"
    gammac1 = 0+(-2.59551446923730E+00)*(Qc(1,l)-C1(PIt1))+(1.61132805650268E+00)*(Qc(2,l)-C2(PIt1))+(1.13278596347468E+00)*(Qc(3,l)-C3(PIt1))
    gammas1 = 0+(-2.59551446923730E+00)*(Qs(1,l)-C1(PIt2))+(1.61132805650268E+00)*(Qs(2,l)-C2(PIt2))+(1.13278596347468E+00)*(Qs(3,l)-C3(PIt2))
    gammac2 = 0+(-8.45090233310356E+02)*(Qc(1,l)-C1(PIt1))+(1.70618227648506E+02)*(Qc(2,l)-C2(PIt1))+(8.58287466141889E+02)*(Qc(3,l)-C3(PIt1))
    gammas2 = 0+(-8.45090233310356E+02)*(Qs(1,l)-C1(PIt2))+(1.70618227648506E+02)*(Qs(2,l)-C2(PIt2))+(8.58287466141889E+02)*(Qs(3,l)-C3(PIt2))
    gammac3 = 0+(2.01080507896090E+02)*(Qc(1,l)-C1(PIt1))+(-4.07833107239734E+01)*(Qc(2,l)-C2(PIt1))+(-2.00927620030435E+02)*(Qc(3,l)-C3(PIt1))
    gammas3 = 0+(2.01080507896090E+02)*(Qs(1,l)-C1(PIt2))+(-4.07833107239734E+01)*(Qs(2,l)-C2(PIt2))+(-2.00927620030435E+02)*(Qs(3,l)-C3(PIt2))
  var9 "Variables2"
    Gamma1 = 0+(1)*((-2.59551446924)*FourierCos(0,1,t)+(0)*FourierSin(0,1,t))+(0.5)*((1.6113280565)*FourierCos(0,2,t)+(0)*FourierSin(0,2,t))+(0.5)*((1.13278596347)*FourierCos(0,3,t)+(0)*FourierSin(0,3,t))+(2)*((-0.14859955074)*FourierCos(0,4,t)+(0)*FourierSin(0,4,t))+(1)*((-1.98179718451)*FourierCos(1,1,t)+(2.32152459432)*FourierSin(1,1,t))+(-0.405284734569)*((-0.721706907594)*FourierCos(1,2,t)+(-3.11019208672)*FourierSin(1,2,t))+(-0.405284734569)*((0.735719196815)*FourierCos(1,3,t)+(-1.37764577515)*FourierSin(1,3,t))+(1)*((-0.159892247712)*FourierSin(1,4,t)-(0.0277791464123)*FourierCos(1,4,t))+(1)*((-0.182085017637)*FourierSin(2,1,t)-(4.32328433081)*FourierCos(2,1,t))+(1)*((-0.191514010328)*FourierCos(2,4,t)+(0.043977739145)*FourierSin(2,4,t))+(-0.0450316371744)*((-14.0128590782)*FourierCos(3,2,t)+(4.13232358979)*FourierSin(3,2,t))+(-0.0450316371744)*((-1.95393581169)*FourierCos(3,3,t)+(-4.34990331659)*FourierSin(3,3,t))+(1)*((10.5007375497)*FourierCos(5,1,t)+(5.4717844906)*FourierSin(5,1,t))+(-0.0162113893828)*((-14.5389374314)*FourierCos(5,2,t)+(40.6935988887)*FourierSin(5,2,t))+(-0.0162113893828)*((-6.12468798702)*FourierCos(5,3,t)+(-6.21894260119)*FourierSin(5,3,t))+(1)*((-0.293130142829)*FourierSin(5,4,t)-(-0.0500684975598)*FourierCos(5,4,t))+(-0.00827111703203)*((37.5820464399)*FourierCos(7,2,t)+(93.6031881712)*FourierSin(7,2,t))+(-0.00827111703203)*((-12.0185487478)*FourierCos(7,3,t)+(-5.86625956999)*FourierSin(7,3,t))+(-0.0050035152416)*((173.056746157)*FourierCos(9,2,t)+(112.043785107)*FourierSin(9,2,t))+(-0.0050035152416)*((-19.1118299527)*FourierCos(9,3,t)+(-2.85636783954)*FourierSin(9,3,t))+(1)*((25.6453002889)*FourierSin(10,1,t)-(-22.655962672)*FourierCos(10,1,t))+(1)*((-0.168746416984)*FourierCos(10,4,t)+(-0.203700681791)*FourierSin(10,4,t))+(-0.00334946061628)*((386.0630493)*FourierCos(11,2,t)+(12.0726886836)*FourierSin(11,2,t))+(-0.00334946061628)*((-26.4914020703)*FourierCos(11,3,t)+(3.19406796373)*FourierSin(11,3,t))+(-0.00239813452408)*((608.779674241)*FourierCos(13,2,t)+(-302.568269522)*FourierSin(13,2,t))+(-0.00239813452408)*((-33.1713849306)*FourierCos(13,3,t)+(12.1731288071)*FourierSin(13,3,t))+(-0.00180126548697)*((695.654356497)*FourierCos(15,2,t)+(-904.345077558)*FourierSin(15,2,t))+(-0.00180126548697)*((-38.7807431294)*FourierCos(15,3,t)+(23.2602017662)*FourierSin(15,3,t))+(-0.00140236932377)*((424.996696698)*FourierCos(17,2,t)+(-1794.37680267)*FourierSin(17,2,t))+(-0.00140236932377)*((-44.7950197572)*FourierCos(17,3,t)+(35.5977110652)*FourierSin(17,3,t))+(-0.00112267239493)*((-475.859151681)*FourierCos(19,2,t)+(-2850.48215675)*FourierSin(19,2,t))+(-0.00112267239493)*((-55.5199819597)*FourierCos(19,3,t)+(50.78448365)*FourierSin(19,3,t))
    Gamma2 = 0+(1)*((-845.09023331)*FourierCos(0,1,t)+(0)*FourierSin(0,1,t))+(0.5)*((170.618227649)*FourierCos(0,2,t)+(0)*FourierSin(0,2,t))+(0.5)*((858.287466142)*FourierCos(0,3,t)+(0)*FourierSin(0,3,t))+(2)*((-178.81546048)*FourierCos(0,4,t)+(0)*FourierSin(0,4,t))+(1)*((-564.98408068)*FourierCos(1,1,t)+(790.119635025)*FourierSin(1,1,t))+(-0.405284734569)*((149.104666923)*FourierCos(1,2,t)+(-166.555118271)*FourierSin(1,2,t))+(-0.405284734569)*((-64.4344473917)*FourierCos(1,3,t)+(-1320.17522104)*FourierSin(1,3,t))+(1)*((-179.949754713)*FourierSin(1,4,t)-(61.8381820264)*FourierCos(1,4,t))+(1)*((249.797804559)*FourierSin(2,1,t)-(1357.20890359)*FourierCos(2,1,t))+(1)*((-185.020778233)*FourierCos(2,4,t)+(125.182246604)*FourierSin(2,4,t))+(-0.0450316371744)*((28.0886551575)*FourierCos(3,2,t)+(-427.365939084)*FourierSin(3,2,t))+(-0.0450316371744)*((-5604.3824034)*FourierCos(3,3,t)+(627.258485235)*FourierSin(3,3,t))+(1)*((4784.33232812)*FourierCos(5,1,t)+(-47.8234151519)*FourierSin(5,1,t))+(-0.0162113893828)*((-278.978317149)*FourierCos(5,2,t)+(-491.907263729)*FourierSin(5,2,t))+(-0.0162113893828)*((-6983.90402215)*FourierCos(5,3,t)+(12243.3123304)*FourierSin(5,3,t))+(1)*((-243.905376799)*FourierSin(5,4,t)-(288.868893398)*FourierCos(5,4,t))+(-0.00827111703203)*((-698.046095649)*FourierCos(7,2,t)+(-358.118003475)*FourierSin(7,2,t))+(-0.00827111703203)*((9208.01191529)*FourierCos(7,3,t)+(28375.0209977)*FourierSin(7,3,t))+(-0.0050035152416)*((-1119.70069626)*FourierCos(9,2,t)+(29.784080509)*FourierSin(9,2,t))+(-0.0050035152416)*((51131.5596948)*FourierCos(9,3,t)+(30140.4374279)*FourierSin(9,3,t))+(1)*((4680.32318526)*FourierSin(10,1,t)-(-16740.9991725)*FourierCos(10,1,t))+(1)*((-265.739682106)*FourierCos(10,4,t)+(426.173861957)*FourierSin(10,4,t))+(-0.00334946061628)*((-1432.18645579)*FourierCos(11,2,t)+(697.863622399)*FourierSin(11,2,t))+(-0.00334946061628)*((111544.441957)*FourierCos(11,3,t)+(-11214.9630088)*FourierSin(11,3,t))+(-0.00239813452408)*((-1516.5410791)*FourierCos(13,2,t)+(1636.96587869)*FourierSin(13,2,t))+(-0.00239813452408)*((159355.247794)*FourierCos(13,3,t)+(-124145.879137)*FourierSin(13,3,t))+(-0.00180126548697)*((-1252.73825633)*FourierCos(15,2,t)+(2805.79818209)*FourierSin(15,2,t))+(-0.00180126548697)*((136790.836335)*FourierCos(15,3,t)+(-321334.903061)*FourierSin(15,3,t))+(-0.00140236932377)*((-521.428696315)*FourierCos(17,2,t)+(4136.93346163)*FourierSin(17,2,t))+(-0.00140236932377)*((-35353.2091971)*FourierCos(17,3,t)+(-581671.18518)*FourierSin(17,3,t))+(-0.00112267239493)*((804.979553301)*FourierCos(19,2,t)+(5541.33500418)*FourierSin(19,2,t))+(-0.00112267239493)*((-443523.980899)*FourierCos(19,3,t)+(-833171.613521)*FourierSin(19,3,t))
    Gamma3 = 0+(1)*((201.080507896)*FourierCos(0,1,t)+(0)*FourierSin(0,1,t))+(0.5)*((-40.783310724)*FourierCos(0,2,t)+(0)*FourierSin(0,2,t))+(0.5)*((-200.92762003)*FourierCos(0,3,t)+(0)*FourierSin(0,3,t))+(2)*((41.6304228583)*FourierCos(0,4,t)+(0)*FourierSin(0,4,t))+(1)*((119.795072441)*FourierCos(1,1,t)+(-203.732897287)*FourierSin(1,1,t))+(-0.405284734569)*((-31.2158995232)*FourierCos(1,2,t)+(48.3197068445)*FourierSin(1,2,t))+(-0.405284734569)*((64.0932580749)*FourierCos(1,3,t)+(321.867792398)*FourierSin(1,3,t))+(1)*((41.2837038792)*FourierSin(1,4,t)-(-18.7666287965)*FourierCos(1,4,t))+(1)*((-114.408459052)*FourierSin(2,1,t)-(-332.748329164)*FourierCos(2,1,t))+(1)*((40.7828756312)*FourierCos(2,4,t)+(-38.4329570502)*FourierSin(2,4,t))+(-0.0450316371744)*((21.8176009604)*FourierCos(3,2,t)+(126.441618255)*FourierSin(3,2,t))+(-0.0450316371744)*((1533.6143148)*FourierCos(3,3,t)+(-554.253626699)*FourierSin(3,3,t))+(1)*((-1336.93869745)*FourierCos(5,1,t)+(311.139362259)*FourierSin(5,1,t))+(-0.0162113893828)*((130.127816265)*FourierCos(5,2,t)+(130.699996125)*FourierSin(5,2,t))+(-0.0162113893828)*((1114.86579249)*FourierCos(5,3,t)+(-4298.00670661)*FourierSin(5,3,t))+(1)*((48.9611640666)*FourierSin(5,4,t)-(-96.2300688659)*FourierCos(5,4,t))+(-0.00827111703203)*((267.940117617)*FourierCos(7,2,t)+(50.8672760368)*FourierSin(7,2,t))+(-0.00827111703203)*((-5616.81072722)*FourierCos(7,3,t)+(-8286.02683603)*FourierSin(7,3,t))+(-0.0050035152416)*((388.604929672)*FourierCos(9,2,t)+(-130.774144681)*FourierSin(9,2,t))+(-0.0050035152416)*((-20337.0714649)*FourierCos(9,3,t)+(-4985.00816575)*FourierSin(9,3,t))+(1)*((-65.1618126353)*FourierSin(10,1,t)-(5563.83049661)*FourierCos(10,1,t))+(1)*((45.7299452758)*FourierCos(10,4,t)+(-154.444865438)*FourierSin(10,4,t))+(-0.00334946061628)*((441.891544108)*FourierCos(11,2,t)+(-418.737507227)*FourierSin(11,2,t))+(-0.00334946061628)*((-37965.8545919)*FourierCos(11,3,t)+(16012.4520126)*FourierSin(11,3,t))+(-0.00239813452408)*((374.923581876)*FourierCos(13,2,t)+(-800.927218524)*FourierSin(13,2,t))+(-0.00239813452408)*((-43743.2575232)*FourierCos(13,3,t)+(63204.236361)*FourierSin(13,3,t))+(-0.00180126548697)*((135.321705641)*FourierCos(15,2,t)+(-1249.38095384)*FourierSin(15,2,t))+(-0.00180126548697)*((-13062.4731124)*FourierCos(15,3,t)+(136323.747211)*FourierSin(15,3,t))+(-0.00140236932377)*((-327.91327737)*FourierCos(17,2,t)+(-1722.12945235)*FourierSin(17,2,t))+(-0.00140236932377)*((84884.8536645)*FourierCos(17,3,t)+(218788.892318)*FourierSin(17,3,t))+(-0.00112267239493)*((-1068.01489974)*FourierCos(19,2,t)+(-2163.47533562)*FourierSin(19,2,t))+(-0.00112267239493)*((279354.051175)*FourierCos(19,3,t)+(271127.770716)*FourierSin(19,3,t))

Couplings
  aveop1: Average on boundaries 5 | opname = C1
  aveop2: Average on boundaries 4 | opname = C2
  aveop3: Average on boundaries 6 | opname = C3

Probes
  var3: GlobalVariable "C1(Xj)" | probename = var1; expr = C1(X); table = tbl1
  var4: GlobalVariable "C2(Xj)" | probename = var2; expr = C2(X); table = tbl1
  var5: GlobalVariable "C3(Xj)" | probename = var3; expr = C3(X); table = tbl1
  var1: GlobalVariable "gammac1" | probename = var4; expr = gammac1; table = tbl1
  var2: GlobalVariable "gammas1" | probename = var5; expr = gammas1; table = tbl1
  var6: GlobalVariable "gammac2" | expr = gammac2; table = tbl1
  var7: GlobalVariable "gammas2" | expr = gammas2; table = tbl1
  var8: GlobalVariable "gammac3" | expr = gammac3; table = tbl1
  var9: GlobalVariable "gammas3" | expr = gammas3; table = tbl1

Geometry
  geom2 "Geometry 2" (2D, length unit m)
    r1: Rectangle | pos = {-1, 0}; size = {2, 1}
    pol1: Polygon | type = open; x = {-0.25, 0.25}; y = {0.25, 0.75}
    pol2: Polygon | type = open; x = {0.5, 0.5}; y = {0.25, 0.75}
    pol3: Polygon | type = open; x = {-0.5, -0.5}; y = {0.25, 0.75}
    fin: Finalize "Form Union"

Physics
  c: CoefficientFormPDE "Unit Input" on all domains
    dependent variable X
    cfeq1: CoefficientFormPDE (default) | c = {c, 0, 0, c}; f = 0; da = 0
    zflx1: ZeroFluxBoundary "Zero Flux 1" (default)
    init1: init "Initial Values 1" (default)
    flux2: FluxBoundary "Bin1*delta(n,1)" on boundaries 1 | g = delta(n,1)
    flux3: FluxBoundary "Bin2*delta(n,2)" on boundaries 2 | g = delta(n,2); q = 5
    flux4: FluxBoundary "Bin3*delta(n,3)" on boundaries 3 | g = delta(n,3); q = 1
    dir1: DirichletBoundary "Bd*0" on boundaries 7 | r = 0
  c2: CoefficientFormPDE "Regulator Eqs" on all domains
    dependent variable PI = {PI1, PIt1, PI2, PIt2}
    cfeq1: CoefficientFormPDE (default)
      c = {{c, 0, 0, c}, {0, 0, 0, 0}, {0, 0, 0, 0}, {0, 0, 0, 0}, {0, 0, 0, 0}, {c, 0, 0, c}, {0, 0, 0, 0}, {0, 0, 0, 0}, {0, 0, 0, 0}, {0, 0, 0, 0}, {c, 0, 0, c}, {0, 0, 0, 0}, {0, 0, 0, 0}, {0, 0, 0, 0}, {0, 0, 0, 0}, {c, 0, 0, c}}
      a = {0, 0, -alpha(k,l), -alpha(k,l), 0, 0, 0, 0, alpha(k,l), alpha(k,l), 0, 0, 0, 0, 0, 0}
      f = {0, 0, 0, 0}
      da = {0, 0, 0, 0, 0, 0, 0, 0, 0, 0, 0, 0, 0, 0, 0, 0}
    zflx1: ZeroFluxBoundary "Zero Flux 1" (default)
    init1: init "Initial Values 1" (default)
    flux2: FluxBoundary "Bin1*gamma1" on boundaries 1 | g = {gammac1, 0, gammas1, 0}
    flux3: FluxBoundary "Bin2*gamma2" on boundaries 2
      g = {gammac2, 0, gammas2, 0}
      q = {5, 0, 0, 0, 0, 5, 0, 0, 0, 0, 5, 0, 0, 0, 0, 5}
    flux4: FluxBoundary "Bin3*gamma3" on boundaries 3
      g = {gammac3, 0, gammas3, 0}
      q = {1, 0, 0, 0, 0, 1, 0, 0, 0, 0, 1, 0, 0, 0, 0, 1}
    dir1: DirichletBoundary "Bd*P" on boundaries 7 | r = {Pc(l), Pc(l), Ps(l), Ps(l)}
  phys1: CoefficientFormPDE "Closed Loop System" on all domains
    dependent variable z
    cfeq1: CoefficientFormPDE (default) | c = {c, 0, 0, c}; f = 0; da = 1
    zflx1: ZeroFluxBoundary "Zero Flux 1" (default)
    init1: init "Initial Values 1" (default) | z = 1
    flux2: FluxBoundary "Bin1*Gamma1" on boundaries 1 | g = Gamma1
    flux3: FluxBoundary "Bin2*Gamma2" on boundaries 2 | g = Gamma2; q = 5
    flux1: FluxBoundary "Bin3*Gamma3" on boundaries 3 | g = Gamma3; q = 1
    dir1: DirichletBoundary "Bd*d1(t)" on boundaries 7 | r = d1(t)

Mesh
  mesh2 "Mesh 2" (physics-controlled)
    size: MeshSizeDefault | hauto = 2

Studies
  std1 "Study 1"
    param: Parametric "Parametric Sweep" | pname = n; plistarr = range(1,1,nmax)
    stat: Stationary | solve for = {c}
  std2 "Study 2"
    param: Parametric "Parametric Sweep"
      sweeptype = filled
      pname = {k, l}
      plistarr = {range(0,1,kmax), range(1,1,lmax)}
    stat: Stationary | solve for = {c2}
  std3 "Study 3"
    time: Transient "Time Dependent" | tlist = range(0,0.0125,14); rtol = 0.00001; solve for = {phys1}

Solver configurations
  sol3 "Solver 3" (study std3)
    v1: Variables "Dependent Variables 1"
    t1: Time "Time-Dependent Solver 1" | tlist = range(0,0.0125,14); rtol = 0.00001; atolglobal = 0.000010
      dDef: Direct
      fc1: FullyCoupled
  sol4 "Solver 4" (study std1)
    v1: Variables "Dependent Variables 1"
    s1: Stationary "Stationary Solver 1" | stol = 0.000010
      dDef: Direct
      p1: Parametric | pname = n; plistarr = range(1,1,nmax); pcontinuationmode = no
      fc1: FullyCoupled
  sol5 "Solver 5" (study std2)
    v1: Variables "Dependent Variables 1"
    s1: Stationary "Stationary Solver 1" | stol = 0.000010
      dDef: Direct
      p1: Parametric
        sweeptype = filled
        pname = {k, l}
        plistarr = {range(0,1,kmax), range(1,1,lmax)}
        pcontinuationmode = no
      fc1: FullyCoupled

Datasets
  dset1: Solution | solution = sol4
  dset2: Solution "Probe Solution 2" | solution = sol3
  dset3: Solution | solution = sol5
  dset4: Solution | solution = sol3

Derived values
  gev1: EvalGlobal "C1(Xj)" | data = dset2; table = tbl1; expr = C1(X)
  gev2: EvalGlobal "C2(Xj)" | data = dset2; table = tbl1; expr = C2(X)
  gev3: EvalGlobal "C3(Xj)" | data = dset2; table = tbl1; expr = C3(X)
  gev4: EvalGlobal "gammac1" | data = dset2; table = tbl1; expr = gammac1
  gev5: EvalGlobal "gammas1" | data = dset2; table = tbl1; expr = gammas1
  gev6: EvalGlobal "gammac2" | data = dset2; table = tbl1; expr = gammac2
  gev7: EvalGlobal "gammas2" | data = dset2; table = tbl1; expr = gammas2
  gev8: EvalGlobal "gammac3" | data = dset2; table = tbl1; expr = gammac3
  gev9: EvalGlobal "gammas3" | data = dset2; table = tbl1; expr = gammas3

Tables
  tbl1: Table "Probe Table 1"
    k | l | , gammac1 | , gammas1 | , gammac2 | , gammas2 | , gammac3 | , gammas3
    0 | -2.59551 | 0 | -845.09 | 0 | 201.081 | 0
    0 | 1.61133 | 0 | 170.618 | 0 | -40.7833 | 0
    0 | 1.13279 | 0 | 858.287 | 0 | -200.928 | 0
    0 | -0.1486 | 0 | -178.815 | 0 | 41.6304 | 0
    1 | -1.9818 | 2.32152 | -564.984 | 790.12 | 119.795 | -203.733
    1 | -0.721707 | -3.11019 | 149.105 | -166.555 | -31.2159 | 48.3197
    1 | 0.735719 | -1.37765 | -64.4344 | -1320.18 | 64.0933 | 321.868
    1 | -0.159892 | 0.0277791 | -179.95 | 61.8382 | 41.2837 | -18.7666
    2 | -0.182085 | 4.32328 | 249.798 | 1357.21 | -114.408 | -332.748
    2 | -6.79532 | -2.67398 | 104.069 | -323.648 | -9.50365 | 95.3158
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
Plots
  pg8: PlotGroup1D "Probe 1D Plot Group 8"
    tblp1: Table "Probe Table Graph 1" | table = tbl2; plotcolumninput = manual
    tblp2: Table "Probe Table Graph 2" | table = tbl3; plotcolumninput = manual
    tblp3: Table "Probe Table Graph 3" | table = tbl1
  pg9: PlotGroup1D "Probe 1D Plot Group 9"
    tblp1: Table "Probe Table Graph 1" | table = tbl1
  pg10: PlotGroup2D "2D Plot Group 10" | data = dset1
    surf1: Surface | expr = X
  pg11: PlotGroup2D "2D Plot Group 11" | data = dset3
    surf1: Surface | expr = PI1
  pg12: PlotGroup2D "2D Plot Group 12" | data = dset4
    surf1: Surface | expr = z
  pg13: PlotGroup1D "1D Plot Group 13" | data = dset4
    glob1: Global | expr = {yr1(t), C1(z), yr2(t), C2(z), yr3(t), C3(z)}
  pg14: PlotGroup1D "1D Plot Group 14" | data = dset4
    glob1: Global | expr = {yr1(t)-C1(z), yr2(t)-C2(z), yr3(t)-C3(z)}