// COMSOL Multiphysics 5.0.1.276 model "Ch4_Ex4_1-Chafee-Infante.mph"
// Ch4 Ex4 1-Chafee-Infante
// Outline of the model tree

Parameters
  L = 1
  M = .75
  x0 = .75
  dx0 = .02
  x1 = .25
  k0 = 1
  k1 = 2

Variables
  var1 "Variables 1a"
    G = C(X)
    gamma = (M-C(PIT))/G
    u = gamma
    e = C(z)-M

Couplings
  intop1: Integration on boundaries 2 | opname = C

Geometry
  geom1 "Geometry 1" (1D, length unit m)
    i1: Interval | intervals = many; p = 0, x1, x0-dx0,x0+dx0,L
    fin: Finalize "Form Union"

Physics
  c: CoefficientFormPDE "Unit Input" on all domains
    dependent variable X
    cfeq1: CoefficientFormPDE (default) | c = 1; f = 0; da = 0
    zflx1: ZeroFluxBoundary "Zero Flux" (default)
    init1: init "Initial Values 1" (default)
    src1: SourceTerm "Bin*1" on domains 3 | f = 1
    flux1: FluxBoundary "Robin x=0" on boundaries 1 | q = k0
    flux2: FluxBoundary "Robin x=L" on boundaries 5 | q = k1
  c2: CoefficientFormPDE "Invariant Manifold" on all domains
    dependent variable PI = {PI, PIT}
    cfeq1: CoefficientFormPDE (default) | c = {1, 0, 0, 1}; f = {PI-PI^3, PI-PI^3}; da = {0, 0, 0, 0}
    zflx1: ZeroFluxBoundary "Zero Flux" (default)
    init1: init "Initial Values 1" (default)
    src1: SourceTerm "Bin*gamma" on domains 3 | f = {gamma, 0}
    flux1: FluxBoundary "Robin x=0" on boundaries 1 | q = {k0, 0, 0, k0}
    flux2: FluxBoundary "Robin x=L" on boundaries 5 | q = {k1, 0, 0, k1}
  c3: CoefficientFormPDE "Close Loop System" on all domains
    dependent variable z
    cfeq1: CoefficientFormPDE (default) | c = 1; f = z-z^3; da = 1
    zflx1: ZeroFluxBoundary "Zero Flux" (default)
    init1: init "Initial Values 1" (default) | z = .5*cos(pi*x)
    src1: SourceTerm "Bin*u" on domains 3 | f = u
    flux1: FluxBoundary "Robin x=0" on boundaries 1 | q = k0
    flux2: FluxBoundary "Robin x=L" on boundaries 5 | q = k1

Mesh
  mesh1 "Mesh 1" (physics-controlled)
    size: MeshSizeDefault | hauto = 2

Studies
  std1 "Study 1"
    stat: Stationary | physselection = c; solve for = {c}
  std2 "Study 2"
    stat: Stationary | physselection = c; solve for = {c2}; usesol = on; notsolmethod = sol; notstudy = std1
  std3 "Study 3"
    time: Transient "Time Dependent"
      tlist = range(0,0.01,6)
      rtol = 0.0001
      solve for = {c3}
      usesol = on
      notsolmethod = sol
      notstudy = std2

Solver configurations
  sol1 "Solver 1" (study std1)
    v1: Variables "Dependent Variables 1"
    s1: Stationary "Stationary Solver 1" | stol = 0.000010
      dDef: Direct
      fc1: FullyCoupled | linsolver = dDef
  sol2 "Solver 2" (study std2)
    // same settings as sol1
  sol3 "Solver 3" (study std3)
    v1: Variables "Dependent Variables 1"
    t1: Time "Time-Dependent Solver 1" | tlist = range(0,0.01,6)
      dDef: Direct
      fc1: FullyCoupled | linsolver = dDef

Datasets
  dset1: Solution | solution = sol1
  dset2: Solution | solution = sol2
  dset3: Solution | solution = sol3

Derived values
  gev1: EvalGlobal "Global Evaluation 1" | data = dset2; table = tbl1; expr = gamma

Tables
  tbl1: Table
    // Global Evaluation 1 (C(X))
    gamma
    37.4414

Plots
  pg1: PlotGroup1D "1D Plot Group 1" | data = dset1
    lngr1: LineGraph on all domains | expr = X; xdata = expr; xdataexpr = x
  pg2: PlotGroup1D "1D Plot Group 2" | data = dset2
    lngr1: LineGraph on all domains | expr = PI; xdata = expr; xdataexpr = x
  pg3: PlotGroup1D "1D Plot Group 3" | data = dset3
    lngr1: LineGraph on all domains | expr = z; xdata = expr; xdataexpr = x
  pg4: PlotGroup1D "1D Plot Group 4" | data = dset3
    glob1: Global | expr = {C(z), M}
  pg5: PlotGroup1D "1D Plot Group 5" | data = dset3
    glob1: Global | expr = {e, }