// COMSOL Multiphysics 5.0.1.276 model "Ch4_Ex4.2_MIMO_SetPoint_Burger.mph"
// Ch4 Ex4.2 MIMO SetPoint Burger
// Outline of the model tree

Parameters
  L = 1
  x0 = L/4
  x1 = L/2
  x2 = 3/4*L
  c = 0.2
  yr1 = 0.5
  yr2 = 0.75
  d = 0.35

Variables
  var1 "Variables 1a"
    G11 = C1(X1)
    G12 = C1(X2)
    G21 = C2(X1)
    G22 = C2(X2)
    Det = G11*G22-G12*G21
    g11 = G22/Det
    g12 = -G12/Det
    g21 = -G21/Det
    g22 = G11/Det
    Fz0 = -z0*z0x
    gamma1 = g11*(yr1-C1(zt0))+g12*(yr2-C2(zt0))
    gamma2 = g21*(yr1-C1(zt0))+g22*(yr2-C2(zt0))
    Fz = -z*zx
    u1 = gamma1
    u2 = gamma2
    e1 = yr1-C1(z)
    e2 = yr2-C2(z)

Couplings
  intop1: Integration on boundaries 2 | opname = C1
  intop2: Integration on boundaries 4 | opname = C2

Geometry
  geom1 "Geometry 1" (1D, length unit m)
    i1: Interval | intervals = many; p2 = 1; p = 0, x0,x1,x2,L
    fin: Finalize "Form Union"

Physics
  c: CoefficientFormPDE "Unit Input" on all domains
    dependent variable X = {X1, X2}
    cfeq1: CoefficientFormPDE (default) | c = {c, 0, 0, c}; f = {0, 0}; da = {0, 0, 0, 0}
    zflx1: ZeroFluxBoundary "Zero Flux 1" (default)
    init1: init "Initial Values 1" (default)
    dir1: DirichletBoundary "Bd*0" on boundaries 1 | r = {0, 0}
    flux1: FluxBoundary "Bin1*[1,0]" on boundaries 3 | g = {1, 0}
    flux2: FluxBoundary "Bin2*[0,1]" on boundaries 5 | g = {0, 1}; q = {0, 0, 0, 0}
  c2: CoefficientFormPDE "Regulator Equation" on all domains
    dependent variable z0 = {z0, zt0}
    cfeq1: CoefficientFormPDE (default) | c = {c, 0, 0, c}; f = {Fz0, Fz0}; da = {0, 0, 0, 0}
    zflx1: ZeroFluxBoundary "Zero Flux 1" (default)
    init1: init "Initial Values 1" (default)
    dir1: DirichletBoundary "Bd*[d,d]" on boundaries 1 | r = {d, d}
    flux1: FluxBoundary "Bin1*[gamma1,0]" on boundaries 3 | g = {gamma1, 0}
    flux2: FluxBoundary "Bin2*[gamma2,0]" on boundaries 5 | g = {gamma2, 0}; q = {0, 0, 0, 0}
  phys2: CoefficientFormPDE "Closed Loop System" on all domains
    dependent variable z
    cfeq1: CoefficientFormPDE (default) | c = c; f = Fz; da = 1
    zflx1: ZeroFluxBoundary "Zero Flux 1" (default)
    init1: init "Initial Values 1" (default) | z = 0
    dir1: DirichletBoundary "Bd*d" on boundaries 1 | r = d
    flux1: FluxBoundary "Bin1*u1" on boundaries 3 | g = u1
    flux2: FluxBoundary "Bin2*u2" on boundaries 5 | g = u2; q = 0

Mesh
  mesh1 "Mesh 1" (physics-controlled)
    size: MeshSizeDefault | hauto = 2

Studies
  std1 "Study 1"
    stat: Stationary | physselection = c; solve for = {c}
  std2 "Study 2"
    stat: Stationary | physselection = c; solve for = {c2}; usesol = on; notsolmethod = sol; notstudy = std1
  std3 "Study 3"
    time: Transient "Time Dependent"
      tlist = range(0,0.01,10)
      rtol = 0.0001
      physselection = c
      solve for = {phys2}
      usesol = on
      notsolmethod = sol
      notstudy = std2

Solver configurations
  sol1 "Solver 1" (study std1)
    v1: Variables "Dependent Variables 1"
    s1: Stationary "Stationary Solver 1" | stol = 0.0000010
      dDef: Direct
      fc1: FullyCoupled | linsolver = dDef
  sol2 "Solver 2" (study std2)
    // same settings as sol1
  sol3 "Solver 3" (study std3)
    v1: Variables "Dependent Variables 1"
    t1: Time "Time-Dependent Solver 1" | tlist = range(0,0.01,10); atolglobal = 0.000010
      dDef: Direct
      fc1: FullyCoupled | linsolver = dDef

Datasets
  dset1: Solution | solution = sol1
  dset2: Solution | solution = sol2
  dset3: Solution | solution = sol3

Derived values
  gev1: EvalGlobal "Global Evaluation 1" | data = dset3; table = tbl1; expr = e2

Tables
  tbl1: Table
    // Global Evaluation 1 (C1(z))
    Time (s) | C1(z) | C2(z) | e1 | e2
    0 | 1.24845e-13 | -1.15354e-15 | 0.5 | 0.75
    0.01 | 2.90141e-05 | 3.7778e-07 | 0.499971 | 0.75
    0.02 | 0.00199209 | 4.56332e-05 | 0.498008 | 0.749954
    0.03 | 0.00890342 | 0.000278248 | 0.491097 | 0.749722
    0.04 | 0.0195993 | 0.000753864 | 0.480401 | 0.749246
    0.05 | 0.0322081 | 0.00144468 | 0.467792 | 0.748555
    0.06 | 0.0455365 | 0.00230503 | 0.454463 | 0.747695
    0.07 | 0.0589359 | 0.00329503 | 0.441064 | 0.746705
    0.08 | 0.0720708 | 0.00438599 | 0.427929 | 0.745614
    0.09 | 0.0847796 | 0.00555977 | 0.41522 | 0.74444
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
Plots
  pg1: PlotGroup1D "1D Plot Group 1" | data = dset1
    lngr1: LineGraph on all domains | expr = X1; xdata = expr; xdataexpr = x
    lngr2: LineGraph on all domains | expr = X2; xdata = expr; xdataexpr = x
  pg2: PlotGroup1D "1D Plot Group 2" | data = dset2
    lngr1: LineGraph on all domains | expr = z0; xdata = expr; xdataexpr = x
  pg3: PlotGroup1D "1D Plot Group 3" | data = dset3
    lngr1: LineGraph on all domains | expr = z; xdata = expr; xdataexpr = x
  pg4: PlotGroup1D "1D Plot Group 4" | data = dset3
    glob1: Global | expr = {yr1, yr2, C1(z), C2(z)}
  pg5: PlotGroup1D "1D Plot Group 5" | data = dset3
    glob1: Global | expr = {e1, e2, , }

Exports
  data1: Data
    data = dset3
    expr = z
    filename = /Users/gilliam/Desktop/collect_14/research14/Mono_1_14_EA/Comsol_exs/Chapter4/Example4.2/matlab_figs/surf_data.txt