// COMSOL Multiphysics 5.0.1.276 model "Ch4_Ex4.3_Chafee_Infante_Eqn.mph"
// Ch4 Ex4.3 Chafee Infante Eqn
// Outline of the model tree

Parameters
  L = 1
  x0 = L/4
  x1 = L/2
  x2 = 3/4*L
  alpha = 10
  lambda = 10
  beta = 0.1

Variables
  var1 "Variables 1a"
    G11 = C1(X1)
    G12 = C1(X2)
    G21 = C2(X1)
    G22 = C2(X2)
    Det = G11*G22-G12*G21
    g11 = G22/Det
    g12 = -G12/Det
    g21 = -G21/Det
    g22 = G11/Det
    Fz0 = -lambda*(z0^3-z0)
    gamma10 = g11*(yr10-C1(zt0))+g12*(yr20-C2(zt0))
    gamma20 = g21*(yr10-C1(zt0))+g22*(yr20-C2(zt0))
    d0 = 0.75
    yr10 = 1
    yr20 = 0.5
    Fz1 = -lambda*(z1^3-z1)
    gamma1 = g11*(yr1-C1(zt1))+g12*(yr2-C2(zt1))
    gamma2 = g21*(yr1-C1(zt1))+g22*(yr2-C2(zt1))
    d = d0+0.25*flc2hs(t-50,1)-0.25*flc2hs(t-100,1)
    yr1 = yr10-0.25*flc2hs(t-25,1)+0.5*flc2hs(t-75,1)-0.25*flc2hs(t-125,1)
    yr2 = yr20-0.25*flc2hs(t-40,1)+0.5*flc2hs(t-90,1)-0.25*flc2hs(t-140,1)
    Fz = -lambda*(z^3-z)
    u1 = gamma1
    u2 = gamma2
    e1 = yr1-C1(z)
    e2 = yr2-C2(z)

Couplings
  intop1: Integration on boundaries 2 | opname = C1
  intop2: Integration on boundaries 4 | opname = C2

Geometry
  geom1 "Geometry 1" (1D, length unit m)
    i1: Interval | intervals = many; p2 = 1; p = 0, x0,x1,x2,L
    fin: Finalize "Form Union"

Physics
  c: CoefficientFormPDE "Unit Input" on all domains
    dependent variable X = {X1, X2}
    cfeq1: CoefficientFormPDE (default) | c = {1, 0, 0, 1}; f = {0, 0}; da = {0, 0, 0, 0}
    zflx1: ZeroFluxBoundary "Zero Flux 1" (default)
    init1: init "Initial Values 1" (default)
    dir1: DirichletBoundary "Bd*0" on boundaries 1 | r = {0, 0}
    flux1: FluxBoundary "Bin1*[1,0]" on boundaries 3 | g = {1, 0}
    flux2: FluxBoundary "Bin2*[0,1]" on boundaries 5 | g = {0, 1}; q = {alpha, 0, 0, alpha}
  c2: CoefficientFormPDE "Initial Solution" on all domains
    dependent variable z0 = {z0, zt0}
    cfeq1: CoefficientFormPDE (default) | c = {1, 0, 0, 1}; f = {Fz0, Fz0}; da = {0, 0, 0, 0}
    zflx1: ZeroFluxBoundary "Zero Flux 1" (default)
    init1: init "Initial Values 1" (default)
    dir1: DirichletBoundary "Bd*[d0,d0]" on boundaries 1 | r = {d0, d0}
    flux1: FluxBoundary "Bin1*[gamma10,0]" on boundaries 3 | g = {gamma10, 0}
    flux2: FluxBoundary "Bin2*[gamma20,0]" on boundaries 5 | g = {gamma20, 0}; q = {alpha, 0, 0, alpha}
  phys1: CoefficientFormPDE "Regulator Equation" on all domains
    dependent variable z1 = {z1, zt1}
    cfeq1: CoefficientFormPDE (default) | c = {1, 0, 0, 1}; f = {Fz1, Fz1}; da = {1, (1-beta), 0, 0}
    zflx1: ZeroFluxBoundary "Zero Flux 1" (default)
    init1: init "Initial Values: z0" (default) | z1 = z0
    dir1: DirichletBoundary "Bd*[d, d]" on boundaries 1 | r = {d, d}
    flux1: FluxBoundary "Bin1*[gamma1,0]" on boundaries 3 | g = {gamma1, 0}
    flux2: FluxBoundary "Bin2*[gamma2,0]" on boundaries 5 | g = {gamma2, 0}; q = {alpha, 0, 0, alpha}
  phys2: CoefficientFormPDE "Closed Loop System" on all domains
    dependent variable z
    cfeq1: CoefficientFormPDE (default) | c = 1; f = Fz; da = 1
    zflx1: ZeroFluxBoundary "Zero Flux 1" (default)
    init1: init "Initial Values 1" (default) | z = cos(x)
    dir1: DirichletBoundary "Bd*d" on boundaries 1 | r = d
    flux1: FluxBoundary "Bin1*u1" on boundaries 3 | g = u1
    flux2: FluxBoundary "Bin2*u2" on boundaries 5 | g = u2; q = alpha

Mesh
  mesh1 "Mesh 1" (physics-controlled)
    size: MeshSizeDefault | hauto = 5

Studies
  std1 "Study 1"
    stat: Stationary | physselection = c; solve for = {c}
  std2 "Study 2"
    stat: Stationary | physselection = c; solve for = {c2}; usesol = on; notsolmethod = sol; notstudy = std1
  std3 "Study 3"
    time: Transient "Time Dependent"
      tlist = range(0,0.5,150)
      rtol = 0.0001
      physselection = c
      solve for = {phys1, phys2}
      usesol = on
      notsolmethod = sol
      notstudy = std2

Solver configurations
  sol1 "Solver 1" (study std1)
    v1: Variables "Dependent Variables 1"
    s1: Stationary "Stationary Solver 1" | stol = 0.0000010
      dDef: Direct
      fc1: FullyCoupled | linsolver = dDef
  sol2 "Solver 2" (study std2)
    // same settings as sol1
  sol3 "Solver 3" (study std3)
    v1: Variables "Dependent Variables 1"
    t1: Time "Time-Dependent Solver 1" | tlist = range(0,0.5,150); atolglobal = 0.000010
      dDef: Direct
      fc1: FullyCoupled | linsolver = dDef

Datasets
  dset1: Solution | solution = sol1
  dset2: Solution | solution = sol2
  dset3: Solution | solution = sol3

Derived values
  gev1: EvalGlobal "Global Evaluation 1" | data = dset3; table = tbl1; expr = d

Tables
  tbl1: Table
    // Global Evaluation 1 (C1(z))
    Time (s) | C1(z) | yr1 | C2(z) | yr2 | u1 | u2 | e1 | e2 | d
    0 | 0.968801 | 1 | 0.732491 | 0.5 | 93.7846 | -149.955 | 0.0311986 | -0.232491 | 0.75
    0.5 | 1.00001 | 1 | 0.500027 | 0.5 | 4.81837 | -7.44781 | -6.41849e-06 | -2.71683e-05 | 0.75
    1 | 1 | 1 | 0.5 | 0.5 | 4.81843 | -7.4482 | -4.09477e-08 | -1.8677e-07 | 0.75
    1.5 | 1 | 1 | 0.5 | 0.5 | 4.81843 | -7.4482 | -4.41697e-09 | -2.01467e-08 | 0.75
    2 | 1 | 1 | 0.5 | 0.5 | 4.81843 | -7.4482 | -1.76875e-09 | -8.06762e-09 | 0.75
    2.5 | 1 | 1 | 0.5 | 0.5 | 4.81843 | -7.4482 | -2.59315e-10 | -1.18282e-09 | 0.75
    3 | 1 | 1 | 0.5 | 0.5 | 4.81843 | -7.4482 | -1.76298e-10 | -8.04168e-10 | 0.75
    3.5 | 1 | 1 | 0.5 | 0.5 | 4.81843 | -7.4482 | -9.32803e-11 | -4.25512e-10 | 0.75
    4 | 1 | 1 | 0.5 | 0.5 | 4.81843 | -7.4482 | -1.02627e-11 | -4.68557e-11 | 0.75
    4.5 | 1 | 1 | 0.5 | 0.5 | 4.81843 | -7.4482 | -7.96563e-12 | -3.63785e-11 | 0.75
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
Plots
  pg1: PlotGroup1D "1D Plot Group 1" | data = dset1
    lngr1: LineGraph on all domains | expr = X1; xdata = expr; xdataexpr = x
    lngr2: LineGraph on all domains | expr = X2; xdata = expr; xdataexpr = x
  pg2: PlotGroup1D "1D Plot Group 2" | data = dset2
    lngr1: LineGraph on all domains | expr = z0; xdata = expr; xdataexpr = x
  pg3: PlotGroup1D "1D Plot Group 3" | data = dset3
    lngr1: LineGraph on all domains | expr = z1; xdata = expr; xdataexpr = x
  pg4: PlotGroup1D "1D Plot Group 4" | data = dset3
    glob1: Global | expr = {yr1, yr2, C1(z1), C2(z1)}
  pg5: PlotGroup1D "1D Plot Group 5" | data = dset3
    glob1: Global | expr = {e1, e2, , }

Exports
  data1: Data
    data = dset3
    expr = z
    filename = /Users/gilliam/Desktop/collect_14/research14/Mono_1_14_EA/Comsol_exs/Chapter4/Example4.3/matlab_figs/z_data.txt