// COMSOL Multiphysics 5.0.1.276 model "Ch4_Ex4_4_Burger'sEqn.mph"
// Ch4 Ex4 4 Burger'sEqn
// Outline of the model tree

Parameters
  L = 1
  x0 = L/2
  c = 1
  M1 = 0.5
  M2 = 0.75
  A1 = 0.25
  A2 = 1
  alpha1 = 2*pi
  alpha2 = pi
  beta1 = 0.5
  beta2 = 0.05

Variables
  var1 "Variables 1a"
    yr = M1+A1*sin(alpha1*t)
    d = M2+A2*sin(alpha2*t)
    G = C(X)
    Fz0 = -z0*z0x
    Gamma = (M1-C(zt0) )/G
    e0 = yr
    Z1 = z1
    FZ1 = -Z1*d(Z1,x)
    gamma1 = (e0-C(zt1))/G
    e1 = yr-C(Z1)
    Z2 = Z1+z2
    FZ2 = -Z2*d(Z2,x)
    gamma2 = (e1-C(zt2))/G
    e2 = yr-C(Z2)
    Z3 = Z2+z3
    FZ3 = -Z3*d(Z3,x)
    gamma3 = (e2-C(zt3))/G
    e3 = yr-C(Z3)
    Z4 = Z3+z4
    FZ4 = -Z4*d(Z4,x)
    gamma4 = (e3-C(zt4))/G
    e4 = yr-C(Z4)
    u = (t>0)*(gamma1+gamma2+gamma3+gamma4)
    e = yr-C(z)
    beta = beta1+(beta2-beta1)*flc2hs(t+6,3)

Couplings
  intop1: Integration on boundaries 2 | opname = C

Geometry
  geom1 "Geometry 1" (1D, length unit m)
    i1: Interval | intervals = many; p2 = 1; p = 0, x0,L
    fin: Finalize "Form Union"

Physics
  c: CoefficientFormPDE "Unit Input" on all domains
    dependent variable X
    cfeq1: CoefficientFormPDE (default) | c = c; f = 0; da = 0
    zflx1: ZeroFluxBoundary "Zero Flux 1" (default)
    init1: init "Initial Values 1" (default)
    dir1: DirichletBoundary "Bd*0" on boundaries 1 | r = 0
    flux1: FluxBoundary "Bin*1" on boundaries 3 | g = 1
  c2: CoefficientFormPDE "Initial Solution" on all domains
    dependent variable z0 = {z0, zt0}
    cfeq1: CoefficientFormPDE (default) | c = {c, 0, 0, c}; f = {Fz0, Fz0}; da = {0, 0, 0, 0}
    zflx1: ZeroFluxBoundary "Zero Flux 1" (default)
    init1: init "Initial Values 1" (default)
    dir1: DirichletBoundary "Bd*M2" on boundaries 1 | r = {M2, M2}
    flux1: FluxBoundary "Bin*Gamma" on boundaries 3 | g = {Gamma, 0}
  phys1: CoefficientFormPDE "Iterative Solutions" on all domains
    dependent variable zi = {z1, zt1, z2, zt2, z3, zt3, z4, zt4}
    cfeq1: CoefficientFormPDE (default)
      c = {c, 0, 0, 0, 0, 0, 0, 0, 0, c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}
      f = {FZ1, FZ1, FZ2-FZ1, FZ2-FZ1, FZ3-FZ2, FZ3-FZ2, FZ4-FZ3, FZ4-FZ3}
      da = {1, (1-beta), 0, 0, 0, 0, 0, 0, 0, 0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}
    zflx1: ZeroFluxBoundary "Zero Flux 1" (default)
    init1: init "Initial Values: [z0, 0, 0, ...]" (default) | z1 = z0
    dir1: DirichletBoundary "Bd*[d, 0, 0, ...]" on boundaries 1 | r = {d, d, 0, 0, 0, 0, 0, 0}
    flux1: FluxBoundary "Bin*[gamma1, gamma2, gamma3, ...]" on boundaries 3
      g = {gamma1, 0, gamma2, 0, gamma3, 0, gamma4, 0}
  phys2: CoefficientFormPDE "Closed Loop System" on all domains
    dependent variable z
    cfeq1: CoefficientFormPDE (default) | c = c; f = -z*zx; da = 1
    zflx1: ZeroFluxBoundary "Zero Flux 1" (default)
    init1: init "Initial Values 1" (default) | z = M2
    dir1: DirichletBoundary "Bd*d" on boundaries 1 | r = M2+A2*sin(alpha2*t)*(t>0)
    flux1: FluxBoundary "Bin*u" on boundaries 3 | g = u

Mesh
  mesh1 "Mesh 1" (physics-controlled)
    size: MeshSizeDefault | hauto = 5

Studies
  std1 "Study 1"
    stat: Stationary | physselection = c; solve for = {c}
  std2 "Study 2"
    stat: Stationary | physselection = c; solve for = {c2}; usesol = on; notsolmethod = sol; notstudy = std1
  std3 "Study 3"
    time: Transient "Time Dependent"
      tlist = range(-10,0.01,6)
      rtol = 0.001
      solve for = {phys1, phys2}
      usesol = on
      notsolmethod = sol
      notstudy = std2

Solver configurations
  sol1 "Solver 1" (study std1)
    v1: Variables "Dependent Variables 1"
    s1: Stationary "Stationary Solver 1" | stol = 0.0000010
      dDef: Direct
      fc1: FullyCoupled | linsolver = dDef
  sol2 "Solver 2" (study std2)
    // same settings as sol1
  sol3 "Solver 3" (study std3)
    v1: Variables "Dependent Variables 1"
    t1: Time "Time-Dependent Solver 1" | tlist = range(-10,0.01,6); atolglobal = 0.000010
      dDef: Direct
      fc1: FullyCoupled | linsolver = dDef

Datasets
  dset1: Solution | solution = sol1
  dset2: Solution | solution = sol2
  dset3: Solution | solution = sol3

Derived values
  gev1: EvalGlobal "Global Evaluation 1" | data = dset3; table = tbl1; expr = beta

Tables
  tbl1: Table
    // Global Evaluation 1 (C(z))
    Time (s) | C(z) | yr | d | C(Z1) | e1 | C(Z2) | e2 | C(Z3) | e3 | C(Z4) | e4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
    -10 | 0.75 | 0.5 | 0.75 | -6.02953e-08 | 0.5 | -6.0109e-08 | 0.5 | -5.99227e-08 | 0.5 | -5.97363e-08 | 0.5
    -9.99 | 0.75 | 0.515698 | 0.781411 | 0.000334407 | 0.515363 | 0.000365104 | 0.515333 | 0.000395737 | 0.515302 | 0.000426305 | 0.515271
    -9.98 | 0.75 | 0.531333 | 0.812791 | 0.0101477 | 0.521186 | 0.0117728 | 0.519561 | 0.0133871 | 0.517946 | 0.0149906 | 0.516343
    -9.97 | 0.75 | 0.546845 | 0.844108 | 0.0348218 | 0.512023 | 0.0423622 | 0.504483 | 0.0498099 | 0.497035 | 0.0571665 | 0.489679
    -9.96 | 0.75 | 0.562172 | 0.875333 | 0.0673312 | 0.494841 | 0.0850733 | 0.477099 | 0.102485 | 0.459687 | 0.119575 | 0.442598
    -9.95 | 0.75 | 0.577254 | 0.906434 | 0.102602 | 0.474652 | 0.133624 | 0.443631 | 0.163845 | 0.413409 | 0.193291 | 0.383963
    -9.94 | 0.75 | 0.592031 | 0.937381 | 0.138221 | 0.45381 | 0.184425 | 0.407606 | 0.229057 | 0.362974 | 0.272185 | 0.319846
    -9.93 | 0.75 | 0.606445 | 0.968143 | 0.173086 | 0.433358 | 0.235443 | 0.371002 | 0.295094 | 0.311351 | 0.352193 | 0.254251
    -9.92 | 0.75 | 0.620438 | 0.99869 | 0.206732 | 0.413707 | 0.285523 | 0.334916 | 0.360072 | 0.260366 | 0.430681 | 0.189758
    -9.91 | 0.75 | 0.633957 | 1.02899 | 0.239001 | 0.394956 | 0.334027 | 0.299929 | 0.422845 | 0.211112 | 0.505979 | 0.127977
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
Plots
  pg1: PlotGroup1D "1D Plot Group 1" | data = dset1
    lngr1: LineGraph on all domains | expr = X; xdata = expr; xdataexpr = x
  pg2: PlotGroup1D "1D Plot Group 2" | data = dset2
    lngr1: LineGraph on all domains | expr = z0; xdata = expr; xdataexpr = x
  pg3: PlotGroup1D "1D Plot Group 3" | data = dset3
    lngr1: LineGraph on all domains | expr = z; xdata = expr; xdataexpr = x
  pg4: PlotGroup1D "1D Plot Group 4" | data = dset3
    glob1: Global | expr = {e1, e2, e3, e4, e, beta}
  pg5: PlotGroup1D "1D Plot Group 5" | data = dset3
    glob1: Global | expr = {e3, e4, e}
  pg6: PlotGroup1D "1D Plot Group 6" | data = dset3
    glob1: Global | data = dset3; expr = {yr, C(z), }

Exports
  data1: Data
    data = dset3
    expr = z
    filename = /Users/gilliam/Desktop/collect_14/research14/Mono_1_14_EA/Comsol_exs/Chapter4/Example4.4/matlab_figs/surf_data.txt