// COMSOL Multiphysics 5.0.1.276 model "Ch4_Ex4.5_NLFourierSeries_Burger_exportdata.mph"
// Ch4 Ex4.5 NLFourierSeries Burger exportdata
// Outline of the model tree

Parameters
  L = 1
  x0 = 0.5
  M1 = 0.5
  A1 = 0.25
  alpha = pi
  alpha1 = 2*alpha
  M2 = 0.75
  A2 = 1.
  alpha2 = alpha
  N = 5

Variables
  var2 "Variables 1"
    f_a0 = -0.5*d(0.5*a0*a0+a1*a1+a2*a2+a3*a3+a4*a4+a5*a5+b1*b1+b2*b2+b3*b3+b4*b4+b5*b5,x)
    f_a1 = -0.5*d(a0*a1+0.5*a1*a2+0.5*a2*a1+0.5*a2*a3+0.5*a3*a2+0.5*a3*a4+0.5*a4*a3+0.5*a4*a5+0.5*a5*a4+0.5*b1*b2+0.5*b2*b1+0.5*b2*b3+0.5*b3*b2+0.5*b3*b4+0.5*b4*b3+0.5*b4*b5+0.5*b5*b4,x)*(N>0)
    f_b1 = -0.5*d(a0*b1+a1*b2-a2*b1+a2*b3-a3*b2+a3*b4-a4*b3+a4*b5-a5*b4,x)*(N>0)
    f_a2 = -0.5*d(a0*a2+0.5*a1*a1+0.5*a1*a3+0.5*a2*a4+0.5*a3*a1+0.5*a3*a5+0.5*a4*a2+0.5*a5*a3-0.5*b1*b1+0.5*b1*b3+0.5*b2*b4+0.5*b3*b1+0.5*b3*b5+0.5*b4*b2+0.5*b5*b3,x)*(N>1)
    f_b2 = -0.5*d(a0*b2+a1*b1+a1*b3+a2*b4-a3*b1+a3*b5-a4*b2-a5*b3,x)*(N>1)
    f_a3 = -0.5*d(a0*a3+0.5*a1*a2+0.5*a1*a4+0.5*a2*a1+0.5*a2*a5+0.5*a4*a1+0.5*a5*a2-0.5*b1*b2+0.5*b1*b4-0.5*b2*b1+0.5*b2*b5+0.5*b4*b1+0.5*b5*b2,x)*(N>2)
    f_b3 = -0.5*d(a0*b3+a1*b2+a1*b4+a2*b1+a2*b5-a4*b1-a5*b2,x)*(N>2)
    f_a4 = -0.5*d(a0*a4+0.5*a1*a3+0.5*a1*a5+0.5*a2*a2+0.5*a3*a1+0.5*a5*a1-0.5*b1*b3+0.5*b1*b5-0.5*b2*b2-0.5*b3*b1+0.5*b5*b1,x)*(N>3)
    f_b4 = -0.5*d(a0*b4+a1*b3+a1*b5+a2*b2+a3*b1-a5*b1,x)*(N>3)
    f_a5 = -0.5*d(a0*a5+0.5*a1*a4+0.5*a2*a3+0.5*a3*a2+0.5*a4*a1-0.5*b1*b4-0.5*b2*b3-0.5*b3*b2-0.5*b4*b1,x)*(N>4)
    f_b5 = -0.5*d(a0*b5+a1*b4+a2*b3+a3*b2+a4*b1,x)*(N>4)
    d_a0 = 2*M2
    d_a1 = 0*(N>0)
    d_b1 = A2*(N>0)
    d_a2 = 0*(N>1)
    d_b2 = 0*(N>1)
    d_a3 = 0*(N>2)
    d_b3 = 0*(N>2)
    d_a4 = 0*(N>3)
    d_b4 = 0*(N>3)
    d_a5 = 0*(N>4)
    d_b5 = 0*(N>4)
    d = M2+A2*sin(alpha2*t)
    Gamma_a0 = (2*M1-C(at0))/G
    Gamma_a1 = (0-C(at1))/G*(N>0)
    Gamma_b1 = (0-C(bt1))/G*(N>0)
    Gamma_a2 = (0-C(at2))/G*(N>1)
    Gamma_b2 = (A1-C(bt2))/G*(N>1)
    Gamma_a3 = (0-C(at3))/G*(N>2)
    Gamma_b3 = (0-C(bt3))/G*(N>2)
    Gamma_a4 = (0-C(at4))/G*(N>3)
    Gamma_b4 = (0-C(bt4))/G*(N>3)
    Gamma_a5 = (0-C(at5))/G*(N>4)
    Gamma_b5 = (0-C(bt5))/G*(N>4)
    yr = M1+A1*sin(alpha1*t)
    u = 0.5*Gamma_a0+Gamma_a1*cos(alpha*1*t)+Gamma_b1*sin(alpha*1*t)+Gamma_a2*cos(alpha*2*t)+Gamma_b2*sin(alpha*2*t)+Gamma_a3*cos(alpha*3*t)+Gamma_b3*sin(alpha*3*t)+Gamma_a4*cos(alpha*4*t)+Gamma_b4*sin(alpha*4*t)+Gamma_a5*cos(alpha*5*t)+Gamma_b5*sin(alpha*5*t)
  var1 "Variables 2"
    G = C(X)
    e = yr-C(z)

Couplings
  intop1: Integration on boundaries 2 | opname = C

Geometry
  geom1 "Geometry 1" (1D, length unit m)
    i1: Interval | intervals = many; p = 0, x0,L
    fin: Finalize "Form Union"

Physics
  c: CoefficientFormPDE "Unit input" on all domains
    dependent variable X
    cfeq1: CoefficientFormPDE (default) | c = 1; f = 0; da = 0
    zflx1: ZeroFluxBoundary "Zero Flux 1" (default)
    init1: init "Initial Values 1" (default)
    dir1: DirichletBoundary "Bd*0" on boundaries 1 | r = 0
    flux1: FluxBoundary "Bin*1" on boundaries 3 | g = 1
  c2: CoefficientFormPDE "Regulator Equation PI0" on all domains
    dependent variable A0 = {a0, at0}
    cfeq1: CoefficientFormPDE (default) | c = {1, 0, 0, 1}; f = {f_a0, f_a0}; da = {0, 0, 0, 0}
    zflx1: ZeroFluxBoundary "Zero Flux 1" (default)
    init1: init "Initial Values 1" (default)
    dir1: DirichletBoundary "Bd*d0" on boundaries 1 | r = {d_a0, d_a0}
    flux1: FluxBoundary "Bin*Gamma0" on boundaries 3 | g = {Gamma_a0, 0}
  c3: CoefficientFormPDE "Regulator Equation PI1" on all domains
    dependent variable A1 = {a1, b1, at1, bt1}
    cfeq1: CoefficientFormPDE (default)
      c = {1, 0, 0, 0, 0, 1, 0, 0, 0, 0, 1, 0, 0, 0, 0, 1}
      a = {0, -alpha, 0, -alpha, alpha, 0, alpha, 0, 0, 0, 0, 0, 0, 0, 0, 0}
      f = {f_a1, f_b1, f_a1, f_b1}
      da = {0, 0, 0, 0, 0, 0, 0, 0, 0, 0, 0, 0, 0, 0, 0, 0}
    zflx1: ZeroFluxBoundary "Zero Flux 1" (default)
    init1: init "Initial Values 1" (default)
    dir1: DirichletBoundary "Bd*d1" on boundaries 1 | r = {d_a1, d_b1, d_a1, d_b1}
    flux1: FluxBoundary "Bin*Gamma1" on boundaries 3 | g = {Gamma_a1, Gamma_b1, 0, 0}
  c4: CoefficientFormPDE "Regulator Equation PI2" on all domains
    dependent variable A2 = {a2, b2, at2, bt2}
    cfeq1: CoefficientFormPDE (default)
      c = {1, 0, 0, 0, 0, 1, 0, 0, 0, 0, 1, 0, 0, 0, 0, 1}
      a = {0, -2*alpha, 0, -2*alpha, 2*alpha, 0, 2*alpha, 0, 0, 0, 0, 0, 0, 0, 0, 0}
      f = {f_a2, f_b2, f_a2, f_b2}
      da = {0, 0, 0, 0, 0, 0, 0, 0, 0, 0, 0, 0, 0, 0, 0, 0}
    zflx1: ZeroFluxBoundary "Zero Flux 1" (default)
    init1: init "Initial Values 1" (default)
    dir1: DirichletBoundary "Bd*d2" on boundaries 1 | r = {d_a2, d_b2, d_a2, d_b2}
    flux1: FluxBoundary "Bin*Gamma2" on boundaries 3 | g = {Gamma_a2, Gamma_b2, 0, 0}
  c6: CoefficientFormPDE "Regulator Equation PI3" on all domains
    dependent variable A3 = {a3, b3, at3, bt3}
    cfeq1: CoefficientFormPDE (default)
      c = {1, 0, 0, 0, 0, 1, 0, 0, 0, 0, 1, 0, 0, 0, 0, 1}
      a = {0, -3*alpha, 0, -3*alpha, 3*alpha, 0, 3*alpha, 0, 0, 0, 0, 0, 0, 0, 0, 0}
      f = {f_a3, f_b3, f_a3, f_b3}
      da = {0, 0, 0, 0, 0, 0, 0, 0, 0, 0, 0, 0, 0, 0, 0, 0}
    zflx1: ZeroFluxBoundary "Zero Flux 1" (default)
    init1: init "Initial Values 1" (default)
    dir1: DirichletBoundary "Bd*d3" on boundaries 1 | r = {d_a3, d_b3, d_a3, d_b3}
    flux1: FluxBoundary "Bin*Gamma3" on boundaries 3 | g = {Gamma_a3, Gamma_b3, 0, 0}
  phys1: CoefficientFormPDE "Regulator Equation PI4" on all domains
    dependent variable A4 = {a4, b4, at4, bt4}
    cfeq1: CoefficientFormPDE (default)
      c = {1, 0, 0, 0, 0, 1, 0, 0, 0, 0, 1, 0, 0, 0, 0, 1}
      a = {0, -4*alpha, 0, -4*alpha, 4*alpha, 0, 4*alpha, 0, 0, 0, 0, 0, 0, 0, 0, 0}
      f = {f_a4, f_b4, f_a4, f_b4}
      da = {0, 0, 0, 0, 0, 0, 0, 0, 0, 0, 0, 0, 0, 0, 0, 0}
    zflx1: ZeroFluxBoundary "Zero Flux 1" (default)
    init1: init "Initial Values 1" (default)
    dir1: DirichletBoundary "Bd*d4" on boundaries 1 | r = {d_a4, d_b4, d_a4, d_b4}
    flux1: FluxBoundary "Bin*Gamma4" on boundaries 3 | g = {Gamma_a4, Gamma_b4, 0, 0}
  c7: CoefficientFormPDE "Regulator Equation PI5" on all domains
    dependent variable A5 = {a5, b5, at5, bt5}
    cfeq1: CoefficientFormPDE (default)
      c = {1, 0, 0, 0, 0, 1, 0, 0, 0, 0, 1, 0, 0, 0, 0, 1}
      a = {0, -5*alpha, 0, -5*alpha, 5*alpha, 0, 5*alpha, 0, 0, 0, 0, 0, 0, 0, 0, 0}
      f = {f_a5, f_b5, f_a5, f_b5}
      ea = {0, 0, 0, 0, 0, 0, 0, 0, 0, 0, 0, 0, 0, 0, 0, 0}
      da = {0, 0, 0, 0, 0, 0, 0, 0, 0, 0, 0, 0, 0, 0, 0, 0}
    zflx1: ZeroFluxBoundary "Zero Flux 1" (default)
    init1: init "Initial Values 1" (default)
    dir1: DirichletBoundary "Bd*d5" on boundaries 1 | r = {d_a5, d_b5, d_a5, d_b5}
    flux1: FluxBoundary "Bin*Gamma5" on boundaries 3 | g = {Gamma_a5, Gamma_b5, 0, 0}
  c5: CoefficientFormPDE "Closed Loop System" on all domains
    dependent variable z
    cfeq1: CoefficientFormPDE (default) | c = 1; f = -z*zx; da = 1
    zflx1: ZeroFluxBoundary "Zero Flux 1" (default)
    init1: init "Initial Values 1" (default) | z = M2
    dir1: DirichletBoundary "Bd*d" on boundaries 1 | r = d
    flux1: FluxBoundary "Bin*u" on boundaries 3 | g = u

Mesh
  mesh1 "Mesh 1" (physics-controlled)
    size: MeshSizeDefault | hauto = 5

Studies
  std1 "Study 1"
    stat: Stationary | physselection = c; solve for = {c}
  std2 "Study 2"
    stat: Stationary
      physselection = c
      solve for = {c2, c3, c4, c6, phys1, c7}
      usesol = on
      notsolmethod = sol
      notstudy = std1
  std3 "Study 3"
    time: Transient "Time Dependent"
      tlist = range(0,0.1,10)
      rtol = 0.0001
      physselection = c
      solve for = {c5}
      usesol = on
      notsolmethod = sol
      notstudy = std2

Solver configurations
  sol1 "Solver 1" (study std1)
    v1: Variables "Dependent Variables 1"
    s1: Stationary "Stationary Solver 1" | stol = 0.000010
      dDef: Direct
      fc1: FullyCoupled
  sol2 "Solver 2" (study std2)
    v1: Variables "Dependent Variables 1"
    s1: Stationary "Stationary Solver 1"
      dDef: Direct
      fc1: FullyCoupled | linsolver = dDef
  sol3 "Solver 3" (study std3)
    v1: Variables "Dependent Variables 1"
    t1: Time "Time-Dependent Solver 1" | tlist = range(0,0.1,10); atolglobal = 0.000010
      dDef: Direct
      fc1: FullyCoupled | linsolver = dDef

Datasets
  dset1: Solution | solution = sol1
  dset2: Solution | solution = sol2
  dset3: Solution | solution = sol3

Derived values
  gev1: EvalGlobal "Global Evaluation 1" | data = dset3; table = tbl3; expr = d

Tables
  tbl1: Table
    // Global Evaluation 1 (Gamma_a0)
    Gamma_a0 (1) | Gamma_a1 (1) | Gamma_b1 (1) | Gamma_a2 (1) | Gamma_b2 (1)
    1.44367 | 0.281114 | 0.791287 | -0.0859776 | 0.0291032
  tbl3: Table
    // Global Evaluation 1 (C(z))
    Time (s) | C(z) | yr | e | d
    0 | 0.75 | 0.5 | -0.25 | 0.75
    0.1 | 0.790694 | 0.646946 | -0.143748 | 1.05902
    0.2 | 0.843669 | 0.737764 | -0.105905 | 1.33779
    0.3 | 0.827792 | 0.737764 | -0.0900275 | 1.55902
    0.4 | 0.734133 | 0.646946 | -0.0871865 | 1.70106
    0.5 | 0.592753 | 0.5 | -0.0927527 | 1.75
    0.6 | 0.454633 | 0.353054 | -0.101579 | 1.70106
    0.7 | 0.370664 | 0.262236 | -0.108428 | 1.55902
    0.8 | 0.370344 | 0.262236 | -0.108108 | 1.33779
    0.9 | 0.448912 | 0.353054 | -0.095858 | 1.05902
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
Plots
  pg1: PlotGroup1D "1D Plot Group 1" | data = dset1
    lngr1: LineGraph on all domains | expr = X; xdata = expr; xdataexpr = x
  pg2: PlotGroup1D "1D Plot Group 2" | data = dset2
    lngr1: LineGraph on all domains | expr = a0; xdata = expr; xdataexpr = x
  pg3: PlotGroup1D "1D Plot Group 3" | data = dset2
    lngr1: LineGraph on all domains | expr = a1; xdata = expr; xdataexpr = x
  pg4: PlotGroup1D "1D Plot Group 4" | data = dset2
    lngr1: LineGraph on all domains | expr = a2; xdata = expr; xdataexpr = x
  pg5: PlotGroup1D "1D Plot Group 5" | data = dset2
    lngr1: LineGraph on all domains | expr = a3; xdata = expr; xdataexpr = x
  pg6: PlotGroup1D "1D Plot Group 6" | data = dset2
    lngr1: LineGraph on all domains | expr = a4; xdata = expr; xdataexpr = x
  pg7: PlotGroup1D "1D Plot Group 7" | data = dset2
    lngr1: LineGraph on all domains | expr = a5; xdata = expr; xdataexpr = x
  pg8: PlotGroup1D "1D Plot Group 8" | data = dset3
    lngr1: LineGraph on all domains | expr = z; xdata = expr; xdataexpr = x
  pg9: PlotGroup1D "1D Plot Group 9" | data = dset3
    glob1: Global | expr = e
  pg10: PlotGroup1D "1D Plot Group 10" | data = dset3
    glob1: Global | data = dset3; expr = {yr, C(z)}

Exports
  data1: Data | data = dset3; expr = z; filename = surf_data