// COMSOL Multiphysics 5.0.1.276 model "Ch4_Ex4_6.mph"
// Ch4 Ex4 6
// Outline of the model tree

Parameters
  L = 1
  k0 = 1
  k1 = 2
  c = 1

Variables
  var1 "Variables 1"
    yr0 = sin(t)
    yr1 = sin(2*t)
    e0 = yr0-C0(z)
    e1 = yr1-C1(z)

Couplings
  intop1: Integration on boundaries 1 | opname = C0
  intop2: Integration on boundaries 2 | opname = C1

Geometry
  geom1 "Geometry 1" (1D, length unit m)
    i1: Interval | p2 = L; p = {0, L}
    fin: Finalize "Form Union"

Physics
  c: CoefficientFormPDE "Zero Dynamics" on all domains
    dependent variable PI
    cfeq1: CoefficientFormPDE (default) | c = c; f = 0; da = 1; be = PI
    zflx1: ZeroFluxBoundary "Zero Flux 1" (default)
    init1: init "Initial Values" (default)
    dir1: DirichletBoundary "PI(0)=yr0" on boundaries 1 | r = yr0
    dir2: DirichletBoundary "PI(L)=yr1" on boundaries 2 | r = yr1
  c2: CoefficientFormPDE "Closed Loop System" on all domains
    dependent variable z
    cfeq1: CoefficientFormPDE (default) | c = c; f = 0; da = 1; be = z
    zflx1: ZeroFluxBoundary "Zero Flux 1" (default)
    init1: init "Initial Values" (default) | z = cos(pi*x)
    flux1: FluxBoundary "Bin0*u0" on boundaries 1 | g = -c*PIx+k0*yr0; q = k0
    flux2: FluxBoundary "Bin1*u1" on boundaries 2 | g = c*PIx+k1*yr1; q = k1

Mesh
  mesh1 "Mesh 1" (physics-controlled)
    size: MeshSizeDefault | hauto = 2

Studies
  std1 "Study 1"
    time: Transient "Time Dependent" | tlist = range(0,0.025,10); rtol = 0.0001; physselection = c

Solver configurations
  sol1 "Solver 1" (study std1)
    v1: Variables "Dependent Variables 1"
    t1: Time "Time-Dependent Solver 1" | tlist = range(0,0.025,10); atolglobal = 0.000010
      dDef: Direct
      fc1: FullyCoupled | linsolver = dDef

Datasets
  dset1: Solution | solution = sol1

Derived values
  gev1: EvalGlobal "Global Evaluation 1" | data = dset1; table = tbl1; expr = e1

Tables
  tbl1: Table
    // Global Evaluation 1 (C0(z))
    Time (s) | C0(z) | yr0 | e0 | C1(z) | yr1 | e1
    0 | 0.99538 | 0 | -0.99538 | -0.990989 | 0 | 0.990989
    0.025 | 0.682328 | 0.0249974 | -0.65733 | -0.499377 | 0.0499792 | 0.549356
    0.05 | 0.525599 | 0.0499792 | -0.47562 | -0.262222 | 0.0998334 | 0.362055
    0.075 | 0.421674 | 0.0749297 | -0.346745 | -0.0892856 | 0.149438 | 0.238724
    0.1 | 0.354738 | 0.0998334 | -0.254904 | 0.0442515 | 0.198669 | 0.154418
    0.125 | 0.314636 | 0.124675 | -0.189961 | 0.150833 | 0.247404 | 0.096571
    0.15 | 0.293646 | 0.149438 | -0.144208 | 0.238492 | 0.29552 | 0.0570282
    0.175 | 0.286048 | 0.174108 | -0.111939 | 0.312709 | 0.342898 | 0.0301886
    0.2 | 0.287682 | 0.198669 | -0.0890124 | 0.377329 | 0.389418 | 0.0120897
    0.225 | 0.295727 | 0.223106 | -0.0726211 | 0.434875 | 0.434966 | 9.03669e-05
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
Plots
  pg1: PlotGroup1D "1D Plot Group 1" | data = dset1
    lngr1: LineGraph on all domains | expr = PI; xdata = expr; xdataexpr = x
  pg2: PlotGroup1D "1D Plot Group 2" | data = dset1
    lngr1: LineGraph on all domains | expr = z; xdata = expr; xdataexpr = x
  pg3: PlotGroup1D "1D Plot Group 3" | data = dset1
    glob1: Global | expr = {e0, e1}
  pg4: PlotGroup1D "1D Plot Group 4" | data = dset1
    glob1: Global | expr = {C0(z), yr0}
  pg5: PlotGroup1D "1D Plot Group 5" | data = dset1
    glob1: Global | expr = {C1(z), yr1}

Exports
  data1: Data
    data = dset1
    expr = z
    filename = /Users/gilliam/Desktop/collect_14/research14/Mono_1_14_EA/Comsol_exs/Chapter4/Example4.6/matlab_figs/surf_data.txt