// COMSOL Multiphysics 5.0.1.276 model "Ch4_Ex4_8.mph"
// Ch4 Ex4 8
// Outline of the model tree

Parameters
  L = 1
  k0 = 1
  k1 = 1
  nu = 1/2

Variables
  var1 "Variables 1"
    yr0 = sin(2*t)
    yr1 = 2*sin(t)
    e0 = yr0-C0(z)
    e1 = yr1-C1(z)

Couplings
  intop1: Integration on boundaries 1 | opname = C0
  intop2: Integration on boundaries 2 | opname = C1

Geometry
  geom1 "Geometry 1" (1D, length unit m)
    i1: Interval | p2 = L; p = {0, L}
    fin: Finalize "Form Union"

Physics
  c: CoefficientFormPDE "Zero Dynamics" on all domains
    dependent variable xi = {xi, Dxi}
    cfeq1: CoefficientFormPDE (default)
      c = {-nu, 1, -1, 0}
      a = {0, 0, 0, 1}
      f = {0, 0}
      da = {1, 0, 0, 0}
      be = {xi, 0, 0, 0}
    zflx1: ZeroFluxBoundary "Zero Flux 1" (default)
    init1: init "Initial Values" (default)
    dir1: DirichletBoundary "PI(0)=yr0" on boundaries 1 | r = {yr0, 0}; useDirichletCondition = {1, 0}
    dir2: DirichletBoundary "PI(L)=yr1" on boundaries 2 | r = {yr1, 0}; useDirichletCondition = {1, 0}
  c2: CoefficientFormPDE "Closed Loop System" on all domains
    dependent variable z = {z, Dz}
    cfeq1: CoefficientFormPDE (default)
      c = {-nu, 1, -1, 0}
      a = {0, 0, 0, 1}
      f = {0, 1}
      da = {1, 0, 0, 0}
      be = {z, 0, 0, 0}
    zflx1: ZeroFluxBoundary "Zero Flux 1" (default)
    init1: init "Initial Values" (default) | z = cos(pi*x)
    flux1: FluxBoundary "Bin0*u0" on boundaries 1 | g = {nu*zx+Dxix+k0*yr0, 0}; q = {k0, 0, 0, 0}
    flux2: FluxBoundary "Bin1*u1" on boundaries 2 | g = {-nu*zx-Dxix+k1*yr1, 0}; q = {k1, 0, 0, 0}

Mesh
  mesh1 "Mesh 1" (physics-controlled)
    size: MeshSizeDefault | hauto = 2

Studies
  std1 "Study 1"
    time: Transient "Time Dependent" | tlist = range(0,0.025,10); rtol = 0.0001; physselection = c

Solver configurations
  sol1 "Solver 1" (study std1)
    v1: Variables "Dependent Variables 1"
    t1: Time "Time-Dependent Solver 1" | tlist = range(0,0.025,10); atolglobal = 0.000010
      dDef: Direct
      fc1: FullyCoupled | linsolver = dDef

Datasets
  dset1: Solution | solution = sol1

Derived values
  gev1: EvalGlobal "Global Evaluation 1" | data = dset1; table = tbl1; expr = e1

Tables
  tbl1: Table
    // Global Evaluation 1 (C0(z))
    Time (s) | C0(z) | C1(z) | yr0 | yr1 | e0 | e1
    0 | 0.997943 | -0.997943 | 0 | 0 | -0.997943 | 0.997943
    0.025 | 0.140833 | -0.0402781 | 0.0499792 | 0.0499948 | -0.0908539 | 0.0902729
    0.05 | 0.108355 | 0.0922134 | 0.0998334 | 0.0999583 | -0.00852145 | 0.00774494
    0.075 | 0.150557 | 0.149515 | 0.149438 | 0.149859 | -0.00111844 | 0.000344179
    0.1 | 0.199109 | 0.199968 | 0.198669 | 0.199667 | -0.000439572 | -0.000301617
    0.125 | 0.247763 | 0.249696 | 0.247404 | 0.249349 | -0.000358925 | -0.000346749
    0.15 | 0.295854 | 0.299214 | 0.29552 | 0.298876 | -0.000333788 | -0.000337594
    0.175 | 0.343217 | 0.348536 | 0.342898 | 0.348216 | -0.000319172 | -0.000319517
    0.2 | 0.389722 | 0.397643 | 0.389418 | 0.397339 | -0.000303742 | -0.000303845
    0.225 | 0.435254 | 0.446502 | 0.434966 | 0.446213 | -0.000288307 | -0.000289694
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
Plots
  pg1: PlotGroup1D "1D Plot Group 1" | data = dset1
    lngr1: LineGraph on all domains | expr = xi; xdata = expr; xdataexpr = x
  pg2: PlotGroup1D "1D Plot Group 2" | data = dset1
    lngr1: LineGraph on all domains | expr = z; xdata = expr; xdataexpr = x
  pg3: PlotGroup1D "1D Plot Group 3" | data = dset1
    glob1: Global | expr = {e0, e1}
  pg4: PlotGroup1D "1D Plot Group 4" | data = dset1
    glob1: Global | expr = {C0(z), yr0}
  pg5: PlotGroup1D "1D Plot Group 5" | data = dset1
    glob1: Global | expr = {C1(z), yr1}

Exports
  data1: Data
    data = dset1
    expr = z
    filename = /Users/gilliam/Desktop/collect_14/research14/Mono_1_14_EA/Comsol_exs/Chapter4/Example4.8/matlab_figs/Untitled.txt