// COMSOL Multiphysics 5.0.1.276 model "Ex5_1_NavierStokesForkChannel.mph"
// Ex5 1 NavierStokesForkChannel
// Outline of the model tree

Parameters
  D = 0.02[m]
  L = 0.1[m]
  rho = 1[kg/m^3]
  mu = 0.0001[Pa*s]
  theta = 30
  theta_rad = theta*pi/180
  x0 = D/2/sin(theta_rad)+D/2*tan(theta_rad/2)
  x1 = 0[m]
  x2 = 0[m]
  y0 = 0[m]
  y1 = D/2
  y2 = -y1
  nL = 20  // number of edge partition for L
  nD = 10  // number of edge partition for D
  M1 = 0.05
  M2 = 25/1000
  Bin = 1 [Pa]
  Bd = 1 [Pa]
  k = 1

Variables
  var1 "Variables 1"
    G = C(X_u*nx+X_v*ny)
    Yr = M1
    d = M2
    U = (M1-C(Zt_u*nx+Zt_v*ny))/G
    Y = C(u*nx+v*ny)
    e = Yr-Y

Couplings
  intop1: Integration on boundaries 11 | opname = C1
  aveop1: Average on boundaries 11 | opname = C

Probes
  var1: GlobalVariable "C(Zb) Probe" | expr = gamma*C(Zb_u*nx+Zb_v*ny); table = tbl2

Geometry
  geom1 "Geometry 1" (2D, length unit m)
    r1: Rectangle | pos = {0, -D/2}; size = {L, D}
    copy1: Copy | input = r1; displx = -L
    copy2: Copy | input = r1
    rot1: Rotate | input = r1; rot = theta; pos = {0, 0.01}
    rot2: Rotate | input = copy2; rot = -theta; pos = {0, -0.01}
    uni1: Union | input = copy1, rot1, rot2; keep = off; intbnd = off; edge = all
    pol1: Polygon | type = solid; x = x0 x1 x2; y = y0 y1 y2
    uni2: Union | input = pol1, uni1; keep = off; intbnd = off; edge = all
    pol2: Polygon | type = closed; x = x0 x1 x2; y = y0 y1 y2
    fin: Finalize "Form Union"

Physics
  spf: LaminarFlow "Unit Input" on all domains
    dependent variable X_u = {X_u, X_v, X_w}
    dependent variable X_p
    dependent variable X_uc = {X_ucx, X_ucy, X_ucz}
    dependent variable X_pc
    ShapeProperty.order_fluid = 2
    fp1: FluidProperties (default) | rho_mat = userdef; rho = rho; mu_mat = userdef; mu = mu
    wall1: Wall (default)
    init1: init "Initial Values" (default)
    inl1: Inlet "Inlet Bd*0" on boundaries 1 | BoundaryCondition = NormalStress
    out1: Outlet "Outlet Homogeneous" on boundaries 11 | BoundaryCondition = NormalStress
    out2: Outlet "Outlet Bin*1" on boundaries 12 | BoundaryCondition = NormalStress; f0 = 1
    vf1: VolumeForce "Stokes Linearization" on all domains | F = {rho*(X_u*X_ux+X_v*X_uy), rho*(X_u*X_vx+X_v*X_vy), 0}
  spf2: LaminarFlow "Set Point" on all domains
    dependent variable Zb_u = {Zb_u, Zb_v, Zb_w}
    dependent variable Zb_p
    dependent variable Zb_uc = {Zb_ucx, Zb_ucy, Zb_ucz}
    dependent variable Zb_pc
    ShapeProperty.order_fluid = 2
    fp1: FluidProperties (default) | rho_mat = userdef; rho = rho; mu_mat = userdef; mu = mu
    wall1: Wall (default)
    init1: init "Initial Values" (default)
    inl1: Inlet "Inlet Bd*d" on boundaries 1 | BoundaryCondition = NormalStress; f0 = Bd*d
    out1: Outlet "Outlet Homogeneous" on boundaries 11 | BoundaryCondition = NormalStress
    out2: Outlet "Outlet Bin*U" on boundaries 12 | BoundaryCondition = NormalStress; f0 = Bin*U
  spf4: LaminarFlow "Set Point Auxiliary" on all domains
    dependent variable Zt_u = {Zt_u, Zt_v, Zt_w}
    dependent variable Zt_p
    dependent variable Zt_uc = {Zt_ucx, Zt_ucy, Zt_ucz}
    dependent variable Zt_pc
    ShapeProperty.order_fluid = 2
    fp1: FluidProperties (default) | rho_mat = userdef; rho = rho; mu_mat = userdef; mu = mu
    wall1: Wall (default)
    init1: init "Initial Values" (default)
    inl1: Inlet "Inlet Bd*d" on boundaries 1 | BoundaryCondition = NormalStress; f0 = Bd*d
    out1: Outlet "Outlet Homogeneous" on boundaries 11 | BoundaryCondition = NormalStress
    out2: Outlet "Outlet Bin*0" on boundaries 12 | BoundaryCondition = NormalStress
    vf1: VolumeForce "Non Linear Term F(Zb)" on all domains
      F = {rho*(Zt_u*Zt_ux-Zb_u*Zb_ux+Zt_v*Zt_uy-Zb_v*Zb_uy), rho*(Zt_u*Zt_vx-Zb_u*Zb_vx+Zt_v*Zt_vy-Zb_v*Zb_vy), 0}
  phys1: LaminarFlow "Closed Loop System" on all domains
    dependent variable u = {u, v, w}
    dependent variable p
    dependent variable uc = {ucx, ucy, ucz}
    dependent variable pc
    ShapeProperty.order_fluid = 2
    fp1: FluidProperties (default) | rho_mat = userdef; rho = rho; mu_mat = userdef; mu = mu
    wall1: Wall (default)
    init1: init "Initial Values" (default)
    inl1: Inlet "Inlet Bd*d" on boundaries 1 | BoundaryCondition = NormalStress; f0 = Bd*d
    out1: Outlet "Outlet Homogeneous" on boundaries 11 | BoundaryCondition = NormalStress
    out2: Outlet "Outlet Bin*U" on boundaries 12 | BoundaryCondition = NormalStress; f0 = Bin*U

Mesh
  mesh1 "Mesh 1"
    size: MeshSizeDefault | hauto = 5; custom = on
    dis1: Distribution on boundaries 2, 3, 6, 8-10 | type = predefined; elemcount = nL; elemratio = 3; symmetric = on
    dis2: Distribution on boundaries 1, 4, 5, 7, 11, 12 | type = predefined; elemcount = nD; elemratio = 3; symmetric = on
    map1: Map "Mapped 1" on domains 1, 3, 4
    ftri1: FreeTri "Free Triangular 1" on remaining entities

Studies
  std1 "Study 1"
    stat: Stationary | physselection = spf; solve for = {spf}; initmethod = init; initstudy = zero
  std2 "Study 2"
    stat: Stationary
      physselection = spf
      solve for = {spf2, spf4}
      initmethod = init
      initstudy = zero
      usesol = on
      notsolmethod = sol
      notstudy = std1
  std3 "Study 3"
    time: Transient "Time Dependent"
      tlist = range(0,0.05,5)
      rtol = 0.000001
      solve for = {phys1}
      usesol = on
      notsolmethod = sol
      notstudy = std2

Solver configurations
  sol1 "Solver 1" (study std1)
    v1: Variables "Dependent Variables 1"
    s1: Stationary "Stationary Solver 1" | stol = 0.00000010; nonlin = auto; linpmethod = init
      fc1: FullyCoupled | linsolver = d1; dtech = auto; initstep = 0.01; minstep = 1.0E-6; maxiter = 25
      d1: Direct | linsolver = pardiso
  sol3 "Solver 3" (study std3)
    v1: Variables "Dependent Variables 1"
    t1: Time "Time-Dependent Solver 1"
      tlist = range(0,0.05,5)
      atolglobalmethod = scaled
      atolglobal = 5.0E-5
      maxorder = 2
      estrat = exclude
      fc1: FullyCoupled | linsolver = d1; maxiter = 6; jtech = once
      d1: Direct | linsolver = pardiso
  sol4 "Solver 4" (study std2)
    v1: Variables "Dependent Variables 1"
    s1: Stationary "Stationary Solver 1" | stol = 0.00000010
      fc1: FullyCoupled | linsolver = d1; dtech = auto; initstep = 0.01; minstep = 1.0E-6; maxiter = 25
      d1: Direct | linsolver = pardiso

Datasets
  dset1: Solution | solution = sol1
  dset2: Solution "Probe Solution 2" | solution = sol3
  dset3: Solution | solution = sol4
  dset4: Solution | solution = sol3

Derived values
  gev1: EvalGlobal "C(Zb) Probe" | data = dset2; table = tbl2; expr = gamma*C(Zb_u*nx+Zb_v*ny)
  gev2: EvalGlobal "Global Evaluation 2" | data = dset4; table = tbl9; expr = d

Tables
  tbl1: Table
    // Global Evaluation 1 (G)
    delta | (m^2/s), Global Variable Probe 5
    0.0001 | 2.94444e-10
  tbl2: Table "Probe Table 2"
    gamma*C(Zb_u*nx+Zb_v*ny) (1), C(Zb) Probe
    nan
  tbl3: Table
    // Global Evaluation 6 (dc(0))
    k | dc(0) | dc(1) | dc(2) | dc(3)
    0 | 0 | 1 | 0 | 0
    1 | 0 | 1 | 0 | 0
  tbl4: Table
    // Global Evaluation 5 (Qs(k))
    Qs(k) (m^2/s) | Qc(k) (m^2/s) | k
    0 | 1 | 0
  tbl6: Table
    // Global Evaluation 6 (ds(k))
    k | ds(k) (Pa) | dc(k) (Pa) | alpha(k) | Qs(k) (m^2/s) | Qc(k) (m^2/s)
    0 | 0 | 0 | 0 | 0 | 1
    1 | 0 | 1 | 0 | 0 | 0
    2 | 0 | 0 | 1 | 1 | 0
    3 | 1 | 0 | 1 | 0 | 0
  tbl7: Table
    // Global Evaluation 7 (Gamma)
    Time | Gamma | yr
    0 | -10.2005 | 1
    0.1 | -11.557 | 1.09983
    0.2 | -12.7977 | 1.19867
    0.3 | -13.7742 | 1.29552
    0.4 | -14.3519 | 1.38942
    0.5 | -14.4158 | 1.47943
    0.6 | -13.8765 | 1.56464
    0.7 | -12.6741 | 1.64422
    0.8 | -10.7819 | 1.71736
    0.9 | -8.20801 | 1.78333
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  tbl8: Table
    // Point Evaluation 1 (delta*C(u6*nx+v6*ny))
    Time | delta*C(u6*nx+v6*ny) (1), Point: 8 | yr, Point: 8 | Gamma, Point: 8 | d, Point: 8
    0 | 0.00168258 | 10 | 33.1633 | 25
    0.1 | 3.33462 | 10.9983 | 34.9639 | 27.384
    0.2 | 6.01041 | 11.9867 | 36.6419 | 29.673
    0.3 | 8.28461 | 12.9552 | 38.2414 | 31.7757
    0.4 | 10.2423 | 13.8942 | 39.8031 | 33.6083
    0.5 | 11.9384 | 14.7943 | 41.361 | 35.0977
    0.6 | 13.413 | 15.6464 | 42.9403 | 36.1845
    0.7 | 14.6955 | 16.4422 | 44.5557 | 36.8254
    0.8 | 15.8078 | 17.1736 | 46.2096 | 36.9949
    0.9 | 16.7653 | 17.8333 | 47.8921 | 36.6862
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  tbl9: Table
    // Global Evaluation 2 (Y)
    Time (s) | Y (m/s) | Yr | e (m/s) | d
    0 | 1.60167e-06 | 0.05 | 0.0499984 | 0.025
    0.05 | 0.0066992 | 0.05 | 0.0433008 | 0.025
    0.1 | 0.0122435 | 0.05 | 0.0377565 | 0.025
    0.15 | 0.0170383 | 0.05 | 0.0329617 | 0.025
    0.2 | 0.0212268 | 0.05 | 0.0287732 | 0.025
    0.25 | 0.0248965 | 0.05 | 0.0251035 | 0.025
    0.3 | 0.0281134 | 0.05 | 0.0218866 | 0.025
    0.35 | 0.03093 | 0.05 | 0.01907 | 0.025
    0.4 | 0.0333941 | 0.05 | 0.0166059 | 0.025
    0.45 | 0.0355473 | 0.05 | 0.0144527 | 0.025
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
Plots
  pg11: PlotGroup1D "Probe 1D Plot Group 11"
    tblp2: Table "Probe Table Graph 2" | table = tbl1
    tblp36: Table "Probe Table Graph 36" | table = tbl5
    tblp37: Table "Probe Table Graph 37" | table = tbl2; plotcolumns = 1
  pg12: PlotGroup2D "Velocity (spf)" | data = dset1
    surf1: Surface | expr = X.U
  pg13: PlotGroup2D "Pressure (spf)" | data = dset1
    con1: Contour | expr = X_p
  pg14: PlotGroup2D "Velocity (spf2)" | data = dset3
    surf1: Surface | expr = Zb.U
  pg15: PlotGroup2D "Pressure (spf2)" | data = dset3
    con1: Contour | expr = Zb_p
  pg16: PlotGroup2D "Velocity (spf4)" | data = dset3
    surf1: Surface | expr = Zt.U
  pg17: PlotGroup2D "Pressure (spf4)" | data = dset3
    con1: Contour | expr = Zt_p
  pg18: PlotGroup2D "Velocity (phys1)" | data = dset4
    surf1: Surface | expr = Z.U
    arws1: ArrowSurface | expr = {u, v}; xnumber = 20; ynumber = 20; arrowlength = logarithmic
  pg19: PlotGroup2D "Pressure (phys1)" | data = dset4
    con1: Contour | expr = p
  pg20: PlotGroup1D "1D Plot Group 20" | data = dset4
    glob1: Global | expr = {Yr, Y, }; unit = {, m/s, }
  pg21: PlotGroup1D "1D Plot Group 21" | data = dset4
    glob1: Global | expr = e; unit = m/s

Exports
  plot1: Plot
  plot2: Plot