// COMSOL Multiphysics 5.0.1.276 model "Ex5.2.1_NonIsothermal_Navies-Stokes_Flows_temp.mph"
// Ex5.2.1 NonIsothermal Navies-Stokes Flows temp
// Outline of the model tree

Parameters
  L = 1
  H = 0.1
  ni = 0.002
  alpha = 0.01
  beta = 1

Variables
  var1 "Variables 1a"
    G = C(X)
    yr = 0.5
    d = 1
    gamma = (yr-C(tT))/G
    e = yr-C(T)

Couplings
  aveop1: Average on domains 9 | opname = C

Geometry
  geom1 "Geometry 1" (2D, length unit m)
    sq1: Square | size = L
    r1: Rectangle | pos = {-H, 2*H}; size = {L+H, H}
    r2: Rectangle | pos = {0, L-2*H}; size = {L+H, H}
    r3: Rectangle | pos = {4*H, 0}; size = {2*H, L}
    r4: Rectangle | pos = {0, 3*H}; size = {L, 2*H}
    fin: Finalize "Form Union"

Physics
  spf: LaminarFlow "Steady Flow" on all domains
    dependent variable U = {U, V, W}
    dependent variable P
    dependent variable Uc = {Ucx, Vcy, Wcz}
    dependent variable Pc
    ShapeProperty.order_fluid = 2
    fp1: FluidProperties (default) | rho_mat = userdef; rho = 1; mu_mat = userdef; mu = ni
    wall1: Wall (default)
    init1: init "Initial Values" (default)
    inl1: Inlet on boundaries 51 | U0in = 4*s*(1-s)
    open1: OpenBoundary "Outflow" on boundaries 1
    wall2: Wall "Window" on boundaries 45
  c: CoefficientFormPDE "Unit Input" on all domains
    dependent variable X
    cfeq1: CoefficientFormPDE (default) | c = {alpha, 0, 0, alpha}; f = 0; da = 0; be = {U, V}
    zflx1: ZeroFluxBoundary "Insulated Wall" (default)
    init1: init "Initial Values" (default)
    flux1: FluxBoundary "Heat Flux Bin*1" on boundaries 51 | g = 1
    zflx2: ZeroFluxBoundary "Outflow" on boundaries 1
    dir1: DirichletBoundary "Window" on boundaries 45 | r = 0
  phys1: LaminarFlow "Set Point Flow" on all domains
    dependent variable bu = {bu, bv, bw}
    dependent variable bp
    dependent variable buc = {bucx, bvcy, bwcz}
    dependent variable bpc
    ShapeProperty.order_fluid = 2
    fp1: FluidProperties (default) | rho_mat = userdef; rho = 1; mu_mat = userdef; mu = ni
    wall1: Wall (default)
    init1: init "Initial Values" (default) | bu = {U, V, 0}; bp = P; vb = {V_u, V_v, 0}
    inl1: Inlet on boundaries 51 | U0in = 4*s*(1-s)
    open1: OpenBoundary "Outflow" on boundaries 1
    wall2: Wall "Window" on boundaries 45
    vf1: VolumeForce "Buoyancy Force" on all domains | F = {0, beta*bT, 0}
  phys2: CoefficientFormPDE "Set Point Temperature" on all domains
    dependent variable Z = {bT, tT}
    cfeq1: CoefficientFormPDE (default)
      c = {{alpha, 0, 0, alpha}, {0, 0, 0, 0}, {0, 0, 0, 0}, {alpha, 0, 0, alpha}}
      f = {0, 0}
      da = {0, 0, 0, 0}
      be = {{bu, bv}, {bu-U, bv-V}, {0, 0}, {U, V}}
    zflx1: ZeroFluxBoundary "Insulated Wall" (default)
    init1: init "Initial Values" (default)
    flux1: FluxBoundary "Heat Flux Bin*gamma" on boundaries 51 | g = {gamma, 0}
    zflx2: ZeroFluxBoundary "Outflow" on boundaries 1
    dir1: DirichletBoundary "Window" on boundaries 45 | r = {d, d}
  phys3: LaminarFlow "Closed Loop Flow" on all domains
    dependent variable u = {u, v, w}
    ShapeProperty.order_fluid = 2
    fp1: FluidProperties (default) | rho_mat = userdef; rho = 1; mu_mat = userdef; mu = ni
    wall1: Wall (default)
    init1: init "Initial Values" (default) | u = {0, 0, 0}; p = 0
    inl1: Inlet on boundaries 51 | U0in = 4*s*(1-s)
    open1: OpenBoundary "Outflow" on boundaries 1
    wall2: Wall "Window" on boundaries 45
    vf1: VolumeForce "Buoyancy Force" on all domains | F = {0, beta*T, 0}
  phys4: CoefficientFormPDE "Closed Loop Temperature" on all domains
    dependent variable T
    cfeq1: CoefficientFormPDE (default) | c = {alpha, 0, 0, alpha}; f = 0; da = 1; be = {u, v}
    zflx1: ZeroFluxBoundary "Insulated Wall" (default)
    init1: init "Initial Values" (default)
    flux1: FluxBoundary "Heat Flux Bin*gamma" (disabled) on boundaries 51 | g = gamma
    dir2: DirichletBoundary "Dirichlet control T=bT" on boundaries 51 | r = bT
    zflx2: ZeroFluxBoundary "Outflow" on boundaries 1
    dir1: DirichletBoundary "Window" on boundaries 45 | r = d

Mesh
  mesh1 "Mesh 1"
    size: MeshSizeDefault | hmax = 0.0804; hmin = 3.6E-4; hauto = 5; custom = off
    edg1: Edge on all boundaries
      size1: Size on boundaries 1-51 | hmax = H/8; hmin = H/8; hauto = 5; custom = on
    map1: Map "Mapped 1" on all domains

Studies
  std1 "Study 1"
    stat: Stationary | physselection = spf; solve for = {spf, c}
  std2 "Study 2"
    stat: Stationary
      physselection = spf
      solve for = {phys1, phys2}
      useinitsol = on
      initstudy = std1
      usesol = on
      notsolmethod = sol
      notstudy = std1
  std3 "Study 3"
    time: Transient "Time Dependent"
      tlist = range(0,10,2000)
      physselection = spf
      solve for = {phys3, phys4}
      initmethod = init
      initstudy = zero
      usesol = on
      notsolmethod = sol
      notstudy = std2

Solver configurations
  sol1 "Solver 1" (study std1)
    v1: Variables "Dependent Variables 1"
    s1: Stationary "Stationary Solver 1"
      fc1: FullyCoupled | linsolver = d1; dtech = auto; initstep = 0.01; minstep = 1.0E-6; maxiter = 25
      d1: Direct | linsolver = mumps
  sol2 "Solver 2" (study std2)
    v1: Variables "Dependent Variables 1"
    s1: Stationary "Stationary Solver 1"
      fc1: FullyCoupled | linsolver = d1; dtech = auto; initstep = 0.01; minstep = 1.0E-6; maxiter = 25
      d1: Direct
  sol3 "Solver 3" (study std3)
    v1: Variables "Dependent Variables 1"
    t1: Time "Time-Dependent Solver 1"
      tlist = range(0,10,2000)
      atolglobalmethod = scaled
      atolglobal = 5.0E-4
      timemethod = bdf
      maxorder = 2
      fc1: FullyCoupled | linsolver = d1; maxiter = 6; jtech = once
      d1: Direct | linsolver = mumps

Datasets
  dset1: Solution | solution = sol1
  dset2: Solution | solution = sol2
  dset3: Solution | solution = sol3

Derived values
  gev1: EvalGlobal "Global Evaluation 1" | data = dset2; table = tbl2; expr = C(bT)
  gev2: EvalGlobal "Global Evaluation 2" | data = dset3; table = tbl3; expr = gamma

Tables
  tbl1: Table
    // Global Evaluation 1 (C(bT))
    C(bT) | C(bT)
    0.5 | 0.5
  tbl2: Table
    // Global Evaluation 1 (C(bT))
    C(bT)
    0.5
  tbl3: Table
    // Global Evaluation 2 (C(T))
    Time (s) | C(T) | yr | e | gamma
    0 | 2.94082e-38 | 0.5 | 0.5 | -3.47145e-05
    10 | 0.271713 | 0.5 | 0.228287 | -3.47145e-05
    20 | 0.409964 | 0.5 | 0.0900357 | -3.47145e-05
    30 | 0.466944 | 0.5 | 0.0330561 | -3.47145e-05
    40 | 0.489052 | 0.5 | 0.0109482 | -3.47145e-05
    50 | 0.497158 | 0.5 | 0.00284182 | -3.47145e-05
    60 | 0.499613 | 0.5 | 0.000387325 | -3.47145e-05
    70 | 0.500289 | 0.5 | -0.000288786 | -3.47145e-05
    80 | 0.500431 | 0.5 | -0.000430607 | -3.47145e-05
    90 | 0.500314 | 0.5 | -0.000314479 | -3.47145e-05
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
Plots
  pg1: PlotGroup2D "Velocity (spf)" | data = dset1
    surf1: Surface | expr = V.U
  pg2: PlotGroup2D "Pressure (spf)" | data = dset1
    con1: Contour | expr = P
  pg3: PlotGroup2D "2D Plot Group 3" | data = dset1
    surf1: Surface | expr = X
  pg4: PlotGroup2D "Velocity (phys1)" | data = dset2
    surf1: Surface | expr = bv.U
    arws1: ArrowSurface | expr = {bu, bv}; arrowlength = normalized
  pg5: PlotGroup2D "Pressure (phys1)" | data = dset2
    con1: Contour | expr = bp
  pg6: PlotGroup2D "2D Plot Group 6" | data = dset2
    surf1: Surface | expr = bT
  pg7: PlotGroup2D "Velocity (phys3)" | data = dset3
    surf1: Surface | expr = v.U
    arws1: ArrowSurface | expr = {u, v}; arrowlength = normalized
  pg8: PlotGroup2D "Pressure (phys3)" | data = dset3
    con1: Contour | expr = p
  pg9: PlotGroup2D "2D Plot Group 9" | data = dset3
    surf1: Surface | expr = T
    arws1: ArrowSurface | expr = {u, v}; arrowlength = normalized
  pg10: PlotGroup1D "1D Plot Group 10" | data = dset3
    glob1: Global | expr = {yr, C(T)}
  pg11: PlotGroup1D "1D Plot Group 11" | data = dset3
    glob1: Global | expr = e