// COMSOL Multiphysics 5.0.1.276 model "Ex5.2.3a_NonIsothermal_Navies-Stokes_Flows.mph"
// Ex5.2.3a NonIsothermal Navies-Stokes Flows
// Outline of the model tree

Parameters
  L = 1
  H = 0.1
  ni = 0.002
  alpha = 0.01
  beta = 1
  M1 = 0.25
  M2 = 0.5
  d1 = 0.75
  d2 = 0.5
  t1 = 750
  t2 = 2250

Variables
  var1 "Variables 1a"
    G = C(X)
    yr0 = M1
    d0 = d1
    gamma0 = (yr0-C(tZ))/G
    yr = M1+(M2-M1)*sin(t*2*pi/1500)
    d = d1+(d2-d1)*sin(t*2*pi/1500)
    gamma1 = (yr-C(tT1))/G
    e1 = yr-C(bT1)
    gamma2 = (e1-C(tT2))/G
    e2 = e1-C(bT2)
    gamma3 = (e2-C(tT3))/G
    e3 = e2-C(bT3)
    bT = bT1+bT2+bT3
    gamma = gamma1+gamma2+gamma3
    e = yr-C(T)

Couplings
  aveop1: Average on domains 9 | opname = C

Geometry
  geom1 "Geometry 1" (2D, length unit m)
    sq1: Square | size = L
    r1: Rectangle | pos = {-H, 2*H}; size = {L+H, H}
    r2: Rectangle | pos = {0, L-2*H}; size = {L+H, H}
    r3: Rectangle | pos = {4*H, 0}; size = {2*H, L}
    r4: Rectangle | pos = {0, 3*H}; size = {L, 2*H}
    fin: Finalize "Form Union"

Physics
  spf: LaminarFlow "Steady Flow" on all domains
    dependent variable U = {U, V, W}
    dependent variable P
    dependent variable Uc = {Ucx, Vcy, Wcz}
    dependent variable Pc
    ShapeProperty.order_fluid = 2
    fp1: FluidProperties (default) | rho_mat = userdef; rho = 1; mu_mat = userdef; mu = ni
    wall1: Wall (default)
    init1: init "Initial Values" (default)
    inl1: Inlet on boundaries 51 | U0in = 4*s*(1-s)
    open1: OpenBoundary "Outflow" on boundaries 1
    wall2: Wall "Window" on boundaries 45
  c: CoefficientFormPDE "Unit Input" on all domains
    dependent variable X
    cfeq1: CoefficientFormPDE (default) | c = {alpha, 0, 0, alpha}; f = 0; da = 0; be = {U, V}
    zflx1: ZeroFluxBoundary "Insulated Wall" (default)
    init1: init "Initial Values" (default)
    flux1: FluxBoundary "Heat Flux Bin*1" on boundaries 51 | g = 1
    zflx2: ZeroFluxBoundary "Outflow" on boundaries 1
    dir1: DirichletBoundary "Window" on boundaries 45 | r = 0
  phys1: LaminarFlow "Set Point Flow" on all domains
    dependent variable bV = {bU, bV, bW}
    dependent variable bP
    dependent variable bUc = {bUcx, bVcy, bWcz}
    dependent variable bPc
    ShapeProperty.order_fluid = 2
    fp1: FluidProperties (default) | rho_mat = userdef; rho = 1; mu_mat = userdef; mu = ni
    wall1: Wall (default)
    init1: init "Initial Values" (default) | vb = {V_u, V_v, 0}; bu = {U, V, 0}
    inl1: Inlet on boundaries 51 | U0in = 4*s*(1-s)
    open1: OpenBoundary "Outflow" on boundaries 1
    wall2: Wall "Window" on boundaries 45
    vf1: VolumeForce "Buoyancy Force" on all domains | F = {0, beta*bZ, 0}
  phys2: CoefficientFormPDE "Set Point Temperature" on all domains
    dependent variable bZ = {bZ, tZ}
    cfeq1: CoefficientFormPDE (default)
      c = {{alpha, 0, 0, alpha}, {0, 0, 0, 0}, {0, 0, 0, 0}, {alpha, 0, 0, alpha}}
      f = {0, 0}
      da = {0, 0, 0, 0}
      be = {{bU, bV}, {bU-U, bV-V}, {0, 0}, {U, V}}
    zflx1: ZeroFluxBoundary "Insulated Wall" (default)
    init1: init "Initial Values" (default)
    flux1: FluxBoundary "Heat Flux Bin*gamma0" on boundaries 51 | g = {gamma0, 0}
    zflx2: ZeroFluxBoundary "Outflow" on boundaries 1
    dir1: DirichletBoundary "Window" on boundaries 45 | r = {d0, d0}
  phys3: LaminarFlow "beta iteration Flow" on all domains
    dependent variable bu = {bu, bv, bw}
    dependent variable bp
    dependent variable buc = {bucx, bucy, bucz}
    dependent variable bpc
    ShapeProperty.order_fluid = 2
    fp1: FluidProperties (default) | rho_mat = userdef; rho = 1; mu_mat = userdef; mu = ni
    wall1: Wall (default)
    init1: init "Initial Values" (default) | u = {bU, bV, 0}
    inl1: Inlet on boundaries 51 | U0in = 4*s*(1-s)
    open1: OpenBoundary "Outflow" on boundaries 1
    wall2: Wall "Window" on boundaries 45
    vf1: VolumeForce "Buoyancy Force" on all domains | F = {0, beta*bT, 0}
  phys4: CoefficientFormPDE "beta iteration Temperature 1" on all domains
    dependent variable bT1 = {bT1, tT1}
    cfeq1: CoefficientFormPDE (default)
      c = {{alpha, 0, 0, alpha}, {0, 0, 0, 0}, {0, 0, 0, 0}, {alpha, 0, 0, alpha}}
      f = {0, 0}
      da = {1, 0.95, 0, 0}
      be = {{bu, bv}, {bu-U, bv-V}, {0, 0}, {U, V}}
    zflx1: ZeroFluxBoundary "Insulated Wall" (default)
    init1: init "Initial Values" (default)
    flux1: FluxBoundary "Heat Flux Bin*gamma1" on boundaries 51 | g = {gamma1, 0}
    zflx2: ZeroFluxBoundary "Outflow" on boundaries 1
    dir1: DirichletBoundary "Window" on boundaries 45 | r = {d, d}
  phys7: CoefficientFormPDE "beta iteration Temperature 2" on all domains
    dependent variable bT2 = {bT2, tT2, bT3, tT3}
    cfeq1: CoefficientFormPDE (default)
      c = 
        {alpha, 0, 0, alpha}
        {0, 0, 0, 0}
        {0, 0, 0, 0}
        {0, 0, 0, 0}
        {0, 0, 0, 0}
        {alpha, 0, 0, alpha}
        {0, 0, 0, 0}
        {0, 0, 0, 0}
        {0, 0, 0, 0}
        {0, 0, 0, 0}
        {alpha, 0, 0, alpha}
        {0, 0, 0, 0}
        {0, 0, 0, 0}
        {0, 0, 0, 0}
        {0, 0, 0, 0}
        {alpha, 0, 0, alpha}
      f = {0, 0, 0, 0}
      da = {1, 0.95, 0, 0, 0, 0, 0, 0, 0, 0, 1, 0.95, 0, 0, 0, 0}
      al = {{0, 0}, {0, 0}, {0, 0}, {0, 0}, {0, 0}, {0, 0}, {0, 0}, {0, 0}, {0, 0}, {0, 0}, {0, 0}, {0, 0}, {0, 0}, {0, 0}, {0, 0}, {0, 0}}
      be = {{bu, bv}, {bu-U, bv-V}, {0, 0}, {0, 0}, {0, 0}, {U, V}, {0, 0}, {0, 0}, {0, 0}, {0, 0}, {bu, bv}, {bu-U, bv-V}, {0, 0}, {0, 0}, {0, 0}, {U, V}}
    zflx1: ZeroFluxBoundary "Insulated Wall" (default)
    init1: init "Initial Values" (default)
    flux1: FluxBoundary "Heat Flux Bin*gamma2" on boundaries 51 | g = {gamma2, 0, gamma3, 0}
    zflx2: ZeroFluxBoundary "Outflow" on boundaries 1
    dir1: DirichletBoundary "Window" on boundaries 45 | r = {0, 0, 0, 0}
  phys5: LaminarFlow "Closed Loop Flow" on all domains
    dependent variable u = {u, v, w}
    ShapeProperty.order_fluid = 2
    fp1: FluidProperties (default) | rho_mat = userdef; rho = 1; mu_mat = userdef; mu = ni
    wall1: Wall (default)
    init1: init "Initial Values" (default)
    inl1: Inlet on boundaries 51 | U0in = 4*s*(1-s)
    open1: OpenBoundary "Outflow" on boundaries 1
    wall2: Wall "Window" on boundaries 45
    vf1: VolumeForce "Buoyancy Force" on all domains | F = {0, beta*T, 0}
  phys6: CoefficientFormPDE "Closed Loop Temperature" on all domains
    dependent variable T
    cfeq1: CoefficientFormPDE (default) | c = {alpha, 0, 0, alpha}; f = 0; da = 1; be = {u, v}
    zflx1: ZeroFluxBoundary "Insulated Wall" (default)
    init1: init "Initial Values" (default)
    flux1: FluxBoundary "Heat Flux Bin*gamma" on boundaries 51 | g = gamma
    zflx2: ZeroFluxBoundary "Outflow" on boundaries 1
    dir1: DirichletBoundary "Window" on boundaries 45 | r = d

Mesh
  mesh1 "Mesh 1"
    size: MeshSizeDefault | hmax = 0.0804; hmin = 3.6E-4; hauto = 5; custom = off
    edg1: Edge on all boundaries
      size1: Size on boundaries 1-51 | hmax = H/4; hmin = H/4; hauto = 5; custom = on
    map1: Map "Mapped 1" on all domains

Studies
  std1 "Study 1"
    stat: Stationary | physselection = spf; solve for = {spf, c}
  std2 "Study 2"
    stat: Stationary
      physselection = spf
      solve for = {phys1, phys2}
      useinitsol = on
      initstudy = std1
      usesol = on
      notsolmethod = sol
      notstudy = std1
  std3 "Study 3"
    time: Transient "Time Dependent"
      tlist = range(0,10,3000)
      physselection = spf
      solve for = {phys3, phys4, phys7, phys5, phys6}
      useinitsol = on
      initmethod = init
      initstudy = std2
      usesol = on
      notsolmethod = sol
      notstudy = std2

Solver configurations
  sol1 "Solver 1" (study std1)
    v1: Variables "Dependent Variables 1"
    s1: Stationary "Stationary Solver 1"
      fc1: FullyCoupled | linsolver = d1; dtech = auto; initstep = 0.01; minstep = 1.0E-6; maxiter = 25
      d1: Direct | linsolver = mumps
  sol2 "Solver 2" (study std2)
    v1: Variables "Dependent Variables 1"
    s1: Stationary "Stationary Solver 1"
      fc1: FullyCoupled | linsolver = d1; dtech = auto; initstep = 0.01; minstep = 1.0E-6; maxiter = 25
      d1: Direct
  sol3 "Solver 3" (study std3)
    v1: Variables "Dependent Variables 1"
    t1: Time "Time-Dependent Solver 1"
      tlist = range(0,10,3000)
      atolglobalmethod = scaled
      atolglobal = 5.0E-4
      timemethod = bdf
      tstepsbdf = free
      maxorder = 5
      fc1: FullyCoupled | linsolver = d1; maxiter = 6; jtech = once
      d1: Direct | linsolver = mumps

Datasets
  dset1: Solution | solution = sol1
  dset2: Solution | solution = sol2
  dset3: Solution | solution = sol3

Derived values
  gev1: EvalGlobal "Global Evaluation 1" | data = dset2; table = tbl2; expr = C(bT)
  gev2: EvalGlobal "Global Evaluation 2" | data = dset3; table = tbl3; expr = C(T)
  gev3: EvalGlobal "Global Evaluation 3" | data = dset3; table = tbl4; expr = e

Tables
  tbl1: Table
    // Global Evaluation 1 (C(bT))
    C(bT) | C(bT)
    0.5 | 0.5
  tbl2: Table
    // Global Evaluation 1 (C(bT))
    C(bT)
    0.5
  tbl3: Table
    // Global Evaluation 2 (C(T))
    Time (s) | C(T)
    2000 | 0.499869
  tbl4: Table
    // Global Evaluation 3 (C(T))
    Time (s) | C(T) | yr | C(bT1) | C(bT1+bT2) | C(bT1+bT2+bT3) | d | gamma | e1 | e2 | e3 | e
    0 | 4.96041e-22 | 0.25 | 0.25 | 0.25 | 0.25 | 0.75 | -3.61295e-05 | 9.18206e-08 | 9.18206e-08 | 9.18206e-08 | 0.25
    10 | 0.121007 | 0.260469 | 0.249494 | 0.249787 | 0.25008 | 0.739531 | -2.54728e-06 | 0.010975 | 0.0106819 | 0.0103893 | 0.139462
    20 | 0.186502 | 0.270919 | 0.249487 | 0.252485 | 0.255391 | 0.729081 | 2.26489e-05 | 0.0214325 | 0.0184341 | 0.0155286 | 0.0844172
    30 | 0.224568 | 0.281333 | 0.252239 | 0.261168 | 0.269221 | 0.718667 | 3.08195e-05 | 0.0290944 | 0.0201655 | 0.0121127 | 0.0567653
    40 | 0.253243 | 0.291692 | 0.258183 | 0.274985 | 0.288523 | 0.708308 | 2.51321e-05 | 0.0335093 | 0.016707 | 0.00316921 | 0.0384491
    50 | 0.277006 | 0.301978 | 0.266871 | 0.291585 | 0.308531 | 0.698022 | 1.28424e-05 | 0.0351069 | 0.0103928 | -0.00655272 | 0.024972
    60 | 0.295715 | 0.312172 | 0.27747 | 0.308428 | 0.325227 | 0.687828 | 1.12688e-06 | 0.0347024 | 0.00374402 | -0.0130549 | 0.0164573
    70 | 0.308773 | 0.322258 | 0.289041 | 0.323688 | 0.336935 | 0.677742 | -5.63713e-06 | 0.0332169 | -0.00143016 | -0.0146772 | 0.0134849
    80 | 0.317189 | 0.332217 | 0.300782 | 0.336585 | 0.344304 | 0.667783 | -6.48005e-06 | 0.031435 | -0.00436866 | -0.0120875 | 0.0150279
    90 | 0.323133 | 0.342031 | 0.312174 | 0.347277 | 0.349348 | 0.657969 | -2.97527e-06 | 0.0298575 | -0.00524558 | -0.00731654 | 0.0188978
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
Plots
  pg1: PlotGroup2D "Velocity (spf)" | data = dset1
    surf1: Surface | expr = V.U
  pg2: PlotGroup2D "Pressure (spf)" | data = dset1
    con1: Contour | expr = P
  pg3: PlotGroup2D "2D Plot Group 3" | data = dset1
    surf1: Surface | expr = X
  pg4: PlotGroup2D "Velocity (phys1)" | data = dset2
    surf1: Surface | expr = bV.U
    arws1: ArrowSurface | expr = {bU, bV}; arrowlength = normalized
  pg5: PlotGroup2D "Pressure (phys1)" | data = dset2
    con1: Contour | expr = bP
  pg6: PlotGroup2D "2D Plot Group 6" | data = dset2
    surf1: Surface | expr = bZ
  pg7: PlotGroup2D "Velocity (phys3)" | data = dset3
    surf1: Surface | expr = bv.U
    arws1: ArrowSurface | expr = {bu, bv}; arrowlength = normalized
  pg8: PlotGroup2D "Pressure (phys3)" | data = dset3
    con1: Contour | expr = bp
  pg9: PlotGroup2D "2D Plot Group 9" | data = dset3
    surf1: Surface | expr = bT
    arws1: ArrowSurface | expr = {bu, bv}; arrowlength = normalized
  pg10: PlotGroup1D "1D Plot Group 10" | data = dset3
    glob1: Global | expr = {e1, e2, e3, e}
  pg11: PlotGroup1D "1D Plot Group 11" | data = dset3
    glob1: Global | expr = {yr, C(bT1), C(bT1+bT2)*0, C(bT)*0, C(T)}
  pg12: PlotGroup1D "1D Plot Group 12" | data = dset3
    glob1: Global | data = dset3; expr = gamma