// COMSOL Multiphysics 5.0.1.276 model "Ex5.3_CI_gen_signal.mph"
// Ex5.3 CI gen signal
// Outline of the model tree

Parameters
  L = 1
  lambda = 0.4
  k = 0.1
  beta = 0.5
  c = 5

Variables
  var1 "Variables 1a"
    G = C(X)
    d0 = 0
    yr0 = 1
    gamma0 = (yr0-C(Zt0))/G
    FZ0 = -lambda*Z0^3
    d = (1.e-4)*t^2
    yr = (100-t)/100*(10-t)/10*(40-t)/40*(80-t)/80
    gamma1 = (yr-C(Zt1))/G
    FZ1 = -lambda*Z1^3
    e1 = yr-C(Z1)
    gamma2 = (e1-C(zt2))/G*(t>5)
    Z2 = Z1+z2
    FZ2 = -lambda*Z2^3
    e2 = yr-C(Z2)
    gamma3 = (e2-C(zt3))/G*(t>10)
    Z3 = Z2+z3
    FZ3 = -lambda*Z3^3
    e3 = yr-C(Z3)
    gamma = gamma1+gamma2+gamma3
    FZ = -lambda*Z^3
    e = yr-C(Z)

Couplings
  aveop1: Average on boundaries 4 | opname = C

Geometry
  geom1 "Geometry 1" (2D, length unit m)
    r1: Rectangle | size = {2*L, L}
    fin: Finalize "Form Union"

Physics
  c: CoefficientFormPDE "Unit Input" on all domains
    dependent variable X
    cfeq1: CoefficientFormPDE (default) | c = {c, 0, 0, c}; a = -lambda; f = 0; da = 0
    zflx1: ZeroFluxBoundary "Zero Flux 1" (default)
    init1: init "Initial Values 1" (default)
    dir1: DirichletBoundary "Dirichlet Boundary Condition 1" on boundaries 3 | r = 0
    flux1: FluxBoundary "Flux/Source 1" on boundaries 1 | g = 1; q = k
  phys3: CoefficientFormPDE on all domains
    dependent variable Z0 = {Z0, Zt0}
    cfeq1: CoefficientFormPDE (default)
      c = {{c, 0, 0, c}, {0, 0, 0, 0}, {0, 0, 0, 0}, {c, 0, 0, c}}
      a = {-lambda, 0, 0, -lambda}
      f = {FZ0, FZ0}
      da = {0, 0, 0, 0}
    zflx1: ZeroFluxBoundary "Zero Flux 1" (default)
    init1: init "Initial Values 1" (default)
    dir1: DirichletBoundary "Dirichlet Boundary Condition 1" on boundaries 3 | r = {d0, 0}
    flux1: FluxBoundary "Flux/Source 1" on boundaries 1 | g = {gamma0, 0}; q = {k, 0, 0, k}
  phys1: CoefficientFormPDE on all domains
    dependent variable Z1 = {Z1, Zt1}
    cfeq1: CoefficientFormPDE (default)
      c = {{c, 0, 0, c}, {0, 0, 0, 0}, {0, 0, 0, 0}, {c, 0, 0, c}}
      a = {-lambda, 0, 0, -lambda}
      f = {FZ1, FZ1}
      da = {1, 1-beta, 0, 0}
    zflx1: ZeroFluxBoundary "Zero Flux 1" (default)
    init1: init "Initial Values 1" (default)
    dir1: DirichletBoundary "Dirichlet Boundary Condition 1" on boundaries 3 | r = {d, d}
    flux1: FluxBoundary "Flux/Source 1" on boundaries 1 | g = {gamma1, 0}; q = {k, 0, 0, k}
  phys2: CoefficientFormPDE on all domains
    dependent variable z2 = {z2, zt2}
    cfeq1: CoefficientFormPDE (default)
      c = {{c, 0, 0, c}, {0, 0, 0, 0}, {0, 0, 0, 0}, {c, 0, 0, c}}
      a = {-lambda, 0, 0, -lambda}
      f = {FZ2-FZ1, FZ2-FZ1}
      da = {1, 1-beta, 0, 0}
    zflx1: ZeroFluxBoundary "Zero Flux 1" (default)
    init1: init "Initial Values 1" (default)
    dir1: DirichletBoundary "Dirichlet Boundary Condition 1" on boundaries 3 | r = {0, 0}
    flux1: FluxBoundary "Flux/Source 1" on boundaries 1 | g = {gamma2, 0}; q = {k, 0, 0, k}
  phys5: CoefficientFormPDE on all domains
    dependent variable z3 = {z3, zt3}
    cfeq1: CoefficientFormPDE (default)
      c = {{c, 0, 0, c}, {0, 0, 0, 0}, {0, 0, 0, 0}, {c, 0, 0, c}}
      a = {-lambda, 0, 0, -lambda}
      f = {FZ3-FZ2, FZ3-FZ2}
      da = {1, 1-beta, 0, 0}
    zflx1: ZeroFluxBoundary "Zero Flux 1" (default)
    init1: init "Initial Values 1" (default)
    dir1: DirichletBoundary "Dirichlet Boundary Condition 1" on boundaries 3 | r = {0, 0}
    flux1: FluxBoundary "Flux/Source 1" on boundaries 1 | g = {gamma3, 0}; q = {k, 0, 0, k}
  phys4: CoefficientFormPDE on all domains
    dependent variable Z
    cfeq1: CoefficientFormPDE (default) | c = {c, 0, 0, c}; a = -lambda; f = FZ; da = 1
    zflx1: ZeroFluxBoundary "Zero Flux 1" (default)
    init1: init "Initial Values 1" (default)
    dir1: DirichletBoundary "Dirichlet Boundary Condition 1" on boundaries 3 | r = d
    flux1: FluxBoundary "Flux/Source 1" on boundaries 1 | g = gamma; q = k

Mesh
  mesh1 "Mesh 1"
    size: MeshSizeDefault | hmax = 0.134; hmin = 6.0E-4; hcurve = 0.3; hnarrow = 1; hgrad = 1.3; hauto = 5
    edg1: Edge on all boundaries
      size1: Size on boundaries 1-4 | hmax = L/20; hmin = L/20; hauto = 5; custom = on
    map1: Map "Mapped 1" on remaining entities

Studies
  std1 "Study 1"
    stat: Stationary | physselection = c; solve for = {c, phys3}; useinitsol = on; initmethod = sol; initstudy = std1
  std2 "Study 2"
    time: Transient "Time Dependent"
      tlist = range(0,1,100)
      rtol = 0.000001
      physselection = c
      solve for = {phys1}
      useinitsol = on
      initstudy = std1
      usesol = on
      notsolmethod = sol
      notstudy = std1
  std3 "Study 3"
    time: Transient "Time Dependent"
      tlist = range(0,1,100)
      rtol = 0.000001
      physselection = c
      solve for = {phys2}
      usesol = on
      notsolmethod = sol
      notstudy = std2
  std4 "Study 4"
    time: Transient "Time Dependent"
      tlist = range(0,1,100)
      rtol = 0.000001
      solve for = {phys5}
      usesol = on
      notsolmethod = sol
      notstudy = std3
  std5 "Study 5"
    time: Transient "Time Dependent"
      tlist = range(0,1,100)
      rtol = 0.000001
      solve for = {phys4}
      usesol = on
      notsolmethod = sol
      notstudy = std4

Solver configurations
  sol1 "Solver 1" (study std1)
    v1: Variables "Dependent Variables 1"
    s1: Stationary "Stationary Solver 1" | stol = 1.0e-6
      dDef: Direct
      fc1: FullyCoupled | linsolver = dDef
  sol2 "Solver 2" (study std2)
    v1: Variables "Dependent Variables 1"
    t1: Time "Time-Dependent Solver 1"
      tlist = range(0,1,100)
      atolglobal = 0.00000010
      timemethod = bdf
      tstepsbdf = intermediate
      maxorder = 5
      tstepsgenalpha = intermediate
      dDef: Direct
      fc1: FullyCoupled | linsolver = dDef
  sol3 "Solver 3" (study std3)
    v1: Variables "Dependent Variables 1"
    t1: Time "Time-Dependent Solver 1" | tlist = range(0,1,100); atolglobal = 0.00000010
      dDef: Direct
      fc1: FullyCoupled | linsolver = dDef
  sol4 "Solver 4" (study std4)
    // same settings as sol3
  sol5 "Solver 5" (study std5)
    // same settings as sol3

Datasets
  dset1: Solution | solution = sol1
  dset2: Solution | solution = sol2
  dset3: Solution | solution = sol3
  dset4: Solution | solution = sol4
  dset5: Solution | solution = sol5

Derived values
  gev1: EvalGlobal "Global Evaluation 1" | data = dset5; table = tbl1; expr = gamma

Tables
  tbl1: Table
    // Global Evaluation 1 (C(Z))
    Time (s) | C(Z) | yr | C(Z1) | C(Z2) | C(Z3) | e1 | e2 | e3 | e | d | gamma
    0 | 6.01448e-35 | 1 | 1 | 1 | 1 | -1.60538e-13 | -1.60538e-13 | -1.60538e-13 | 1 | 0 | 22439
    1 | 0.903931 | 0.857866 | 0.892337 | 0.892337 | 0.892337 | -0.0344714 | -0.0344714 | -0.0344714 | -0.0460653 | 0.0001 | 1632.95
    2 | 0.741035 | 0.72618 | 0.743882 | 0.743882 | 0.743882 | -0.0177016 | -0.0177016 | -0.0177016 | -0.0148552 | 0.0004 | 420.131
    3 | 0.617655 | 0.604522 | 0.617913 | 0.617913 | 0.617913 | -0.0133908 | -0.0133908 | -0.0133908 | -0.0131325 | 0.0009 | 187.769
    4 | 0.503403 | 0.49248 | 0.503491 | 0.503491 | 0.503491 | -0.0110109 | -0.0110109 | -0.0110109 | -0.0109229 | 0.0016 | 102.114
    5 | 0.399019 | 0.389648 | 0.399061 | 0.399061 | 0.399061 | -0.00941233 | -0.00941233 | -0.00941233 | -0.00937074 | 0.0025 | 61.1601
    6 | 0.29591 | 0.29563 | 0.303852 | 0.295507 | 0.295507 | -0.00822155 | 0.000123431 | 0.000123431 | -0.000279752 | 0.0036 | 36.5789
    7 | 0.209933 | 0.210035 | 0.217308 | 0.209945 | 0.209945 | -0.00727296 | 8.99395e-05 | 8.99395e-05 | 0.000101872 | 0.0049 | 22.5157
    8 | 0.132402 | 0.13248 | 0.13896 | 0.13241 | 0.13241 | -0.00647995 | 7.0464e-05 | 7.0464e-05 | 7.77517e-05 | 0.0064 | 12.4627
    9 | 0.0625287 | 0.0625909 | 0.0683833 | 0.0625329 | 0.0625329 | -0.00579235 | 5.80428e-05 | 5.80428e-05 | 6.22673e-05 | 0.0081 | 4.55928
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
Plots
  pg1: PlotGroup2D "2D Plot Group 1" | data = dset1
    surf1: Surface | expr = Z0
  pg2: PlotGroup2D "2D Plot Group 2" | data = dset2
    surf1: Surface | expr = Z1
  pg5: PlotGroup2D "2D Plot Group 5" | data = dset3
    surf1: Surface | expr = z2
  pg8: PlotGroup2D "2D Plot Group 8" | data = dset4
    surf1: Surface | expr = z3
  pg9: PlotGroup2D "2D Plot Group 9" | data = dset5
    surf1: Surface | expr = Z
  pg3: PlotGroup1D "1D Plot Group 3" | data = dset5
    glob1: Global | expr = {yr, C(Z1), C(Z2), C(Z3), C(Z)}
  pg7: PlotGroup1D "1D Plot Group 7" | data = dset5
    glob1: Global | expr = {e2, e3, e}
  pg10: PlotGroup1D "1D Plot Group 10" | data = dset2
    glob1: Global | expr = {yr, d}