// COMSOL Multiphysics 5.0.1.276 model "Ex5.4_NL_Burg2D.mph"
// Ex5.4 NL Burg2D
// Outline of the model tree

Parameters
  nu = 1
  L = 1
  K = 5
  alpha = 1
  M1 = 0.1
  M2 = 0.2
  A1 = 0.2
  A2 = 0.1
  N = 5

Variables
  var1 "Variables 1"
    G = C(Xu)
    e = yr-C(u)
  var2 "Variables 2a"
    f_au0 = -0.5*(au0*au0x+2.*au1*au1x+2.*au2*au2x+2.*au3*au3x+2.*au4*au4x+2.*au5*au5x+2.*bu1*bu1x+2.*bu2*bu2x+2.*bu3*bu3x+2.*bu4*bu4x+2.*bu5*bu5x+av0*au0y+2.*av1*au1y+2.*av2*au2y+2.*av3*au3y+2.*av4*au4y+2.*av5*au5y+2.*bv1*bu1y+2.*bv2*bu2y+2.*bv3*bu3y+2.*bv4*bu4y+2.*bv5*bu5y)
    f_av0 = -0.5*(au0*av0x+2.*au1*av1x+2.*au2*av2x+2.*au3*av3x+2.*au4*av4x+2.*au5*av5x+2.*bu1*bv1x+2.*bu2*bv2x+2.*bu3*bv3x+2.*bu4*bv4x+2.*bu5*bv5x+av0*av0y+2.*av1*av1y+2.*av2*av2y+2.*av3*av3y+2.*av4*av4y+2.*av5*av5y+2.*bv1*bv1y+2.*bv2*bv2y+2.*bv3*bv3y+2.*bv4*bv4y+2.*bv5*bv5y)
    f_au1 = -0.5*(au0*au1x+au1*au0x+0.5*au1*au2x+0.5*au2*au1x+0.5*au2*au1x+0.5*au1*au2x+0.5*au2*au3x+0.5*au3*au2x+0.5*au3*au2x+0.5*au2*au3x+0.5*au3*au4x+0.5*au4*au3x+0.5*au4*au3x+0.5*au3*au4x+0.5*au4*au5x+0.5*au5*au4x+0.5*au5*au4x+0.5*au4*au5x+0.5*bu1*bu2x+0.5*bu2*bu1x+0.5*bu2*bu1x+0.5*bu1*bu2x+0.5*bu2*bu3x+0.5*bu3*bu2x+0.5*bu3*bu2x+0.5*bu2*bu3x+0.5*bu3*bu4x+0.5*bu4*bu3x+0.5*bu4*bu3x+0.5*bu3*bu4x+0.5*bu4*bu5x+0.5*bu5*bu4x+0.5*bu5*bu4x+0.5*bu4*bu5x+av0*au1y+av1*au0y+0.5*av1*au2y+0.5*av2*au1y+0.5*av2*au1y+0.5*av1*au2y+0.5*av2*au3y+0.5*av3*au2y+0.5*av3*au2y+0.5*av2*au3y+0.5*av3*au4y+0.5*av4*au3y+0.5*av4*au3y+0.5*av3*au4y+0.5*av4*au5y+0.5*av5*au4y+0.5*av5*au4y+0.5*av4*au5y+0.5*bv1*bu2y+0.5*bv2*bu1y+0.5*bv2*bu1y+0.5*bv1*bu2y+0.5*bv2*bu3y+0.5*bv3*bu2y+0.5*bv3*bu2y+0.5*bv2*bu3y+0.5*bv3*bu4y+0.5*bv4*bu3y+0.5*bv4*bu3y+0.5*bv3*bu4y+0.5*bv4*bu5y+0.5*bv5*bu4y+0.5*bv5*bu4y+0.5*bv4*bu5y)*(N>0)
    f_bu1 = -0.5*(au0*bu1x+bu1*au0x+au1*bu2x+bu2*au1x-au2*bu1x-bu1*au2x+au2*bu3x+bu3*au2x-au3*bu2x-bu2*au3x+au3*bu4x+bu4*au3x-au4*bu3x-bu3*au4x+au4*bu5x+bu5*au4x-au5*bu4x-bu4*au5x+av0*bu1y+bv1*au0y+av1*bu2y+bv2*au1y-av2*bu1y-bv1*au2y+av2*bu3y+bv3*au2y-av3*bu2y-bv2*au3y+av3*bu4y+bv4*au3y-av4*bu3y-bv3*au4y+av4*bu5y+bv5*au4y-av5*bu4y-bv4*au5y)*(N>0)
    f_av1 = -0.5*(au0*av1x+au1*av0x+0.5*au1*av2x+0.5*au2*av1x+0.5*au2*av1x+0.5*au1*av2x+0.5*au2*av3x+0.5*au3*av2x+0.5*au3*av2x+0.5*au2*av3x+0.5*au3*av4x+0.5*au4*av3x+0.5*au4*av3x+0.5*au3*av4x+0.5*au4*av5x+0.5*au5*av4x+0.5*au5*av4x+0.5*au4*av5x+0.5*bu1*bv2x+0.5*bu2*bv1x+0.5*bu2*bv1x+0.5*bu1*bv2x+0.5*bu2*bv3x+0.5*bu3*bv2x+0.5*bu3*bv2x+0.5*bu2*bv3x+0.5*bu3*bv4x+0.5*bu4*bv3x+0.5*bu4*bv3x+0.5*bu3*bv4x+0.5*bu4*bv5x+0.5*bu5*bv4x+0.5*bu5*bv4x+0.5*bu4*bv5x+av0*av1y+av1*av0y+0.5*av1*av2y+0.5*av2*av1y+0.5*av2*av1y+0.5*av1*av2y+0.5*av2*av3y+0.5*av3*av2y+0.5*av3*av2y+0.5*av2*av3y+0.5*av3*av4y+0.5*av4*av3y+0.5*av4*av3y+0.5*av3*av4y+0.5*av4*av5y+0.5*av5*av4y+0.5*av5*av4y+0.5*av4*av5y+0.5*bv1*bv2y+0.5*bv2*bv1y+0.5*bv2*bv1y+0.5*bv1*bv2y+0.5*bv2*bv3y+0.5*bv3*bv2y+0.5*bv3*bv2y+0.5*bv2*bv3y+0.5*bv3*bv4y+0.5*bv4*bv3y+0.5*bv4*bv3y+0.5*bv3*bv4y+0.5*bv4*bv5y+0.5*bv5*bv4y+0.5*bv5*bv4y+0.5*bv4*bv5y)*(N>0)
    f_bv1 = -0.5*(au0*bv1x+bu1*av0x+au1*bv2x+bu2*av1x-au2*bv1x-bu1*av2x+au2*bv3x+bu3*av2x-au3*bv2x-bu2*av3x+au3*bv4x+bu4*av3x-au4*bv3x-bu3*av4x+au4*bv5x+bu5*av4x-au5*bv4x-bu4*av5x+av0*bv1y+bv1*av0y+av1*bv2y+bv2*av1y-av2*bv1y-bv1*av2y+av2*bv3y+bv3*av2y-av3*bv2y-bv2*av3y+av3*bv4y+bv4*av3y-av4*bv3y-bv3*av4y+av4*bv5y+bv5*av4y-av5*bv4y-bv4*av5y)*(N>0)
    f_au2 = -0.5*(au0*au2x+au2*au0x+0.5*au1*au1x+0.5*au1*au1x+0.5*au1*au3x+0.5*au3*au1x+0.5*au2*au4x+0.5*au4*au2x+0.5*au3*au1x+0.5*au1*au3x+0.5*au3*au5x+0.5*au5*au3x+0.5*au4*au2x+0.5*au2*au4x+0.5*au5*au3x+0.5*au3*au5x-0.5*bu1*bu1x-0.5*bu1*bu1x+0.5*bu1*bu3x+0.5*bu3*bu1x+0.5*bu2*bu4x+0.5*bu4*bu2x+0.5*bu3*bu1x+0.5*bu1*bu3x+0.5*bu3*bu5x+0.5*bu5*bu3x+0.5*bu4*bu2x+0.5*bu2*bu4x+0.5*bu5*bu3x+0.5*bu3*bu5x+av0*au2y+av2*au0y+0.5*av1*au1y+0.5*av1*au1y+0.5*av1*au3y+0.5*av3*au1y+0.5*av2*au4y+0.5*av4*au2y+0.5*av3*au1y+0.5*av1*au3y+0.5*av3*au5y+0.5*av5*au3y+0.5*av4*au2y+0.5*av2*au4y+0.5*av5*au3y+0.5*av3*au5y-0.5*bv1*bu1y-0.5*bv1*bu1y+0.5*bv1*bu3y+0.5*bv3*bu1y+0.5*bv2*bu4y+0.5*bv4*bu2y+0.5*bv3*bu1y+0.5*bv1*bu3y+0.5*bv3*bu5y+0.5*bv5*bu3y+0.5*bv4*bu2y+0.5*bv2*bu4y+0.5*bv5*bu3y+0.5*bv3*bu5y)*(N>1)
    f_bu2 = -0.5*(au0*bu2x+bu2*au0x+au1*bu1x+bu1*au1x+au1*bu3x+bu3*au1x+au2*bu4x+bu4*au2x-au3*bu1x-bu1*au3x+au3*bu5x+bu5*au3x-au4*bu2x-bu2*au4x-au5*bu3x-bu3*au5x+av0*bu2y+bv2*au0y+av1*bu1y+bv1*au1y+av1*bu3y+bv3*au1y+av2*bu4y+bv4*au2y-av3*bu1y-bv1*au3y+av3*bu5y+bv5*au3y-av4*bu2y-bv2*au4y-av5*bu3y-bv3*au5y)*(N>1)
    f_av2 = -0.5*(au0*av2x+au2*av0x+0.5*au1*av1x+0.5*au1*av1x+0.5*au1*av3x+0.5*au3*av1x+0.5*au2*av4x+0.5*au4*av2x+0.5*au3*av1x+0.5*au1*av3x+0.5*au3*av5x+0.5*au5*av3x+0.5*au4*av2x+0.5*au2*av4x+0.5*au5*av3x+0.5*au3*av5x-0.5*bu1*bv1x-0.5*bu1*bv1x+0.5*bu1*bv3x+0.5*bu3*bv1x+0.5*bu2*bv4x+0.5*bu4*bv2x+0.5*bu3*bv1x+0.5*bu1*bv3x+0.5*bu3*bv5x+0.5*bu5*bv3x+0.5*bu4*bv2x+0.5*bu2*bv4x+0.5*bu5*bv3x+0.5*bu3*bv5x+av0*av2y+av2*av0y+0.5*av1*av1y+0.5*av1*av1y+0.5*av1*av3y+0.5*av3*av1y+0.5*av2*av4y+0.5*av4*av2y+0.5*av3*av1y+0.5*av1*av3y+0.5*av3*av5y+0.5*av5*av3y+0.5*av4*av2y+0.5*av2*av4y+0.5*av5*av3y+0.5*av3*av5y-0.5*bv1*bv1y-0.5*bv1*bv1y+0.5*bv1*bv3y+0.5*bv3*bv1y+0.5*bv2*bv4y+0.5*bv4*bv2y+0.5*bv3*bv1y+0.5*bv1*bv3y+0.5*bv3*bv5y+0.5*bv5*bv3y+0.5*bv4*bv2y+0.5*bv2*bv4y+0.5*bv5*bv3y+0.5*bv3*bv5y)*(N>1)
    f_bv2 = -0.5*(au0*bv2x+bu2*av0x+au1*bv1x+bu1*av1x+au1*bv3x+bu3*av1x+au2*bv4x+bu4*av2x-au3*bv1x-bu1*av3x+au3*bv5x+bu5*av3x-au4*bv2x-bu2*av4x-au5*bv3x-bu3*av5x+av0*bv2y+bv2*av0y+av1*bv1y+bv1*av1y+av1*bv3y+bv3*av1y+av2*bv4y+bv4*av2y-av3*bv1y-bv1*av3y+av3*bv5y+bv5*av3y-av4*bv2y-bv2*av4y-av5*bv3y-bv3*av5y)*(N>1)
    f_au3 = -0.5*(au0*au3x+au3*au0x+0.5*au1*au2x+0.5*au2*au1x+0.5*au1*au4x+0.5*au4*au1x+0.5*au2*au1x+0.5*au1*au2x+0.5*au2*au5x+0.5*au5*au2x+0.5*au4*au1x+0.5*au1*au4x+0.5*au5*au2x+0.5*au2*au5x-0.5*bu1*bu2x-0.5*bu2*bu1x+0.5*bu1*bu4x+0.5*bu4*bu1x-0.5*bu2*bu1x-0.5*bu1*bu2x+0.5*bu2*bu5x+0.5*bu5*bu2x+0.5*bu4*bu1x+0.5*bu1*bu4x+0.5*bu5*bu2x+0.5*bu2*bu5x+av0*au3y+av3*au0y+0.5*av1*au2y+0.5*av2*au1y+0.5*av1*au4y+0.5*av4*au1y+0.5*av2*au1y+0.5*av1*au2y+0.5*av2*au5y+0.5*av5*au2y+0.5*av4*au1y+0.5*av1*au4y+0.5*av5*au2y+0.5*av2*au5y-0.5*bv1*bu2y-0.5*bv2*bu1y+0.5*bv1*bu4y+0.5*bv4*bu1y-0.5*bv2*bu1y-0.5*bv1*bu2y+0.5*bv2*bu5y+0.5*bv5*bu2y+0.5*bv4*bu1y+0.5*bv1*bu4y+0.5*bv5*bu2y+0.5*bv2*bu5y)*(N>2)
    f_bu3 = -0.5*(au0*bu3x+bu3*au0x+au1*bu2x+bu2*au1x+au1*bu4x+bu4*au1x+au2*bu1x+bu1*au2x+au2*bu5x+bu5*au2x-au4*bu1x-bu1*au4x-au5*bu2x-bu2*au5x+av0*bu3y+bv3*au0y+av1*bu2y+bv2*au1y+av1*bu4y+bv4*au1y+av2*bu1y+bv1*au2y+av2*bu5y+bv5*au2y-av4*bu1y-bv1*au4y-av5*bu2y-bv2*au5y)*(N>2)
    f_av3 = -0.5*(au0*av3x+au3*av0x+0.5*au1*av2x+0.5*au2*av1x+0.5*au1*av4x+0.5*au4*av1x+0.5*au2*av1x+0.5*au1*av2x+0.5*au2*av5x+0.5*au5*av2x+0.5*au4*av1x+0.5*au1*av4x+0.5*au5*av2x+0.5*au2*av5x-0.5*bu1*bv2x-0.5*bu2*bv1x+0.5*bu1*bv4x+0.5*bu4*bv1x-0.5*bu2*bv1x-0.5*bu1*bv2x+0.5*bu2*bv5x+0.5*bu5*bv2x+0.5*bu4*bv1x+0.5*bu1*bv4x+0.5*bu5*bv2x+0.5*bu2*bv5x+av0*av3y+av3*av0y+0.5*av1*av2y+0.5*av2*av1y+0.5*av1*av4y+0.5*av4*av1y+0.5*av2*av1y+0.5*av1*av2y+0.5*av2*av5y+0.5*av5*av2y+0.5*av4*av1y+0.5*av1*av4y+0.5*av5*av2y+0.5*av2*av5y-0.5*bv1*bv2y-0.5*bv2*bv1y+0.5*bv1*bv4y+0.5*bv4*bv1y-0.5*bv2*bv1y-0.5*bv1*bv2y+0.5*bv2*bv5y+0.5*bv5*bv2y+0.5*bv4*bv1y+0.5*bv1*bv4y+0.5*bv5*bv2y+0.5*bv2*bv5y)*(N>2)
    f_bv3 = -0.5*(au0*bv3x+bu3*av0x+au1*bv2x+bu2*av1x+au1*bv4x+bu4*av1x+au2*bv1x+bu1*av2x+au2*bv5x+bu5*av2x-au4*bv1x-bu1*av4x-au5*bv2x-bu2*av5x+av0*bv3y+bv3*av0y+av1*bv2y+bv2*av1y+av1*bv4y+bv4*av1y+av2*bv1y+bv1*av2y+av2*bv5y+bv5*av2y-av4*bv1y-bv1*av4y-av5*bv2y-bv2*av5y)*(N>2)
    f_au4 = -0.5*(au0*au4x+au4*au0x+0.5*au1*au3x+0.5*au3*au1x+0.5*au1*au5x+0.5*au5*au1x+0.5*au2*au2x+0.5*au2*au2x+0.5*au3*au1x+0.5*au1*au3x+0.5*au5*au1x+0.5*au1*au5x-0.5*bu1*bu3x-0.5*bu3*bu1x+0.5*bu1*bu5x+0.5*bu5*bu1x-0.5*bu2*bu2x-0.5*bu2*bu2x-0.5*bu3*bu1x-0.5*bu1*bu3x+0.5*bu5*bu1x+0.5*bu1*bu5x+av0*au4y+av4*au0y+0.5*av1*au3y+0.5*av3*au1y+0.5*av1*au5y+0.5*av5*au1y+0.5*av2*au2y+0.5*av2*au2y+0.5*av3*au1y+0.5*av1*au3y+0.5*av5*au1y+0.5*av1*au5y-0.5*bv1*bu3y-0.5*bv3*bu1y+0.5*bv1*bu5y+0.5*bv5*bu1y-0.5*bv2*bu2y-0.5*bv2*bu2y-0.5*bv3*bu1y-0.5*bv1*bu3y+0.5*bv5*bu1y+0.5*bv1*bu5y)*(N>3)
    f_bu4 = -0.5*(au0*bu4x+bu4*au0x+au1*bu3x+bu3*au1x+au1*bu5x+bu5*au1x+au2*bu2x+bu2*au2x+au3*bu1x+bu1*au3x-au5*bu1x-bu1*au5x+av0*bu4y+bv4*au0y+av1*bu3y+bv3*au1y+av1*bu5y+bv5*au1y+av2*bu2y+bv2*au2y+av3*bu1y+bv1*au3y-av5*bu1y-bv1*au5y)*(N>3)
    f_av4 = -0.5*(au0*av4x+au4*av0x+0.5*au1*av3x+0.5*au3*av1x+0.5*au1*av5x+0.5*au5*av1x+0.5*au2*av2x+0.5*au2*av2x+0.5*au3*av1x+0.5*au1*av3x+0.5*au5*av1x+0.5*au1*av5x-0.5*bu1*bv3x-0.5*bu3*bv1x+0.5*bu1*bv5x+0.5*bu5*bv1x-0.5*bu2*bv2x-0.5*bu2*bv2x-0.5*bu3*bv1x-0.5*bu1*bv3x+0.5*bu5*bv1x+0.5*bu1*bv5x+av0*av4y+av4*av0y+0.5*av1*av3y+0.5*av3*av1y+0.5*av1*av5y+0.5*av5*av1y+0.5*av2*av2y+0.5*av2*av2y+0.5*av3*av1y+0.5*av1*av3y+0.5*av5*av1y+0.5*av1*av5y-0.5*bv1*bv3y-0.5*bv3*bv1y+0.5*bv1*bv5y+0.5*bv5*bv1y-0.5*bv2*bv2y-0.5*bv2*bv2y-0.5*bv3*bv1y-0.5*bv1*bv3y+0.5*bv5*bv1y+0.5*bv1*bv5y)*(N>3)
    f_bv4 = -0.5*(au0*bv4x+bu4*av0x+au1*bv3x+bu3*av1x+au1*bv5x+bu5*av1x+au2*bv2x+bu2*av2x+au3*bv1x+bu1*av3x-au5*bv1x-bu1*av5x+av0*bv4y+bv4*av0y+av1*bv3y+bv3*av1y+av1*bv5y+bv5*av1y+av2*bv2y+bv2*av2y+av3*bv1y+bv1*av3y-av5*bv1y-bv1*av5y)*(N>3)
    f_au5 = -0.5*(au0*au5x+au5*au0x+0.5*au1*au4x+0.5*au4*au1x+0.5*au2*au3x+0.5*au3*au2x+0.5*au3*au2x+0.5*au2*au3x+0.5*au4*au1x+0.5*au1*au4x-0.5*bu1*bu4x-0.5*bu4*bu1x-0.5*bu2*bu3x-0.5*bu3*bu2x-0.5*bu3*bu2x-0.5*bu2*bu3x-0.5*bu4*bu1x-0.5*bu1*bu4x+av0*au5y+av5*au0y+0.5*av1*au4y+0.5*av4*au1y+0.5*av2*au3y+0.5*av3*au2y+0.5*av3*au2y+0.5*av2*au3y+0.5*av4*au1y+0.5*av1*au4y-0.5*bv1*bu4y-0.5*bv4*bu1y-0.5*bv2*bu3y-0.5*bv3*bu2y-0.5*bv3*bu2y-0.5*bv2*bu3y-0.5*bv4*bu1y-0.5*bv1*bu4y)*(N>4)
    f_bu5 = -0.5*(au0*bu5x+bu5*au0x+au1*bu4x+bu4*au1x+au2*bu3x+bu3*au2x+au3*bu2x+bu2*au3x+au4*bu1x+bu1*au4x+av0*bu5y+bv5*au0y+av1*bu4y+bv4*au1y+av2*bu3y+bv3*au2y+av3*bu2y+bv2*au3y+av4*bu1y+bv1*au4y)*(N>4)
    f_av5 = -0.5*(au0*av5x+au5*av0x+0.5*au1*av4x+0.5*au4*av1x+0.5*au2*av3x+0.5*au3*av2x+0.5*au3*av2x+0.5*au2*av3x+0.5*au4*av1x+0.5*au1*av4x-0.5*bu1*bv4x-0.5*bu4*bv1x-0.5*bu2*bv3x-0.5*bu3*bv2x-0.5*bu3*bv2x-0.5*bu2*bv3x-0.5*bu4*bv1x-0.5*bu1*bv4x+av0*av5y+av5*av0y+0.5*av1*av4y+0.5*av4*av1y+0.5*av2*av3y+0.5*av3*av2y+0.5*av3*av2y+0.5*av2*av3y+0.5*av4*av1y+0.5*av1*av4y-0.5*bv1*bv4y-0.5*bv4*bv1y-0.5*bv2*bv3y-0.5*bv3*bv2y-0.5*bv3*bv2y-0.5*bv2*bv3y-0.5*bv4*bv1y-0.5*bv1*bv4y)*(N>4)
    f_bv5 = -0.5*(au0*bv5x+bu5*av0x+au1*bv4x+bu4*av1x+au2*bv3x+bu3*av2x+au3*bv2x+bu2*av3x+au4*bv1x+bu1*av4x+av0*bv5y+bv5*av0y+av1*bv4y+bv4*av1y+av2*bv3y+bv3*av2y+av3*bv2y+bv2*av3y+av4*bv1y+bv1*av4y)*(N>4)
    d_a0 = 2*M2
    d_a1 = 0*(N>0)
    d_b1 = A2*(N>0)
    d_a2 = 0*(N>1)
    d_b2 = 0*(N>1)
    d_a3 = 0*(N>2)
    d_b3 = 0*(N>2)
    d_a4 = 0*(N>3)
    d_b4 = 0*(N>3)
    d_a5 = 0*(N>4)
    d_b5 = 0*(N>4)
    d = M2+A2*sin(alpha*t)
    Gamma_a0 = (2*M1-C(atu0))/G
    Gamma_a1 = (0-C(atu1))/G*(N>0)
    Gamma_b1 = (A1-C(btu1))/G*(N>0)
    Gamma_a2 = (0-C(atu2))/G*(N>1)
    Gamma_b2 = (0-C(btu2))/G*(N>1)
    Gamma_a3 = (0-C(atu3))/G*(N>2)
    Gamma_b3 = (0-C(btu3))/G*(N>2)
    Gamma_a4 = (0-C(atu4))/G*(N>3)
    Gamma_b4 = (0-C(btu4))/G*(N>3)
    Gamma_a5 = (0-C(atu5))/G*(N>4)
    Gamma_b5 = (0-C(btu5))/G*(N>4)
    gamma = 0.5*Gamma_a0+Gamma_a1*cos(alpha*1*t)+Gamma_b1*sin(alpha*1*t)+Gamma_a2*cos(alpha*2*t)+Gamma_b2*sin(alpha*2*t)+Gamma_a3*cos(alpha*3*t)+Gamma_b3*sin(alpha*3*t)+Gamma_a4*cos(alpha*4*t)+Gamma_b4*sin(alpha*4*t)+Gamma_a5*cos(alpha*5*t)+Gamma_b5*sin(alpha*5*t)
    yr = M1+A1*sin(alpha*t)

Couplings
  aveop1: Average on boundaries 4 | opname = C

Geometry
  geom1 "Geometry 1" (2D, length unit m)
    r1: Rectangle | size = {2*L, L}
    fin: Finalize "Form Union"

Physics
  c: CoefficientFormPDE "Unit Input" on all domains
    dependent variable X = {Xu, Xv}
    cfeq1: CoefficientFormPDE (default)
      c = {{nu, 0, 0, nu}, {0, 0, 0, 0}, {0, 0, 0, 0}, {nu, 0, 0, nu}}
      f = {0, 0}
      da = {0, 0, 0, 0}
    zflx1: ZeroFluxBoundary "Zero Flux 1" (default)
    init1: init "Initial Values 1" (default)
    dir1: DirichletBoundary "Dirichlet Boundary Condition 1" on boundaries 3 | r = {0, 0}
    flux2: FluxBoundary "Flux/Source 1" on boundaries 1 | g = {1, 0}; q = {K, 0, 0, K}
  c2: CoefficientFormPDE "Fourier coefficients 0" on all domains
    dependent variable a0 = {au0, av0, atu0}
    cfeq1: CoefficientFormPDE (default)
      c = {{nu, 0, 0, nu}, {0, 0, 0, 0}, {0, 0, 0, 0}, {0, 0, 0, 0}, {nu, 0, 0, nu}, {0, 0, 0, 0}, {0, 0, 0, 0}, {0, 0, 0, 0}, {nu, 0, 0, nu}}
      f = {f_au0, f_av0, f_au0}
      da = 0
    zflx1: ZeroFluxBoundary "Zero Flux 1" (default)
    init1: init "Initial Values 1" (default)
    dir1: DirichletBoundary "Dirichlet Boundary Condition 1" on boundaries 2 | r = {0, d_a0, 0}
    flux1: FluxBoundary "Flux/Source 1" on boundaries 1 | g = {Gamma_a0, 0, 0}; q = K
  c3: CoefficientFormPDE "Fourier coefficients 1" on all domains
    dependent variable ab1 = {au1, bu1, av1, bv1, atu1, btu1}
    cfeq1: CoefficientFormPDE (default)
      c = 
        {nu, 0, 0, nu}
        {0, 0, 0, 0}
        {0, 0, 0, 0}
        {0, 0, 0, 0}
        {0, 0, 0, 0}
        {0, 0, 0, 0}
        {0, 0, 0, 0}
        {nu, 0, 0, nu}
        {0, 0, 0, 0}
        {0, 0, 0, 0}
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      a = {0, -alpha, 0, 0, 0, -alpha, alpha, 0, 0, 0, alpha, 0, 0, 0, 0, -alpha, 0, 0, 0, 0, alpha, 0, 0, 0, 0, 0, 0, 0, 0, 0, 0, 0, 0, 0, 0, 0}
      f = {f_au1, f_bu1, f_av1, f_bv1, f_au1, f_bu1}
      da = {0, 0, 0, 0, 0, 0, 0, 0, 0, 0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}
    zflx1: ZeroFluxBoundary "Zero Flux 1" (default)
    init1: init "Initial Values 1" (default)
    dir1: DirichletBoundary "Dirichlet Boundary Condition 1" on boundaries 2 | r = {0, 0, d_a1, d_b1, 0, 0}
    flux1: FluxBoundary "Flux/Source 1" on boundaries 1
      g = {Gamma_a1, Gamma_b1, 0, 0, 0, 0}
      q = {K, 0, 0, 0, 0, 0, 0, K, 0, 0, 0, 0, 0, 0, K, 0, 0, 0, 0, 0, 0, K, 0, 0, 0, 0, 0, 0, K, 0, 0, 0, 0, 0, 0, K}
  c4: CoefficientFormPDE "Fourier coefficients 2" on all domains
    dependent variable ab2 = {au2, bu2, av2, bv2, atu2, btu2}
    cfeq1: CoefficientFormPDE (default)
      c = 
        {nu, 0, 0, nu}
        {0, 0, 0, 0}
        {0, 0, 0, 0}
        {0, 0, 0, 0}
        {0, 0, 0, 0}
        {0, 0, 0, 0}
        {0, 0, 0, 0}
        {nu, 0, 0, nu}
        {0, 0, 0, 0}
        {0, 0, 0, 0}
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      a = {0, -2*alpha, 0, 0, 0, -2*alpha, 2*alpha, 0, 0, 0, 2*alpha, 0, 0, 0, 0, -2*alpha, 0, 0, 0, 0, 2*alpha, 0, 0, 0, 0, 0, 0, 0, 0, 0, 0, 0, 0, 0, 0, 0}
      f = {f_au2, f_bu2, f_av2, f_bv2, f_au2, f_bu2}
      da = {0, 0, 0, 0, 0, 0, 0, 0, 0, 0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}
    zflx1: ZeroFluxBoundary "Zero Flux 1" (default)
    init1: init "Initial Values 1" (default)
    dir1: DirichletBoundary "Dirichlet Boundary Condition 1" on boundaries 2 | r = {0, 0, d_a2, d_b2, 0, 0}
    flux1: FluxBoundary "Flux/Source 1" on boundaries 1
      g = {Gamma_a2, Gamma_b2, 0, 0, 0, 0}
      q = {K, 0, 0, 0, 0, 0, 0, K, 0, 0, 0, 0, 0, 0, K, 0, 0, 0, 0, 0, 0, K, 0, 0, 0, 0, 0, 0, K, 0, 0, 0, 0, 0, 0, K}
  phys1: CoefficientFormPDE "Fourier coefficients 3" on all domains
    dependent variable ab3 = {au3, bu3, av3, bv3, atu3, btu3}
    cfeq1: CoefficientFormPDE (default)
      c = 
        {nu, 0, 0, nu}
        {0, 0, 0, 0}
        {0, 0, 0, 0}
        {0, 0, 0, 0}
        {0, 0, 0, 0}
        {0, 0, 0, 0}
        {0, 0, 0, 0}
        {nu, 0, 0, nu}
        {0, 0, 0, 0}
        {0, 0, 0, 0}
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      a = {0, -3*alpha, 0, 0, 0, -3*alpha, 3*alpha, 0, 0, 0, 3*alpha, 0, 0, 0, 0, -3*alpha, 0, 0, 0, 0, 3*alpha, 0, 0, 0, 0, 0, 0, 0, 0, 0, 0, 0, 0, 0, 0, 0}
      f = {f_au3, f_bu3, f_av3, f_bv3, f_au3, f_bu3}
      da = {0, 0, 0, 0, 0, 0, 0, 0, 0, 0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}
    zflx1: ZeroFluxBoundary "Zero Flux 1" (default)
    init1: init "Initial Values 1" (default)
    dir1: DirichletBoundary "Dirichlet Boundary Condition 1" on boundaries 2 | r = {0, 0, d_a3, d_b3, 0, 0}
    flux1: FluxBoundary "Flux/Source 1" on boundaries 1
      g = {Gamma_a3, Gamma_b3, 0, 0, 0, 0}
      q = {K, 0, 0, 0, 0, 0, 0, K, 0, 0, 0, 0, 0, 0, K, 0, 0, 0, 0, 0, 0, K, 0, 0, 0, 0, 0, 0, K, 0, 0, 0, 0, 0, 0, K}
  phys2: CoefficientFormPDE "Fourier coefficients 4" on all domains
    dependent variable ab4 = {au4, bu4, av4, bv4, atu4, btu4}
    cfeq1: CoefficientFormPDE (default)
      c = 
        {nu, 0, 0, nu}
        {0, 0, 0, 0}
        {0, 0, 0, 0}
        {0, 0, 0, 0}
        {0, 0, 0, 0}
        {0, 0, 0, 0}
        {0, 0, 0, 0}
        {nu, 0, 0, nu}
        {0, 0, 0, 0}
        {0, 0, 0, 0}
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      a = {0, -4*alpha, 0, 0, 0, -4*alpha, 4*alpha, 0, 0, 0, 4*alpha, 0, 0, 0, 0, -4*alpha, 0, 0, 0, 0, 4*alpha, 0, 0, 0, 0, 0, 0, 0, 0, 0, 0, 0, 0, 0, 0, 0}
      f = {f_au4, f_bu4, f_av4, f_bv4, f_au4, f_bu4}
      da = {0, 0, 0, 0, 0, 0, 0, 0, 0, 0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}
    zflx1: ZeroFluxBoundary "Zero Flux 1" (default)
    init1: init "Initial Values 1" (default)
    dir1: DirichletBoundary "Dirichlet Boundary Condition 1" on boundaries 2 | r = {0, 0, d_a4, d_b4, 0, 0}
    flux1: FluxBoundary "Flux/Source 1" on boundaries 1
      g = {Gamma_a4, Gamma_b4, 0, 0, 0, 0}
      q = {K, 0, 0, 0, 0, 0, 0, K, 0, 0, 0, 0, 0, 0, K, 0, 0, 0, 0, 0, 0, K, 0, 0, 0, 0, 0, 0, K, 0, 0, 0, 0, 0, 0, K}
  phys3: CoefficientFormPDE "Fourier coefficients 5" on all domains
    dependent variable ab5 = {au5, bu5, av5, bv5, atu5, btu5}
    cfeq1: CoefficientFormPDE (default)
      c = 
        {nu, 0, 0, nu}
        {0, 0, 0, 0}
        {0, 0, 0, 0}
        {0, 0, 0, 0}
        {0, 0, 0, 0}
        {0, 0, 0, 0}
        {0, 0, 0, 0}
        {nu, 0, 0, nu}
        {0, 0, 0, 0}
        {0, 0, 0, 0}
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      a = {0, -5*alpha, 0, 0, 0, -5*alpha, 5*alpha, 0, 0, 0, 5*alpha, 0, 0, 0, 0, -5*alpha, 0, 0, 0, 0, 5*alpha, 0, 0, 0, 0, 0, 0, 0, 0, 0, 0, 0, 0, 0, 0, 0}
      f = {f_au5, f_bu5, f_av5, f_bv5, f_au5, f_bu5}
      da = {0, 0, 0, 0, 0, 0, 0, 0, 0, 0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}
    zflx1: ZeroFluxBoundary "Zero Flux 1" (default)
    init1: init "Initial Values 1" (default)
    dir1: DirichletBoundary "Dirichlet Boundary Condition 1" on boundaries 2 | r = {0, 0, d_a5, d_b5, 0, 0}
    flux1: FluxBoundary "Flux/Source 1" on boundaries 1
      g = {Gamma_a5, Gamma_b5, 0, 0, 0, 0}
      q = {K, 0, 0, 0, 0, 0, 0, K, 0, 0, 0, 0, 0, 0, K, 0, 0, 0, 0, 0, 0, K, 0, 0, 0, 0, 0, 0, K, 0, 0, 0, 0, 0, 0, K}
  c5: CoefficientFormPDE "Closed loop system" on all domains
    dependent variable u = {u, v}
    cfeq1: CoefficientFormPDE (default)
      c = {{nu, 0, 0, nu}, {0, 0, 0, 0}, {0, 0, 0, 0}, {nu, 0, 0, nu}}
      f = {0, 0}
      da = {1, 0, 0, 1}
      be = {{u, v}, {0, 0}, {0, 0}, {u, v}}
    zflx1: ZeroFluxBoundary "Zero Flux 1" (default)
    init1: init "Initial Values 1" (default)
    dir1: DirichletBoundary "Dirichlet Boundary Condition 1" on boundaries 2 | r = {0, d}
    flux1: FluxBoundary "Flux/Source 1" on boundaries 1 | g = {gamma, 0}; q = {K, 0, 0, K}

Mesh
  mesh1 "Mesh 1"
    size: MeshSizeDefault | hmax = 0.134; hmin = 6.0E-4; hcurve = 0.3; hnarrow = 1; hgrad = 1.3; hauto = 5
    map1: Map "Mapped 1" on all domains
      size1: Size on domains 1 | hmax = L/10; hmin = L/10; hauto = 5; custom = on

Studies
  std1 "Study 1"
    stat: Stationary | physselection = c; solve for = {c}
  std2 "Study 2"
    stat: Stationary
      physselection = c
      solve for = {c2, c3, c4, phys1, phys2, phys3}
      usesol = on
      notsolmethod = sol
      notstudy = std1
  std3 "Study 3"
    time: Transient "Time Dependent"
      tlist = range(0,0.1,20)
      rtol = 0.0001
      physselection = c
      solve for = {c5}
      usesol = on
      notsolmethod = sol
      notstudy = std2

Solver configurations
  sol1 "Solver 1" (study std1)
    v1: Variables "Dependent Variables 1"
    s1: Stationary "Stationary Solver 1" | stol = 0.000010
      dDef: Direct
      fc1: FullyCoupled | linsolver = dDef
  sol2 "Solver 2" (study std2)
    // same settings as sol1
  sol3 "Solver 3" (study std3)
    v1: Variables "Dependent Variables 1"
    t1: Time "Time-Dependent Solver 1" | tlist = range(0,0.1,20); atolglobal = 0.000010
      dDef: Direct
      fc1: FullyCoupled | linsolver = dDef

Datasets
  dset1: Solution | solution = sol1
  dset2: Solution | solution = sol2
  dset3: Solution | solution = sol3

Derived values
  gev1: EvalGlobal "Global Evaluation 1" | data = dset3; table = tbl1; expr = e

Tables
  tbl1: Table
    // Global Evaluation 1 (G)
    Time (s) | C(u) | yr | gamma | d | e
    0 | -2.14735e-19 | 0.1 | 13.3386 | 0.2 | 0.1
    0.1 | 9.37095e-06 | 0.119967 | 13.8515 | 0.209983 | 0.119957
    0.2 | 0.00246798 | 0.139734 | 14.2934 | 0.219867 | 0.137266
    0.3 | 0.0170469 | 0.159104 | 14.676 | 0.229552 | 0.142057
    0.4 | 0.0453267 | 0.177884 | 15.009 | 0.238942 | 0.132557
    0.5 | 0.0811116 | 0.195885 | 15.2978 | 0.247943 | 0.114774
    0.6 | 0.118392 | 0.212928 | 15.5424 | 0.256464 | 0.0945365
    0.7 | 0.153516 | 0.228844 | 15.7383 | 0.264422 | 0.0753276
    0.8 | 0.184784 | 0.243471 | 15.8779 | 0.271736 | 0.0586871
    0.9 | 0.211684 | 0.256665 | 15.9532 | 0.278333 | 0.0449811
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
Plots
  pg1: PlotGroup2D "2D Plot Group 1" | data = dset1
    surf1: Surface | expr = Xv
  pg2: PlotGroup2D "2D Plot Group 2" | data = dset2
    surf1: Surface | expr = au4
  pg3: PlotGroup2D "2D Plot Group 3" | data = dset3
    surf1: Surface | expr = u
  pg4: PlotGroup1D "1D Plot Group 4" | data = dset3
    glob1: Global | expr = {yr, C(u)}
  pg5: PlotGroup1D "1D Plot Group 5" | data = dset3
    glob1: Global | expr = {e, }

Exports
  data1: Data | data = dset3