// COMSOL Multiphysics 5.0.1.276 model "Ex5_5_1_Non_linear_beam.mph"
// Ex5 5 1 Non linear beam nu vals
// Outline of the model tree

Parameters
  L = 5
  E = 200*10^9
  H = 0.1
  rho = 6000
  A = B*H
  I = B*H^3/12
  B = 0.05
  D1 = E/rho/1000
  D2 = E*I/(rho*A)
  beta1 = 0
  beta2 = D2

Variables
  var1 "Variables 1a"
    yr1 = 0
    yr2 = 0.01*sin(4*t)
    e1 = yr1-C(w)
    e2 = yr2-C(wx)

Couplings
  intop1: Integration on boundaries 2 | opname = C

Geometry
  geom1 "Geometry 1" (1D, length unit m)
    i1: Interval | p2 = L; p = {0, L}
    fin: Finalize "Form Union"

Physics
  c: CoefficientFormPDE "Zero Dynamics" on all domains
    dependent variable q = {p, q, Dq}
    cfeq1: CoefficientFormPDE (default)
      c = {D1, 0, 0, 0, 0, 1, 0, D2, 0}
      a = diag{0, 0, -1}
      f = {D1*d(0.5*qx^2,x), D1*d(qx*(px+1/2*qx^2),x), 0}
      ea = diag{1, 1, 0}
      da = {0, 0, 0, 0, beta1, 0, 0, beta2, 0}
    zflx1: ZeroFluxBoundary "Zero Flux 1" (default)
    init1: init "Initial Values 1" (default)
    dir1: DirichletBoundary "Dirichlet Boundary Condition 1" on boundaries 1
      r = {0, 0, 0}
      useDirichletCondition = {0, 1, 1}
    dir2: DirichletBoundary "Dirichlet Boundary Condition 2" on boundaries 2
      r = {0, 0, 0}
      useDirichletCondition = {1, 1, 0}
    flux1: FluxBoundary "Flux/Source 1" on boundaries 2 | g = {0, 0, yr2}
  c2: CoefficientFormPDE "Closed Loop System" on all domains
    dependent variable w = {u, w, Dw}
    cfeq1: CoefficientFormPDE (default)
      c = {D1, 0, 0, 0, 0, 1, 0, D2, 0}
      a = diag{0, 0, -1}
      f = {D1*d(0.5*wx^2,x), D1*d(wx*(ux+1/2*wx^2),x), 0}
      ea = diag{1, 1, 0}
      da = {0, 0, 0, 0, beta1, 0, 0, beta2, 0}
    zflx1: ZeroFluxBoundary "Zero Flux 1" (default)
    init1: init "Initial Values 1" (default) | w = 0.025*(x^2*(L-x))/L^3; Dw = 0
    dir1: DirichletBoundary "Dirichlet Boundary Condition 1" on boundaries 1
      r = {0, 0, 0}
      useDirichletCondition = {0, 1, 1}
    dir2: DirichletBoundary "Dirichlet Boundary Condition 2" on boundaries 2
      r = {0, 0, Dq}
      useDirichletCondition = {1, 1, 1}
    flux1: FluxBoundary "Flux/Source 1" on boundaries 2 | g = {0, 0, 0}

Mesh
  mesh1 "Mesh 1"
    size: MeshSizeDefault | hmax = 0.1; hmin = 3.75E-4; hcurve = 0.25; hnarrow = 1; hgrad = 1.2; hauto = 2
    dis1: Distribution on all domains | type = predefined; elemcount = 50; elemratio = 10; symmetric = on; reverse = off
    edg1: Edge on all domains

Studies
  std1 "Study 1"
    time: Transient "Time Dependent" | tlist = range(0,0.01,2.5); rtol = 0.01

Solver configurations
  sol1 "Solver 1" (study std1)
    v1: Variables "Dependent Variables 1"
    t1: Time "Time-Dependent Solver 1" | tlist = range(0,0.01,2.5); atolglobal = 0.0010; tstepsbdf = intermediate
      dDef: Direct
      fc1: FullyCoupled | linsolver = dDef

Datasets
  dset1: Solution | solution = sol1

Derived values
  gev1: EvalGlobal "Global Evaluation 1" | data = dset1; table = tbl1; expr = C(qx)

Tables
  tbl1: Table
    // Global Evaluation 1 (C(wx))
    Time (s) | C(wx) | yr2 | e2 | C(qx)
    0 | -0.00358567 | 0 | 0.00358567 | 0
    0.01 | 0.000470146 | 0.000399893 | -7.02523e-05 | 0.000398813
    0.02 | 0.000866943 | 0.000799147 | -6.77957e-05 | 0.000798046
    0.03 | 0.00126262 | 0.00119712 | -6.54968e-05 | 0.00119601
    0.04 | 0.00165652 | 0.00159318 | -6.33363e-05 | 0.00159207
    0.05 | 0.00204799 | 0.00198669 | -6.12992e-05 | 0.00198558
    0.06 | 0.0024364 | 0.00237703 | -5.93743e-05 | 0.00237591
    0.07 | 0.00282111 | 0.00276356 | -5.75505e-05 | 0.00276245
    0.08 | 0.00320148 | 0.00314567 | -5.58176e-05 | 0.00314456
    0.09 | 0.00357691 | 0.00352274 | -5.41698e-05 | 0.00352165
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
Plots
  pg1: PlotGroup1D "1D Plot Group 1" | data = dset1
    lngr1: LineGraph on all domains | expr = w; xdata = expr; xdataexpr = x
  pg2: PlotGroup1D "1D Plot Group 2" | data = dset1
    ptgr1: PointGraph on boundaries 2 | expr = qx
  pg3: PlotGroup1D "1D Plot Group 3" | data = dset1
    ptgr1: PointGraph on boundaries 2 | expr = C(w)
  pg4: PlotGroup1D "1D Plot Group 4" | data = dset1
    ptgr1: PointGraph on boundaries 2 | expr = u
  pg5: PlotGroup1D "1D Plot Group 5" | data = dset1
    glob1: Global | expr = {yr2, C(wx)}
  pg6: PlotGroup1D "1D Plot Group 6" | data = dset1
    glob1: Global | expr = {e1, e2}

Exports
  anim1: Animation
    giffilename = /Users/eaulisa/Dropbox/Public/Mono_7_14_EA/Comsol_exs/Chapter5/Untitled.gif
    size = manual
    width = 640
    height = 480
    options = on
    axes = on
  data1: Data
    data = dset1
    expr = {u, w, wx, Dw}
    filename = /Users/gilliam/Desktop/collect_14/research14/Mono_7_14_EA/Comsol_exs/Chapter5/Chap5Ex5_ZD/Ex5.5.1_NL_beam/matlab_figs/surf_data.txt
    location = grid
    gridx1 = range(0,0.025,L)