// COMSOL Multiphysics 5.0.1.276 model "Ex5_5_2_Chaffe-Infante_zero_dynamics.mph"
// Ex5 5 2 Chaffe-Infante zero dynamics
// Outline of the model tree

Parameters
  L = 1
  lambda = 3
  k1 = 1
  k2 = 2
  k3 = 0.5
  k4 = 0.25

Variables
  var1 "Variables 1"
    d1 = cos((y-t)*2*pi)*5
    d2 = cos((x-t)*2*pi)*10
    yr3 = flc2hs(y-0.25,0.05)-flc2hs(y-0.5,0.05)
    yr4 = -2*(flc2hs(x-0.25,0.05)-flc2hs(x-0.5,0.05))
    e1 = sqrt(C1((yr3-z)^2))
    e2 = sqrt(C2((yr4-z)^2))

Couplings
  intop1: Integration on boundaries 4 | opname = C1
  intop2: Integration on boundaries 3 | opname = C2

Geometry
  geom1 "Geometry 1" (2D, length unit m)
    sq1: Square | size = L
    fin: Finalize "Form Union"

Physics
  c: CoefficientFormPDE "zero dymamics" on all domains
    dependent variable X
    cfeq1: CoefficientFormPDE (default) | c = {1, 0, 0, 1}; a = lambda; f = -lambda*X^3; da = 1
    zflx1: ZeroFluxBoundary "Zero Flux" (default)
    init1: init "Initial Values" (default)
    flux1: FluxBoundary "Flux/Source 1" on boundaries 1 | g = d1; q = k1
    flux2: FluxBoundary "Flux/Source 2" on boundaries 2 | g = d2; q = k2
    cons1: Constraint on boundaries 4 | R = X-yr3; constraintType = unidirectionalConstraint; weakConstraints = 1
    cons2: Constraint on boundaries 3 | R = X-yr4; constraintType = unidirectionalConstraint; weakConstraints = 1
  c2: CoefficientFormPDE "Plant" on all domains
    dependent variable z
    cfeq1: CoefficientFormPDE (default) | c = {1, 0, 0, 1}; a = lambda; f = -lambda*z^3; da = 1
    zflx1: ZeroFluxBoundary "Zero Flux" (default)
    init1: init "Initial Values" (default) | z = 3*cos(x*y*2*pi)
    flux1: FluxBoundary "Flux/Source 1" on boundaries 1 | g = d1; q = k1
    flux2: FluxBoundary "Flux/Source 2" on boundaries 2 | g = d2; q = k2
    flux3: FluxBoundary "Flux/Source 3" on boundaries 4 | g = X_lm+k3*yr3; q = k3
    flux4: FluxBoundary "Flux/Source 4" on boundaries 3 | g = X_lm+k4*yr4; q = k4

Mesh
  mesh1 "Mesh 1"
    size: MeshSizeDefault | hmax = L/40; hmin = L/40; hauto = 5; custom = on
    map1: Map "Mapped 1" on remaining entities

Studies
  std1 "Study 1"
    time: Transient "Time Dependent" | tlist = range(0,0.025,2); rtol = 0.0001; physselection = c

Solver configurations
  sol1 "Solver 1" (study std1)
    v1: Variables "Dependent Variables 1"
    t1: Time "Time-Dependent Solver 1" | tlist = range(0,0.025,2); atolglobal = 0.000010
      dDef: Direct
      fc1: FullyCoupled | linsolver = dDef

Datasets
  dset1: Solution | solution = sol1

Derived values
  gev1: EvalGlobal "Global Evaluation 1" | data = dset1; table = tbl1; expr = e2

Tables
  tbl1: Table
    // Global Evaluation 1 (C1(z))
    Time (s) | C1(z) | C2(z) | e1 | e2
    0 | 0.246361 | -0.503501 | 2.11817 | 2.11866
    0.025 | -0.0841137 | -0.75391 | 0.701192 | 0.713933
    0.05 | 0.0208015 | -0.6653 | 0.444574 | 0.468731
    0.075 | 0.125328 | -0.576625 | 0.272506 | 0.298297
    0.1 | 0.19697 | -0.517382 | 0.158655 | 0.184211
    0.125 | 0.240763 | -0.483419 | 0.0901062 | 0.11472
    0.15 | 0.265345 | -0.466497 | 0.0543469 | 0.0762026
    0.175 | 0.277671 | -0.459917 | 0.0402396 | 0.0566498
    0.2 | 0.282566 | -0.459165 | 0.03608 | 0.0466122
    0.225 | 0.28317 | -0.461445 | 0.0340406 | 0.0403377
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
Plots
  pg1: PlotGroup2D "2D Plot Group 1" | data = dset1
    surf1: Surface | expr = X
  pg2: PlotGroup2D "2D Plot Group 2" | data = dset1
    surf1: Surface | expr = z
  pg3: PlotGroup1D "1D Plot Group 3" | data = dset1
    glob1: Global | expr = {e1, e2}

Exports
  anim1: Animation
    giffilename = /Users/eaulisa/Dropbox/Public/Mono_7_14_EA/Comsol_exs/Chapter5/movie.gif
    size = manual
    width = 640
    height = 480
    options = on
    axes = on
  data1: Data
    data = dset1
    expr = X
    filename = /Users/gilliam/Desktop/collect_14/research14/Mono_7_14_EA/Comsol_exs/Chapter5/Chap5Ex6_Chff-Infnt_zero_dynamics/matlab_figs/xi_y_data.txt
    location = grid
    gridx2 = 1
    gridy2 = range(0,.01,1)