// COMSOL Multiphysics 5.0.1.276 model "Ex5_2_3_Burger_zero_dynamics.mph"
// Ex5 2 3 Burger zero dynamics
// Outline of the model tree

Parameters
  L = 1
  lambda = 3
  k1 = 1
  k2 = 2
  k3 = 0.5
  k4 = 0.25

Variables
  var1 "Variables 1"
    d11 = cos((y-t)*2*pi)*5
    d12 = cos((y-t)*2*pi)*5
    d21 = cos((x-t)*2*pi)*10
    d22 = cos((x-t)*2*pi)*10
    yr31 = flc2hs(y-0.25,0.05)-flc2hs(y-0.5,0.05)
    yr32 = -flc2hs(y-0.25,0.05)+flc2hs(y-0.5,0.05)
    yr41 = 2*(flc2hs(x-0.25,0.05)-flc2hs(x-0.5,0.05))
    yr42 = -2*(flc2hs(x-0.25,0.05)-flc2hs(x-0.5,0.05))
    e11 = sqrt(C1((yr31-z1)^2))
    e12 = sqrt(C1((yr32-z2)^2))
    e21 = sqrt(C2((yr41-z1)^2))
    e22 = sqrt(C2((yr42-z2)^2))

Couplings
  intop1: Integration on boundaries 4 | opname = C1
  intop2: Integration on boundaries 3 | opname = C2

Geometry
  geom1 "Geometry 1" (2D, length unit m)
    sq1: Square | size = L
    fin: Finalize "Form Union"

Physics
  c: CoefficientFormPDE "zero dymamics" on all domains
    dependent variable X = {X1, X2}
    cfeq1: CoefficientFormPDE (default)
      c = {{1, 0, 0, 1}, {0, 0, 0, 0}, {0, 0, 0, 0}, {1, 0, 0, 1}}
      a = {0, 0, 0, 0}
      f = {0, 0}
      da = {1, 0, 0, 1}
      be = {{X1, X2}, {0, 0}, {0, 0}, {X1, X2}}
    zflx1: ZeroFluxBoundary "Zero Flux" (default)
    init1: init "Initial Values" (default)
    flux1: FluxBoundary "Flux/Source 1" on boundaries 1 | g = {d11, d12}; q = {k1, 0, 0, k1}
    flux2: FluxBoundary "Flux/Source 2" on boundaries 2 | g = {d21, d22}; q = {k2, 0, 0, k2}
    cons1: Constraint on boundaries 4
      R = {X1-yr31, X2-yr32}
      constraintType = unidirectionalConstraint
      weakConstraints = 1
    cons2: Constraint on boundaries 3
      R = {X1-yr41, X2-yr42}
      constraintType = unidirectionalConstraint
      weakConstraints = 1
  c2: CoefficientFormPDE "Plant" on all domains
    dependent variable z = {z1, z2}
    cfeq1: CoefficientFormPDE (default)
      c = {{1, 0, 0, 1}, {0, 0, 0, 0}, {0, 0, 0, 0}, {1, 0, 0, 1}}
      a = {0, 0, 0, 0}
      f = {0, 0}
      da = {1, 0, 0, 1}
      be = {{z1, z2}, {0, 0}, {0, 0}, {z1, z2}}
    zflx1: ZeroFluxBoundary "Zero Flux" (default)
    init1: init "Initial Values" (default) | z2 = 3*sin(x*y*2*pi)
    flux1: FluxBoundary "Flux/Source 1" on boundaries 1 | g = {d11, d12}; q = {k1, 0, 0, k1}
    flux2: FluxBoundary "Flux/Source 2" on boundaries 2 | g = {d21, d22}; q = {k2, 0, 0, k2}
    flux3: FluxBoundary "Flux/Source 3" on boundaries 4 | g = {X1_lm+k3*yr31, X2_lm+k3*yr32}; q = {k3, 0, 0, k3}
    flux4: FluxBoundary "Flux/Source 4" on boundaries 3 | g = {X1_lm+k4*yr41, X2_lm+k4*yr42}; q = {k4, 0, 0, k4}

Mesh
  mesh1 "Mesh 1"
    size: MeshSizeDefault | hmax = L/40; hmin = L/40; hauto = 5; custom = on
    map1: Map "Mapped 1" on remaining entities

Studies
  std1 "Study 1"
    time: Transient "Time Dependent" | tlist = range(0,0.025,4); rtol = 0.0001; physselection = c

Solver configurations
  sol1 "Solver 1" (study std1)
    v1: Variables "Dependent Variables 1"
    t1: Time "Time-Dependent Solver 1" | tlist = range(0,0.025,4); atolglobal = 0.000010
      dDef: Direct
      fc1: FullyCoupled | linsolver = dDef

Datasets
  dset1: Solution | solution = sol1

Derived values
  gev1: EvalGlobal "Global Evaluation 1" | data = dset1; table = tbl1; expr = e22

Tables
  tbl1: Table
    // Global Evaluation 1 (C1(z))
    Time (s) | C1(z1) | C1(z2) | C2(z1) | C2(z2) | e11 | e12 | e21 | e22
    0 | 0.244201 | -0.250429 | 0.492592 | -0.498972 | 2.11532 | 2.12021 | 2.11779 | 2.1228
    0.025 | 0.0801767 | 0.0217348 | 0.184546 | -0.133991 | 0.819566 | 1.22548 | 0.972752 | 1.34862
    0.05 | 0.158678 | 0.188278 | 0.308639 | 0.0856349 | 0.580882 | 0.795628 | 0.664369 | 0.977467
    0.075 | 0.263788 | 0.271109 | 0.462144 | 0.194443 | 0.405602 | 0.626152 | 0.446322 | 0.837092
    0.1 | 0.357126 | 0.306688 | 0.586963 | 0.236712 | 0.285061 | 0.58174 | 0.304543 | 0.78972
    0.125 | 0.425968 | 0.316698 | 0.672899 | 0.242796 | 0.237065 | 0.572017 | 0.248793 | 0.76467
    0.15 | 0.471245 | 0.312673 | 0.7265 | 0.230231 | 0.237674 | 0.564802 | 0.247831 | 0.740901
    0.175 | 0.498207 | 0.300989 | 0.757167 | 0.208778 | 0.251999 | 0.553572 | 0.261927 | 0.715138
    0.2 | 0.512302 | 0.285365 | 0.772805 | 0.183804 | 0.264094 | 0.538786 | 0.273854 | 0.688357
    0.225 | 0.517892 | 0.268032 | 0.779074 | 0.158197 | 0.270659 | 0.522033 | 0.280272 | 0.661916
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
Plots
  pg1: PlotGroup2D "2D Plot Group 1" | data = dset1
    surf1: Surface | expr = X1
  pg2: PlotGroup2D "2D Plot Group 2" | data = dset1
    surf1: Surface | expr = X2
  pg4: PlotGroup2D "2D Plot Group 4" | data = dset1
    surf1: Surface | expr = z1
  pg5: PlotGroup2D "2D Plot Group 5" | data = dset1
    surf1: Surface | expr = z2
  pg3: PlotGroup1D "1D Plot Group 3" | data = dset1
    glob1: Global | expr = {e11, e12, e21, e22}

Exports
  anim1: Animation
    giffilename = /Users/eaulisa/Dropbox/Public/Mono_7_14_EA/Comsol_exs/Chapter5/movie.gif
    size = manual
    width = 640
    height = 480
    options = on
    axes = on
  data1: Data
    data = dset1
    expr = {z1, z2, , , }
    filename = /Users/gilliam/Desktop/collect_14/research14/Mono_7_14_EA/Comsol_exs/Chapter5/Chap5Ex7_Brgr_zero_dynamics/matlab_figs/bdry_data_z1_z2_x.txt
    location = grid
    gridx2 = range(0,.01,1)
    gridy2 = 1